Main.ModelSetup.LabSpecificData = {


 #path BODY_MODEL_CONFIG_FILE "BodyModelConfig.any"

 #path MOCAP_MARKER_PROTOCOL_FILE "MarkerProtocol.any"
 #path MOCAP_EXTRA_DRIVERS_FILE "ExtraDrivers.any"

 #path MOCAP_C3DSETTINGS "C3DSettings.any"

 #ifdef USE_GRF_PREDICTION
  #define MOCAP_USE_GRF_PREDICTION ON
  #path MOCAP_FORCE_PLATE_FILE "ForcePlates_GRFPrediction.any"
 #else
  #path MOCAP_FORCE_PLATE_FILE "ForcePlates.any"
 #endif

 Gravity = 9.81*{0, 0, -1};


  // This adds different segment length as design variables to
  // to the parameter identification study (Main.Studies.ParameterIdentification)
  // This allows the segment length to be optimized in based on the markers/motion
  OptimizeAnthropometricsOnOff OptimizeAntropometricsOnOff (
    PELVIS_WIDTH = ON ,
    HEAD_HEIGHT = OFF,
    TRUNK_HEIGHT= ON,
    RIGHT_THIGH_LENGTH= OFF,
    LEFT_THIGH_LENGTH = OFF,
    RIGHT_SHANK_LENGTH= OFF,
    LEFT_SHANK_LENGTH = OFF,
    RIGHT_FOOT_LENGTH= ON,
    LEFT_FOOT_LENGTH = ON,
    RIGHT_UPPERARM_LENGTH= INCLUDE_UPPERBODY,
    LEFT_UPPERARM_LENGTH = INCLUDE_UPPERBODY,
    RIGHT_LOWERARM_LENGTH= INCLUDE_UPPERBODY,
    LEFT_LOWERARM_LENGTH = INCLUDE_UPPERBODY,
    RIGHT_HAND_LENGTH= OFF,
    LEFT_HAND_LENGTH = OFF,
    LEFT_RIGHT_SYMMETRY = ON
  ) ={};


//  AnyFolder OptimizeAntropometrics =
//  {
//   CreateDesVar PelvisWidth( ENABLE = ON,
//     NAME = PelvisWidth,
//     PARAMETER = Main.HumanModel.Anthropometrics.SegmentDimensions.PelvisWidth
//   ) = {};
//
//  };
};

#path BM_DRAWSETTINGS_FILE "<ANYBODY_PATH_MAINFILEDIR>\Setup\DrawSettings.any"

#define REF_HUMAN_BODYMODEL Main.HumanModel.BodyModel

#define USE_FDK 1
#define USE_FDK_TIBIOFEMORAL
#define USE_FDK_PATELLOFEMORAL
#define USE_FDK_SOFT_DRIVERS 0
#define FDK_ForceTol 1e-1

#define DEF_CUSTOM_KNEE_JOINT_CONTACT_INIT_OFFSET 0.0000
