// A macro to avoid a situaion of zero division
#define NONE_ZERO_DIVISION(A, B, Threshold) A/iffun(gteqfun(B, Threshold), B, 1e10)

// Class template for creating a ligament
// Parameters:
// REF_HUMAN_MODEL: the absolute path of the location of the AMMR HumanModel
// REF_PARAM_FOLDER: the absolute path of the location of the ligament parameters
// REF_INIT_STUDY: the absolute path of the location of the AnyBody study with fewer segments and constraints in order to calcuate the initial (reference) lengths of all ligaments
// REF_EVAL_STUDY: the absolute path of the location of the AnyDesEvalStudy in order to evaluate all the ligament legnths
// LIGAMENT_NAME: specification of the ligament name
// WRAPPING: number of the wrapping surfaces related to a ligament
#class_template CREATE_LIGAMENT(REF_HUMAN_MODEL, REF_PARAM_FOLDER, REF_INIT_STUDY, REF_EVAL_STUDY, LIGAMENT_NAME, WRAPPING)
{
  // Definition of the number of string mesh objects in the wrapping object of a ligament
  #var AnyInt NumStringMesh = 20;
  #var AnySwitch VisibleOnOff = On;

  // Reference of the ligament parameter folder based on REF_PARAM_FOLDER
  AnyFolder& RefParam = REF_PARAM_FOLDER.LIGAMENT_NAME;

  RefParam =
  {
    RefFrame0 =
    {
      // Create an AnyRefNode of which name is defefined as LIGAMENT_NAME in the RefFrame0 of its relevant ligament parameter folder
      AnyRefNode LIGAMENT_NAME =
      {
        sRel = ..PosInFrame0;
      };
    };
    RefFrame1 =
    {
      // Create an AnyRefNode of which name is defefined as LIGAMENT_NAME in the RefFrame1 of its relevant ligament parameter folder
      AnyRefNode LIGAMENT_NAME =
      {
        sRel = ..PosInFrame1;
      };
    };
  };

  #if WRAPPING > 0
  // Create an AnyKinSPLine object with possible wrapping surfaces
  AnyKinSPLine PLine =
  {
    AnyRefFrame& ref0 = .RefParam.RefFrame0.LIGAMENT_NAME;
    AnyRefFrame& ref1 = .RefParam.RefFrame1.LIGAMENT_NAME;
    StringMesh = .NumStringMesh;
    InitWrapPosVectors = .RefParam.InitWrapPosVectors ;

    RelTol = 1e-6;
    //AbsTol = 1e-6;
    //MaxRelStepSize = 0.5;

    #if WRAPPING >= 1
    AnyParamSurf& surf0 = .RefParam.RefSurf0 ;
    #endif
    #if WRAPPING >= 2
    AnyParamSurf& surf1 = .RefParam.RefSurf1 ;
    #endif
    #if WRAPPING >= 3
    AnyParamSurf& surf2 = .RefParam.RefSurf2 ;
    #endif
    #if WRAPPING >= 4
    AnyParamSurf& surf3 = .RefParam.RefSurf3 ;
    #endif
    #if WRAPPING >= 5
    AnyParamSurf& surf4 = .RefParam.RefSurf4 ;
    #endif

    AnyDrawPLine Drw =
    {
      Thickness = 0.0025;
      RGB = Main.DrawSettings.Colors.Ligaments;
      Visible = ..VisibleOnOff  ;

      AnyStyleDrawMaterial1 DrawStyle =
      {
        AnyVar ColorSwitch = iffun(ltfun(...Force.F[0], 0.0), 1.0, 0.0);

        RGB = ColorSwitch*Main.DrawSettings.Colors.Ligaments + (1-ColorSwitch)*{1, 1, 1};
        DiffuseRGB = 0.8*RGB ;
        SpecularRGB = {1, 1, 1};
        EmissionRGB = 0.1*{1, 1, 1};
        //Shininess = 0.7;
        //Opacity = 1;
      };
    };
  };
  #else
  // Create an AnyKinPLine if there is no wrapping surface
  AnyKinPLine PLine =
  {
    AnyRefFrame& ref0 = .RefParam.RefFrame0.LIGAMENT_NAME;
    AnyRefFrame& ref1 = .RefParam.RefFrame1.LIGAMENT_NAME;
    AnyDrawPLine Drw =
    {
      Thickness = 0.0025;
      RGB = Main.DrawSettings.Colors.Ligaments;
      Visible = ..VisibleOnOff  ;

      AnyStyleDrawMaterial1 DrawStyle =
      {
        AnyVar ColorSwitch = iffun(ltfun(...Force.F[0], 0.0), 1.0, 0.0);

        RGB = ColorSwitch*Main.DrawSettings.Colors.Ligaments + (1-ColorSwitch)*{1, 1, 1};
        DiffuseRGB = 0.8*RGB ;
        SpecularRGB = {1, 1, 1};
        EmissionRGB = 0.1*{1, 1, 1};
        //Shininess = 0.7;
        //Opacity = 1;
      };
    };
  };
  #endif

  // Create an AnyForce object based on ligament force formula and parameters including stiffness, reference length and reference strain
  AnyForce Force =
  {
    AnyVar k = .RefParam.Stiffness;
    AnyVar lr = .RefParam.RefLength;
    AnyVar er = .RefParam.RefStrain;
    AnyKinMeasure & meas = .PLine;
    #include "LigamentModel.any"
    F = Val;
  };

  // Define an AnyOutputFun object inside REF_INIT_STUDY in order to evaluate the ligament length
  REF_INIT_STUDY =
  {
    OutputFunctions_Length =
    {
      AnyOutputFun LIGAMENT_NAME =
      {
        Val = REF_HUMAN_MODEL.BodyModel.Right.Leg.Ligaments.LIGAMENT_NAME.PLine.Pos[0];
      };
    };
  };

  // Define AnyDesVar and AnyDesMeasure objects
  REF_EVAL_STUDY =
  {
    AnyDesVar RefLength_##LIGAMENT_NAME =
    {
      Val = REF_PARAM_FOLDER.LIGAMENT_NAME.RefLength;
    };

    AnyDesMeasure Measure_##LIGAMENT_NAME =
    {
      Val = max(REF_INIT_STUDY.OutputFunctions_Length.LIGAMENT_NAME());
      Type = OutputFun;
    };
  };
}; // CREATE_LIGAMENT

// Class template for creating a ligament, but without using of relevant studies such as REF_INIT_STUDY and REF_EVAL_STUDY
#class_template CREATE_LIGAMENT_NO_STUDY(REF_HUMAN_MODEL, REF_PARAM_FOLDER, LIGAMENT_NAME, WRAPPING)
{
  #var AnyInt NumStringMesh = 20;
  #var AnySwitch VisibleOnOff = On;

  AnyFolder& RefParam = REF_PARAM_FOLDER.LIGAMENT_NAME;

  RefParam =
  {
    RefFrame0 =
    {
      AnyRefNode LIGAMENT_NAME =
      {
        sRel = ..PosInFrame0;
      };
    };
    RefFrame1 =
    {
      AnyRefNode LIGAMENT_NAME =
      {
        sRel = ..PosInFrame1;
      };
    };
  };

  #if WRAPPING > 0
  AnyKinSPLine PLine =
  {
    AnyRefFrame& ref0 = .RefParam.RefFrame0.LIGAMENT_NAME;
    AnyRefFrame& ref1 = .RefParam.RefFrame1.LIGAMENT_NAME;
    StringMesh = .NumStringMesh;
    InitWrapPosVectors = .RefParam.InitWrapPosVectors ;

    #if WRAPPING >= 1
    AnyParamSurf& surf0 = .RefParam.RefSurf0 ;
    #endif
    #if WRAPPING >= 2
    AnyParamSurf& surf1 = .RefParam.RefSurf1 ;
    #endif
    #if WRAPPING >= 3
    AnyParamSurf& surf2 = .RefParam.RefSurf2 ;
    #endif
    #if WRAPPING >= 4
    AnyParamSurf& surf3 = .RefParam.RefSurf3 ;
    #endif
    #if WRAPPING >= 5
    AnyParamSurf& surf4 = .RefParam.RefSurf4 ;
    #endif

    AnyDrawPLine Drw =
    {
      Thickness = 0.0025;
      RGB = Main.DrawSettings.Colors.Ligaments;
      Visible = ..VisibleOnOff  ;

      AnyStyleDrawMaterial1 DrawStyle =
      {
        AnyVar ColorSwitch = iffun(ltfun(...Force.F[0], 0.0), 1.0, 0.0);

        RGB = ColorSwitch*Main.DrawSettings.Colors.Ligaments + (1-ColorSwitch)*{1, 1, 1};
        DiffuseRGB = 0.8*RGB ;
        SpecularRGB = {1, 1, 1};
        EmissionRGB = 0.1*{1, 1, 1};
        //Shininess = 0.7;
        //Opacity = 1;
      };
    };
  };
  #else
  AnyKinPLine PLine =
  {
    AnyRefFrame& ref0 = .RefParam.RefFrame0.LIGAMENT_NAME;
    AnyRefFrame& ref1 = .RefParam.RefFrame1.LIGAMENT_NAME;
    AnyDrawPLine Drw =
    {
      Thickness = 0.0025;
      RGB = Main.DrawSettings.Colors.Ligaments;
      Visible = ..VisibleOnOff  ;

      AnyStyleDrawMaterial1 DrawStyle =
      {
        AnyVar ColorSwitch = iffun(ltfun(...Force.F[0], 0.0), 1.0, 0.0);

        RGB = ColorSwitch*Main.DrawSettings.Colors.Ligaments + (1-ColorSwitch)*{1, 1, 1};
        DiffuseRGB = 0.8*RGB ;
        SpecularRGB = {1, 1, 1};
        EmissionRGB = 0.1*{1, 1, 1};
        //Shininess = 0.7;
        //Opacity = 1;
      };
    };
  };
  #endif

  AnyForce Force =
  {
    AnyVar k = .RefParam.Stiffness;
    AnyVar lr = .RefParam.RefLength;
    AnyVar er = .RefParam.RefStrain;
    AnyKinMeasure & meas = .PLine;
    #include "LigamentModel.any"
    F = Val;
  };

//  REF_INIT_STUDY =
//  {
//    OutputFunctions_Length =
//    {
//      AnyOutputFun LIGAMENT_NAME =
//      {
//        Val = REF_HUMAN_MODEL.BodyModel.Right.Leg.Ligaments.LIGAMENT_NAME.PLine.Pos[0];
//      };
//    };
//  };
//
//  REF_EVAL_STUDY =
//  {
//    AnyDesVar RefLength_##LIGAMENT_NAME =
//    {
//      Val = REF_PARAM_FOLDER.LIGAMENT_NAME.RefLength;
//    };
//
//    AnyDesMeasure Measure_##LIGAMENT_NAME =
//    {
//      Val = max(REF_INIT_STUDY.OutputFunctions_Length.LIGAMENT_NAME());
//      Type = OutputFun;
//    };
//  };
}; // CREATE_LIGAMENT
