#define _SHOW_SURF(R, G, B) AnyDrawSurf DrwSurf = {FileName = .FileName;ScaleXYZ = .ScaleXYZ;RGB = 0.5*{R, G, B};Opacity = 0.5;}

#if BM_LEG_RIGHT == ON

REF_HUMAN_BODYMODEL.Right.Leg.Segments.Thigh.PatientNode =
{
  #ifdef PATH_IMPLANT_FEMUR_RIGHT_STL_CONTACT
  AnySurfSTL ContactSurf =
  {
    FileName = PATH_IMPLANT_FEMUR_RIGHT_STL_CONTACT;
    ScaleXYZ = {1, 1, 1} * CONTACT_UNIT_CONVERSION_TO_M;
    _SHOW_SURF(1,0,1);
  };
  #endif
};

REF_HUMAN_BODYMODEL.Right.Leg.Segments.Shank.PatientNode =
{
  #ifdef PATH_IMPLANT_TIBIA_INSERT_LATERAL_RIGHT_STL_CONTACT
  AnySurfSTL ContactSurf_Lateral =
  {
    FileName = PATH_IMPLANT_TIBIA_INSERT_LATERAL_RIGHT_STL_CONTACT ;
    ScaleXYZ = {1, 1, 1} * CONTACT_UNIT_CONVERSION_TO_M;
    _SHOW_SURF(1,0,1);

  };
  #endif

  #ifdef PATH_IMPLANT_TIBIA_INSERT_MEDIAL_RIGHT_STL_CONTACT
  AnySurfSTL ContactSurf_Medial =
  {
    FileName = PATH_IMPLANT_TIBIA_INSERT_MEDIAL_RIGHT_STL_CONTACT ;
    ScaleXYZ = {1, 1, 1} * CONTACT_UNIT_CONVERSION_TO_M;
    _SHOW_SURF(1,0,1);

  };
  #endif
};

REF_HUMAN_BODYMODEL.Right.Leg.Segments.Patella.PatientNode =
{
  #ifdef PATH_IMPLANT_PATELLA_BUTTON_RIGHT_STL_CONTACT
  AnySurfSTL ContactSurf =
  {
    FileName = PATH_IMPLANT_PATELLA_BUTTON_RIGHT_STL_CONTACT;
    ScaleXYZ = {1, 1, 1} * CONTACT_UNIT_CONVERSION_TO_M;
    _SHOW_SURF(1,0,1);

  };
  #endif
};

REF_HUMAN_BODYMODEL.Right.Leg =
{
  AnyFolder Contacts =
  {
    #ifdef USE_FDK_TIBIOFEMORAL
    #ifdef PATH_IMPLANT_TIBIA_INSERT_LATERAL_RIGHT_STL_CONTACT
    #ifdef PATH_IMPLANT_FEMUR_RIGHT_STL_CONTACT
    AnyForceSurfaceContact Femur_Tibia_Lateral =
    {
      AnySurface &sMaster = ..Segments.Thigh.PatientNode .ContactSurf ;
      AnySurface &sSlave  = ..Segments.Shank.PatientNode .ContactSurf_Lateral;

      PressureModule = DEF_CONTACT_PRESSURE_TIBIOFEMORAL ;

      ForceViewOnOff = On;
      MeshRefinementMaster = DEF_CONTACT_MESH_REFINEMENT_TIBIOFEMORAL_FEMUR ;
      MeshRefinementSlave = DEF_CONTACT_MESH_REFINEMENT_TIBIOFEMORAL_TIBIA ;
      SingleSidedOnOff= 0;

      ProjectionThresholdMaster = 0.8;
      ProjectionThresholdSlave = 0.8;

      #if DEF_CONTACT_DRAW_PRESSURE_MAP == 1
      AnyDrawForceSurface DrwSurfaceContact =
      {
        DrawSurf1RGB = {1, 0, 0};
        DrawSurf2RGB = {0, 0, 1};
      };
      #endif
    };
    #endif
    #endif

    #ifdef PATH_IMPLANT_TIBIA_INSERT_MEDIAL_RIGHT_STL_CONTACT
    #ifdef PATH_IMPLANT_FEMUR_RIGHT_STL_CONTACT
    AnyForceSurfaceContact Femur_Tibia_Medial =
    {
      AnySurface &sMaster = ..Segments.Thigh.PatientNode.ContactSurf ;
      AnySurface &sSlave  = ..Segments.Shank.PatientNode.ContactSurf_Medial;

      PressureModule = DEF_CONTACT_PRESSURE_TIBIOFEMORAL ;

      ForceViewOnOff = On;
      MeshRefinementMaster = DEF_CONTACT_MESH_REFINEMENT_TIBIOFEMORAL_FEMUR ;
      MeshRefinementSlave = DEF_CONTACT_MESH_REFINEMENT_TIBIOFEMORAL_TIBIA ;
      SingleSidedOnOff= 0;

      ProjectionThresholdMaster = 0.8;
      ProjectionThresholdSlave = 0.8;

      #if DEF_CONTACT_DRAW_PRESSURE_MAP == 1
      AnyDrawForceSurface DrwSurfaceContact =
      {
        DrawSurf1RGB = {1, 0, 0};
        DrawSurf2RGB = {0, 0, 1};
      };
      #endif
    };
    #endif
    #endif
    #endif

    #ifdef USE_FDK_PATELLOFEMORAL
    #ifdef PATH_IMPLANT_PATELLA_BUTTON_RIGHT_STL_CONTACT
    #ifdef PATH_IMPLANT_FEMUR_RIGHT_STL_CONTACT
    AnyForceSurfaceContact Femur_Patella =
    {
      AnySurface &sMaster = ..Segments.Thigh.PatientNode.ContactSurf ;
      AnySurface &sSlave  = ..Segments.Patella.PatientNode.ContactSurf;

      PressureModule = DEF_CONTACT_PRESSURE_PATELLOFEMORAL ;

      ForceViewOnOff = On;
      MeshRefinementMaster = DEF_CONTACT_MESH_REFINEMENT_PATELLOFEMORAL_FEMUR ;
      MeshRefinementSlave = DEF_CONTACT_MESH_REFINEMENT_PATELLOFEMORAL_PATELLA ;
      SingleSidedOnOff= 0;

      ProjectionThresholdMaster = 0.5;
      ProjectionThresholdSlave = 0.5;

      #if DEF_CONTACT_DRAW_PRESSURE_MAP == 1
      AnyDrawForceSurface DrwSurfaceContact =
      {
        DrawSurf1RGB = {1, 0, 0};
        DrawSurf2RGB = {0, 0, 1};
      };
      #endif
    };
    #endif
    #endif
    #endif
  };
};
#endif


#if BM_LEG_LEFT == ON

REF_HUMAN_BODYMODEL.Left.Leg.Segments.Thigh.PatientNode =
{
  #ifdef PATH_IMPLANT_FEMUR_LEFT_STL_CONTACT
  AnySurfSTL ContactSurf =
  {
    FileName = PATH_IMPLANT_FEMUR_LEFT_STL_CONTACT;
    ScaleXYZ = {1, 1, 1} * CONTACT_UNIT_CONVERSION_TO_M;
    _SHOW_SURF(1,0,1);
  };
  #endif
};

REF_HUMAN_BODYMODEL.Left.Leg.Segments.Shank.PatientNode =
{
  #ifdef PATH_IMPLANT_TIBIA_INSERT_LATERAL_LEFT_STL_CONTACT
  AnySurfSTL ContactSurf_Lateral =
  {
    FileName = PATH_IMPLANT_TIBIA_INSERT_LATERAL_LEFT_STL_CONTACT ;
    ScaleXYZ = {1, 1, 1} * CONTACT_UNIT_CONVERSION_TO_M;
    _SHOW_SURF(1,0,1);

  };
  #endif

  #ifdef PATH_IMPLANT_TIBIA_INSERT_MEDIAL_LEFT_STL_CONTACT
  AnySurfSTL ContactSurf_Medial =
  {
    FileName = PATH_IMPLANT_TIBIA_INSERT_MEDIAL_LEFT_STL_CONTACT ;
    ScaleXYZ = {1, 1, 1} * CONTACT_UNIT_CONVERSION_TO_M;
    _SHOW_SURF(1,0,1);

  };
  #endif
};

REF_HUMAN_BODYMODEL.Left.Leg.Segments.Patella.PatientNode =
{
  #ifdef PATH_IMPLANT_PATELLA_BUTTON_LEFT_STL_CONTACT
  AnySurfSTL ContactSurf =
  {
    FileName = PATH_IMPLANT_PATELLA_BUTTON_LEFT_STL_CONTACT;
    ScaleXYZ = {1, 1, 1} * CONTACT_UNIT_CONVERSION_TO_M;
    _SHOW_SURF(1,0,1);

  };
  #endif
};

REF_HUMAN_BODYMODEL.Left.Leg =
{
  AnyFolder Contacts =
  {
    #ifdef USE_FDK_TIBIOFEMORAL
    #ifdef PATH_IMPLANT_TIBIA_INSERT_LATERAL_LEFT_STL_CONTACT
    #ifdef PATH_IMPLANT_FEMUR_LEFT_STL_CONTACT
    AnyForceSurfaceContact Femur_Tibia_Lateral =
    {
      AnySurface &sMaster = ..Segments.Thigh.PatientNode .ContactSurf ;
      AnySurface &sSlave  = ..Segments.Shank.PatientNode .ContactSurf_Lateral;

      PressureModule = DEF_CONTACT_PRESSURE_TIBIOFEMORAL ;

      ForceViewOnOff = On;
      MeshRefinementMaster = DEF_CONTACT_MESH_REFINEMENT_TIBIOFEMORAL_FEMUR ;
      MeshRefinementSlave = DEF_CONTACT_MESH_REFINEMENT_TIBIOFEMORAL_TIBIA ;
      SingleSidedOnOff= 0;

      ProjectionThresholdMaster = 0.8;
      ProjectionThresholdSlave = 0.8;

      #if DEF_CONTACT_DRAW_PRESSURE_MAP == 1
      AnyDrawForceSurface DrwSurfaceContact =
      {
        DrawSurf1RGB = {1, 0, 0};
        DrawSurf2RGB = {0, 0, 1};
      };
      #endif
    };
    #endif
    #endif

    #ifdef PATH_IMPLANT_TIBIA_INSERT_MEDIAL_LEFT_STL_CONTACT
    #ifdef PATH_IMPLANT_FEMUR_LEFT_STL_CONTACT
    AnyForceSurfaceContact Femur_Tibia_Medial =
    {
      AnySurface &sMaster = ..Segments.Thigh.PatientNode.ContactSurf ;
      AnySurface &sSlave  = ..Segments.Shank.PatientNode.ContactSurf_Medial;

      PressureModule = DEF_CONTACT_PRESSURE_TIBIOFEMORAL ;

      ForceViewOnOff = On;
      MeshRefinementMaster = DEF_CONTACT_MESH_REFINEMENT_TIBIOFEMORAL_FEMUR ;
      MeshRefinementSlave = DEF_CONTACT_MESH_REFINEMENT_TIBIOFEMORAL_TIBIA ;
      SingleSidedOnOff= 0;

      ProjectionThresholdMaster = 0.8;
      ProjectionThresholdSlave = 0.8;

      #if DEF_CONTACT_DRAW_PRESSURE_MAP == 1
      AnyDrawForceSurface DrwSurfaceContact =
      {
        DrawSurf1RGB = {1, 0, 0};
        DrawSurf2RGB = {0, 0, 1};
      };
      #endif
    };
    #endif
    #endif
    #endif

    #ifdef USE_FDK_PATELLOFEMORAL
    #ifdef PATH_IMPLANT_PATELLA_BUTTON_LEFT_STL_CONTACT
    #ifdef PATH_IMPLANT_FEMUR_LEFT_STL_CONTACT
    AnyForceSurfaceContact Femur_Patella =
    {
      AnySurface &sMaster = ..Segments.Thigh.PatientNode.ContactSurf ;
      AnySurface &sSlave  = ..Segments.Patella.PatientNode.ContactSurf;

      PressureModule = DEF_CONTACT_PRESSURE_PATELLOFEMORAL ;

      ForceViewOnOff = On;
      MeshRefinementMaster = DEF_CONTACT_MESH_REFINEMENT_PATELLOFEMORAL_FEMUR ;
      MeshRefinementSlave = DEF_CONTACT_MESH_REFINEMENT_PATELLOFEMORAL_PATELLA ;
      SingleSidedOnOff= 0;

      ProjectionThresholdMaster = 0.5;
      ProjectionThresholdSlave = 0.5;

      #if DEF_CONTACT_DRAW_PRESSURE_MAP == 1
      AnyDrawForceSurface DrwSurfaceContact =
      {
        DrawSurf1RGB = {1, 0, 0};
        DrawSurf2RGB = {0, 0, 1};
      };
      #endif
    };
    #endif
    #endif
    #endif
  };
};

#endif


REF_HUMAN_BODYMODEL.Right.Leg =
{
  AnyFolder Measures =
  {
//    AnyFolder Kinematics =
//    {
//      AnyFolder Knee =
//      {
//        AnyFolder Floating =
//        {
//          AnyFolder Segs =
//          {
//            AnySeg Femur_Dummy =
//            {
//              r0 = REF_HUMAN_BODYMODEL.Right.Leg.Segments.Thigh.r0
//              +
//              (
//              REF_HUMAN_BODYMODEL.Right.Leg.Segments.Thigh.PatientNode.sRel
//              + REF_HUMAN_BODYMODEL.Right.Leg.Segments.Thigh.PatientNode.AnatomicalFrame.sRel
//              * REF_HUMAN_BODYMODEL.Right.Leg.Segments.Thigh.PatientNode.ARel'
//              )
//              * REF_HUMAN_BODYMODEL.Right.Leg.Segments.Thigh.Axes0';
//              Axes0 = REF_HUMAN_BODYMODEL.Right.Leg.Segments.Thigh.Axes0
//              * REF_HUMAN_BODYMODEL.Right.Leg.Segments.Thigh.PatientNode.ARel
//              * REF_HUMAN_BODYMODEL.Right.Leg.Segments.Thigh.PatientNode.AnatomicalFrame.ARel ;
//              Mass = 0;
//              Jii = {0, 0, 0};
////              AnyDrawRefFrame Drw =
////              {
////                RGB = {1, 1, 0};
////                ScaleXYZ = 0.05*{1, 1, 1};
////              };
//            };
//
//            AnySeg Tibia_Dummy =
//            {
//              r0 = REF_HUMAN_BODYMODEL.Right.Leg.Segments.Shank.r0
//              +
//              (
//              REF_HUMAN_BODYMODEL.Right.Leg.Segments.Shank.PatientNode.sRel
//              + REF_HUMAN_BODYMODEL.Right.Leg.Segments.Shank.PatientNode.AnatomicalFrame.sRel
//              * REF_HUMAN_BODYMODEL.Right.Leg.Segments.Shank.PatientNode.ARel'
//              )
//              * REF_HUMAN_BODYMODEL.Right.Leg.Segments.Shank.Axes0';
//              Axes0 = REF_HUMAN_BODYMODEL.Right.Leg.Segments.Shank.Axes0
//              * REF_HUMAN_BODYMODEL.Right.Leg.Segments.Shank.PatientNode.ARel
//              * REF_HUMAN_BODYMODEL.Right.Leg.Segments.Shank.PatientNode.AnatomicalFrame.ARel ;
//              Mass = 0;
//              Jii = {0, 0, 0};
////              AnyDrawRefFrame Drw =
////              {
////                RGB = {0, 1, 1};
////                ScaleXYZ = 0.05*{1, 1, 1};
////              };
//            };
//          };//Segs
//          AnyFolder Joints =
//          {
//            AnyCylindricalJoint Femmur_Connect =
//            {
//              Axis = x;
//              AnyRefFrame& ref0 = REF_HUMAN_BODYMODEL.Right.Leg.Segments.Thigh.PatientNode.AnatomicalFrame;
//              AnyRefFrame& ref1 = ..Segs.Femur_Dummy;
//            };
//            AnyCylindricalJoint Inter_Connect =
//            {
//              Axis = y;
//              AnyRefFrame& ref0 = ..Segs.Femur_Dummy;
//              AnyRefFrame& ref1 = ..Segs.Tibia_Dummy;
//            };
//            AnyCylindricalJoint Tibia_Connect =
//            {
//              Axis = z;
//              AnyRefFrame& ref0 = ..Segs.Tibia_Dummy;
//              AnyRefFrame& ref1 = REF_HUMAN_BODYMODEL.Right.Leg.Segments.Shank.PatientNode.AnatomicalFrame;
//            };
//          };
//          AnyFolder Measures =
//          {
//            AnyVar Lin_Tibia_LateralMedial = .Joints.Femmur_Connect.Pos[0] ;
//            AnyVar Lin_Tibia_AnteriorPosterior = .Joints.Inter_Connect.Pos[0];
//            AnyVar Lin_Tibia_SuperiorInferior = .Joints.Tibia_Connect.Pos[0] ;
//
//            AnyVar Rot_Tibia_FlexionExtension = (-1)*.Joints.Femmur_Connect.Pos[1];
//            AnyVar Rot_Tibia_AdductionAbduction = .Joints.Inter_Connect.Pos[1];
//            AnyVar Rot_Tibia_InternalExternal = .Joints.Tibia_Connect.Pos[1];
//
//            AnyVar Lin_Tibia_LateralMedial_in_mm = Lin_Tibia_LateralMedial * 1000;
//            AnyVar Lin_Tibia_AnteriorPosterior_in_mm = Lin_Tibia_AnteriorPosterior * 1000;
//            AnyVar Lin_Tibia_SuperiorInferior_in_mm = Lin_Tibia_SuperiorInferior * 1000;
//
//            AnyVar Rot_Tibia_FlexionExtension_in_deg = Rot_Tibia_FlexionExtension*(180/pi);
//            AnyVar Rot_Tibia_AdductionAbduction_in_deg = Rot_Tibia_AdductionAbduction*(180/pi);
//            AnyVar Rot_Tibia_InternalExternal_in_deg = Rot_Tibia_InternalExternal*(180/pi);
//          };
//        };//Floating
//      };//Knee
//
//      AnyFolder Patella =
//      {
//        AnyFolder Floating =
//        {
//          AnyFolder Segs =
//          {
//            AnySeg Femur_Dummy =
//            {
//              r0 = REF_HUMAN_BODYMODEL.Right.Leg.Segments.Thigh.r0
//              +
//              (
//              REF_HUMAN_BODYMODEL.Right.Leg.Segments.Thigh.PatientNode.sRel
//              + REF_HUMAN_BODYMODEL.Right.Leg.Segments.Thigh.PatientNode.AnatomicalFrame.sRel
//              * REF_HUMAN_BODYMODEL.Right.Leg.Segments.Thigh.PatientNode.ARel'
//              )
//              * REF_HUMAN_BODYMODEL.Right.Leg.Segments.Thigh.Axes0';
//              Axes0 = REF_HUMAN_BODYMODEL.Right.Leg.Segments.Thigh.Axes0
//              * REF_HUMAN_BODYMODEL.Right.Leg.Segments.Thigh.PatientNode.ARel
//              * REF_HUMAN_BODYMODEL.Right.Leg.Segments.Thigh.PatientNode.AnatomicalFrame.ARel ;
//              Mass = 0;
//              Jii = {0, 0, 0};
////              AnyDrawRefFrame Drw =
////              {
////                RGB = {1, 1, 0};
////                ScaleXYZ = 0.05*{1, 1, 1};
////              };
//            };
//
//            AnySeg Patella_Dummy =
//            {
//              r0 = REF_HUMAN_BODYMODEL.Right.Leg.Segments.Patella.r0
//              +
//              (
//              REF_HUMAN_BODYMODEL.Right.Leg.Segments.Patella.PatientNode.sRel
//              + REF_HUMAN_BODYMODEL.Right.Leg.Segments.Patella.PatientNode.AnatomicalFrame.sRel
//              * REF_HUMAN_BODYMODEL.Right.Leg.Segments.Patella.PatientNode.ARel'
//              )
//              * REF_HUMAN_BODYMODEL.Right.Leg.Segments.Patella.Axes0';
//              Axes0 = REF_HUMAN_BODYMODEL.Right.Leg.Segments.Patella.Axes0
//              * REF_HUMAN_BODYMODEL.Right.Leg.Segments.Patella.PatientNode.ARel
//              * REF_HUMAN_BODYMODEL.Right.Leg.Segments.Patella.PatientNode.AnatomicalFrame.ARel ;
//              Mass = 0;
//              Jii = {0, 0, 0};
////              AnyDrawRefFrame Drw =
////              {
////                RGB = {0, 1, 1};
////                ScaleXYZ = 0.05*{1, 1, 1};
////              };
//            };
//          };//Segs
//          AnyFolder Joints =
//          {
//            AnyCylindricalJoint Femmur_Connect =
//            {
//              Axis = x;
//              AnyRefFrame& ref0 = REF_HUMAN_BODYMODEL.Right.Leg.Segments.Thigh.PatientNode.AnatomicalFrame;
//              AnyRefFrame& ref1 = ..Segs.Femur_Dummy;
//            };
//            AnyCylindricalJoint Inter_Connect =
//            {
//              Axis = y;
//              AnyRefFrame& ref0 = ..Segs.Femur_Dummy;
//              AnyRefFrame& ref1 = ..Segs.Patella_Dummy;
//            };
//            AnyCylindricalJoint Patella_Connect =
//            {
//              Axis = z;
//              AnyRefFrame& ref0 = ..Segs.Patella_Dummy;
//              AnyRefFrame& ref1 = REF_HUMAN_BODYMODEL.Right.Leg.Segments.Patella.PatientNode.AnatomicalFrame;
//            };
//          };
//          AnyFolder Measures =
//          {
//            AnyVar Lin_Patella_MedialShift = -.Joints.Femmur_Connect.Pos[0] ;
//            AnyVar Lin_Patella_AnteriorPosterior = .Joints.Inter_Connect.Pos[0];
//            AnyVar Lin_Patella_SuperiorInferior = .Joints.Patella_Connect.Pos[0] ;
//
//            AnyVar Rot_Patella_FlexionExtension = (-1)*.Joints.Femmur_Connect.Pos[1];
//            AnyVar Rot_Patella_MedialSpin = .Joints.Inter_Connect.Pos[1];
//            AnyVar Rot_Patella_MedialTilt = .Joints.Patella_Connect.Pos[1];
//
//            AnyVar Lin_Patella_MedialShift_in_mm = Lin_Patella_MedialShift * 1000;
//            AnyVar Lin_Patella_AnteriorPosterior_in_mm = Lin_Patella_AnteriorPosterior * 1000;
//            AnyVar Lin_Patella_SuperiorInferior_in_mm = Lin_Patella_SuperiorInferior * 1000;
//
//            AnyVar Rot_Patella_FlexionExtension_in_deg = Rot_Patella_FlexionExtension*(180/pi);
//            AnyVar Rot_Patella_MedialSpin_in_deg = Rot_Patella_MedialSpin*(180/pi);
//            AnyVar Rot_Patella_MedialTilt_in_deg = Rot_Patella_MedialTilt*(180/pi);
//          };
//        };//Floating
//      };//Patella
//
//    };//Kinematics

    AnyFolder Forces =
    {
      AnyVar BodyWeight = REF_HUMAN_BODYMODEL.TotalBodyMass * 9.81 ;

      REF_HUMAN_BODYMODEL.Right.Leg.Segments.Shank.PatientNode =
      {
        AnyRefNode OutputNode =
        {
          ARel = RotMat(pi, x) * RotMat(pi, y);
//          AnyDrawRefFrame Drw =
//          {
//            ScaleXYZ = 0.5*{1, 1, 1};
//            RGB = {1, 0, 0};
//          };
        };
      };

      #if USE_FDK == 1
        #ifdef USE_FDK_TIBIOFEMORAL
          AnyFolder TibioFemoral =
          {
            #ifdef PATH_IMPLANT_TIBIA_INSERT_LATERAL_RIGHT_STL_CONTACT
            #ifdef PATH_IMPLANT_FEMUR_RIGHT_STL_CONTACT
            AnyForceMomentMeasure2 Measure_Contact_Lateral =
            {
              AnyForceBase& Force = ....Contacts.Femur_Tibia_Lateral;
              AnyRefFrame& RefNode = REF_HUMAN_BODYMODEL.Right.Leg.Segments.Shank.PatientNode.OutputNode;
              AnySeg& Seg = REF_HUMAN_BODYMODEL.Right.Leg.Segments.Shank;
              AnyVec3 Flocal = F*RefNode.Axes;
              AnyVec3 Mlocal = M*RefNode.Axes;
            };

            AnyVar Contact_Lateral_Total  =  vnorm(Measure_Contact_Lateral.Flocal);
            AnyVar Contact_Lateral_Medial  = Measure_Contact_Lateral.Flocal[2];
            AnyVar Contact_Lateral_Inferior  =  Measure_Contact_Lateral.Flocal[1];
            AnyVar Contact_Lateral_Anterior  =  Measure_Contact_Lateral.Flocal[0];


            AnyVar Ratio_BW_Contact_Lateral_Total = abs(Contact_Lateral_Total) / .BodyWeight ;
            AnyVar Ratio_BW_Contact_Lateral_Medial = abs(Contact_Lateral_Medial) / .BodyWeight ;
            AnyVar Ratio_BW_Contact_Lateral_Inferior = abs(Contact_Lateral_Inferior) / .BodyWeight ;
            AnyVar Ratio_BW_Contact_Lateral_Anterior = abs(Contact_Lateral_Anterior) / .BodyWeight ;

            #endif
            #endif

            #ifdef PATH_IMPLANT_TIBIA_INSERT_MEDIAL_RIGHT_STL_CONTACT
            #ifdef PATH_IMPLANT_FEMUR_RIGHT_STL_CONTACT
            AnyForceMomentMeasure2 Measure_Contact_Medial =
            {
              AnyForceBase& Force = ....Contacts.Femur_Tibia_Medial;
              AnyRefFrame& RefNode = REF_HUMAN_BODYMODEL.Right.Leg.Segments.Shank.PatientNode.OutputNode;
              AnySeg& Seg = REF_HUMAN_BODYMODEL.Right.Leg.Segments.Shank;
              AnyVec3 Flocal = F*RefNode.Axes;
              AnyVec3 Mlocal = M*RefNode.Axes;
            };

            AnyVar Contact_Medial_Total  =  vnorm(Measure_Contact_Medial.Flocal);
            AnyVar Contact_Medial_Medial  = Measure_Contact_Medial.Flocal[2];
            AnyVar Contact_Medial_Inferior  =  Measure_Contact_Medial.Flocal[1];
            AnyVar Contact_Medial_Anterior  =  Measure_Contact_Medial.Flocal[0];


            AnyVar Ratio_BW_Contact_Medial_Total = abs(Contact_Medial_Total) / .BodyWeight ;
            AnyVar Ratio_BW_Contact_Medial_Medial = abs(Contact_Medial_Medial) / .BodyWeight ;
            AnyVar Ratio_BW_Contact_Medial_Inferior = abs(Contact_Medial_Inferior) / .BodyWeight ;
            AnyVar Ratio_BW_Contact_Medial_Anterior = abs(Contact_Medial_Anterior) / .BodyWeight ;

            #endif
            #endif

            #if 0
            // TODO: add measures when ligaments are available
            AnyForceMomentMeasure2 Measure_Effect_aALS =
            {
              AnyForceBase& Force = ....Ligaments.aALS.Force;
              AnyRefFrame& RefNode = REF_HUMAN_BODYMODEL.Right.Leg.Segments.Shank.PatientNode.OutputNode;
              AnySeg& Seg = REF_HUMAN_BODYMODEL.Right.Leg.Segments.Shank;
              AnyVec3 Flocal = F*RefNode.Axes;
              AnyVec3 Mlocal = M*RefNode.Axes;
            };

            AnyForceMomentMeasure2 Measure_Effect_pALS =
            {
              AnyForceBase& Force = ....Ligaments.pALS.Force;
              AnyRefFrame& RefNode = REF_HUMAN_BODYMODEL.Right.Leg.Segments.Shank.PatientNode.OutputNode;
              AnySeg& Seg = REF_HUMAN_BODYMODEL.Right.Leg.Segments.Shank;
              AnyVec3 Flocal = F*RefNode.Axes;
              AnyVec3 Mlocal = M*RefNode.Axes;
            };

            AnyForceMomentMeasure2 Measure_Effect_aLCL =
            {
              AnyForceBase& Force = ....Ligaments.aLCL.Force;
              AnyRefFrame& RefNode = REF_HUMAN_BODYMODEL.Right.Leg.Segments.Shank.PatientNode.OutputNode;
              AnySeg& Seg = REF_HUMAN_BODYMODEL.Right.Leg.Segments.Shank;
              AnyVec3 Flocal = F*RefNode.Axes;
              AnyVec3 Mlocal = M*RefNode.Axes;
            };

            AnyForceMomentMeasure2 Measure_Effect_pLCL =
            {
              AnyForceBase& Force = ....Ligaments.pLCL.Force;
              AnyRefFrame& RefNode = REF_HUMAN_BODYMODEL.Right.Leg.Segments.Shank.PatientNode.OutputNode;
              AnySeg& Seg = REF_HUMAN_BODYMODEL.Right.Leg.Segments.Shank;
              AnyVec3 Flocal = F*RefNode.Axes;
              AnyVec3 Mlocal = M*RefNode.Axes;
            };

            AnyForceMomentMeasure2 Measure_Effect_aMCL =
            {
              AnyForceBase& Force = ....Ligaments.aMCL.Force;
              AnyRefFrame& RefNode = REF_HUMAN_BODYMODEL.Right.Leg.Segments.Shank.PatientNode.OutputNode;
              AnySeg& Seg = REF_HUMAN_BODYMODEL.Right.Leg.Segments.Shank;
              AnyVec3 Flocal = F*RefNode.Axes;
              AnyVec3 Mlocal = M*RefNode.Axes;
            };

            AnyForceMomentMeasure2 Measure_Effect_cMCL =
            {
              AnyForceBase& Force = ....Ligaments.cMCL.Force;
              AnyRefFrame& RefNode = REF_HUMAN_BODYMODEL.Right.Leg.Segments.Shank.PatientNode.OutputNode;
              AnySeg& Seg = REF_HUMAN_BODYMODEL.Right.Leg.Segments.Shank;
              AnyVec3 Flocal = F*RefNode.Axes;
              AnyVec3 Mlocal = M*RefNode.Axes;
            };

            AnyForceMomentMeasure2 Measure_Effect_pMCL =
            {
              AnyForceBase& Force = ....Ligaments.pMCL.Force;
              AnyRefFrame& RefNode = REF_HUMAN_BODYMODEL.Right.Leg.Segments.Shank.PatientNode.OutputNode;
              AnySeg& Seg = REF_HUMAN_BODYMODEL.Right.Leg.Segments.Shank;
              AnyVec3 Flocal = F*RefNode.Axes;
              AnyVec3 Mlocal = M*RefNode.Axes;
            };

            AnyForceMomentMeasure2 Measure_Effect_aCM =
            {
              AnyForceBase& Force = ....Ligaments.aCM.Force;
              AnyRefFrame& RefNode = REF_HUMAN_BODYMODEL.Right.Leg.Segments.Shank.PatientNode.OutputNode;
              AnySeg& Seg = REF_HUMAN_BODYMODEL.Right.Leg.Segments.Shank;
              AnyVec3 Flocal = F*RefNode.Axes;
              AnyVec3 Mlocal = M*RefNode.Axes;
            };

            AnyForceMomentMeasure2 Measure_Effect_pCM =
            {
              AnyForceBase& Force = ....Ligaments.pCM.Force;
              AnyRefFrame& RefNode = REF_HUMAN_BODYMODEL.Right.Leg.Segments.Shank.PatientNode.OutputNode;
              AnySeg& Seg = REF_HUMAN_BODYMODEL.Right.Leg.Segments.Shank;
              AnyVec3 Flocal = F*RefNode.Axes;
              AnyVec3 Mlocal = M*RefNode.Axes;
            };

            AnyForceMomentMeasure2 Measure_Effect_aPCL =
            {
              AnyForceBase& Force = ....Ligaments.aPCL.Force;
              AnyRefFrame& RefNode = REF_HUMAN_BODYMODEL.Right.Leg.Segments.Shank.PatientNode.OutputNode;
              AnySeg& Seg = REF_HUMAN_BODYMODEL.Right.Leg.Segments.Shank;
              AnyVec3 Flocal = F*RefNode.Axes;
              AnyVec3 Mlocal = M*RefNode.Axes;
            };

            AnyForceMomentMeasure2 Measure_Effect_pPCL =
            {
              AnyForceBase& Force = ....Ligaments.pPCL.Force;
              AnyRefFrame& RefNode = REF_HUMAN_BODYMODEL.Right.Leg.Segments.Shank.PatientNode.OutputNode;
              AnySeg& Seg = REF_HUMAN_BODYMODEL.Right.Leg.Segments.Shank;
              AnyVec3 Flocal = F*RefNode.Axes;
              AnyVec3 Mlocal = M*RefNode.Axes;
            };

            AnyForceMomentMeasure2 Measure_Effect_lLcap =
            {
              AnyForceBase& Force = ....Ligaments.lLcap.Force;
              AnyRefFrame& RefNode = REF_HUMAN_BODYMODEL.Right.Leg.Segments.Shank.PatientNode.OutputNode;
              AnySeg& Seg = REF_HUMAN_BODYMODEL.Right.Leg.Segments.Shank;
              AnyVec3 Flocal = F*RefNode.Axes;
              AnyVec3 Mlocal = M*RefNode.Axes;
            };

            AnyForceMomentMeasure2 Measure_Effect_mLcap =
            {
              AnyForceBase& Force = ....Ligaments.mLcap.Force;
              AnyRefFrame& RefNode = REF_HUMAN_BODYMODEL.Right.Leg.Segments.Shank.PatientNode.OutputNode;
              AnySeg& Seg = REF_HUMAN_BODYMODEL.Right.Leg.Segments.Shank;
              AnyVec3 Flocal = F*RefNode.Axes;
              AnyVec3 Mlocal = M*RefNode.Axes;
            };

            AnyForceMomentMeasure2 Measure_Effect_lMcap =
            {
              AnyForceBase& Force = ....Ligaments.lMcap.Force;
              AnyRefFrame& RefNode = REF_HUMAN_BODYMODEL.Right.Leg.Segments.Shank.PatientNode.OutputNode;
              AnySeg& Seg = REF_HUMAN_BODYMODEL.Right.Leg.Segments.Shank;
              AnyVec3 Flocal = F*RefNode.Axes;
              AnyVec3 Mlocal = M*RefNode.Axes;
            };

            AnyForceMomentMeasure2 Measure_Effect_mMcap =
            {
              AnyForceBase& Force = ....Ligaments.mMcap.Force;
              AnyRefFrame& RefNode = REF_HUMAN_BODYMODEL.Right.Leg.Segments.Shank.PatientNode.OutputNode;
              AnySeg& Seg = REF_HUMAN_BODYMODEL.Right.Leg.Segments.Shank;
              AnyVec3 Flocal = F*RefNode.Axes;
              AnyVec3 Mlocal = M*RefNode.Axes;
            };

            AnyForceMomentMeasure2 Measure_Effect_sMPFL =
            {
              AnyForceBase& Force = ....Ligaments.sMPFL.Force;
              AnyRefFrame& RefNode = REF_HUMAN_BODYMODEL.Right.Leg.Segments.Shank.PatientNode.OutputNode;
              AnySeg& Seg = REF_HUMAN_BODYMODEL.Right.Leg.Segments.Shank;
              AnyVec3 Flocal = F*RefNode.Axes;
              AnyVec3 Mlocal = M*RefNode.Axes;
            };

            AnyForceMomentMeasure2 Measure_Effect_mMPFL =
            {
              AnyForceBase& Force = ....Ligaments.mMPFL.Force;
              AnyRefFrame& RefNode = REF_HUMAN_BODYMODEL.Right.Leg.Segments.Shank.PatientNode.OutputNode;
              AnySeg& Seg = REF_HUMAN_BODYMODEL.Right.Leg.Segments.Shank;
              AnyVec3 Flocal = F*RefNode.Axes;
              AnyVec3 Mlocal = M*RefNode.Axes;
            };

            AnyForceMomentMeasure2 Measure_Effect_iMPFL =
            {
              AnyForceBase& Force = ....Ligaments.iMPFL.Force;
              AnyRefFrame& RefNode = REF_HUMAN_BODYMODEL.Right.Leg.Segments.Shank.PatientNode.OutputNode;
              AnySeg& Seg = REF_HUMAN_BODYMODEL.Right.Leg.Segments.Shank;
              AnyVec3 Flocal = F*RefNode.Axes;
              AnyVec3 Mlocal = M*RefNode.Axes;
            };

            AnyForceMomentMeasure2 Measure_Effect_sLPFL =
            {
              AnyForceBase& Force = ....Ligaments.sLPFL.Force;
              AnyRefFrame& RefNode = REF_HUMAN_BODYMODEL.Right.Leg.Segments.Shank.PatientNode.OutputNode;
              AnySeg& Seg = REF_HUMAN_BODYMODEL.Right.Leg.Segments.Shank;
              AnyVec3 Flocal = F*RefNode.Axes;
              AnyVec3 Mlocal = M*RefNode.Axes;
            };

            AnyForceMomentMeasure2 Measure_Effect_mLPFL =
            {
              AnyForceBase& Force = ....Ligaments.mLPFL.Force;
              AnyRefFrame& RefNode = REF_HUMAN_BODYMODEL.Right.Leg.Segments.Shank.PatientNode.OutputNode;
              AnySeg& Seg = REF_HUMAN_BODYMODEL.Right.Leg.Segments.Shank;
              AnyVec3 Flocal = F*RefNode.Axes;
              AnyVec3 Mlocal = M*RefNode.Axes;
            };

            AnyForceMomentMeasure2 Measure_Effect_iLPFL =
            {
              AnyForceBase& Force = ....Ligaments.iLPFL.Force;
              AnyRefFrame& RefNode = REF_HUMAN_BODYMODEL.Right.Leg.Segments.Shank.PatientNode.OutputNode;
              AnySeg& Seg = REF_HUMAN_BODYMODEL.Right.Leg.Segments.Shank;
              AnyVec3 Flocal = F*RefNode.Axes;
              AnyVec3 Mlocal = M*RefNode.Axes;
            };

            AnyForceMomentMeasure2 Measure_Effect_Ligament_All =
            {
              IncludeForces = ObjSearch("....Ligaments.*.Force");
              AnyRefFrame& RefNode = REF_HUMAN_BODYMODEL.Right.Leg.Segments.Shank.PatientNode.OutputNode;
              AnySeg& Seg = REF_HUMAN_BODYMODEL.Right.Leg.Segments.Shank;
              AnyVec3 Flocal = F*RefNode.Axes;
              AnyVec3 Mlocal = M*RefNode.Axes;
            };

            AnyForceMomentMeasure2 Measure_Effect_Muscles_All =
            {
              IncludeForces = ....MomentMeasure.KneeNetMomentMuscle.IncludeForces;
              IncludeSegments = ....MomentMeasure.KneeNetMomentMuscle.IncludeSegments;
              AnyRefFrame& RefNode  = REF_HUMAN_BODYMODEL.Right.Leg.Segments.Shank.PatientNode.OutputNode ;
              AnyVec3 Flocal = F*RefNode.Axes;
              AnyVec3 Mlocal = M*RefNode.Axes;
            };

            #endif

          };
        #endif

//        #ifdef USE_FDK_PATELLOFEMORAL
//          AnyFolder PatelloFemoral =
//          {
//            AnyVar ContactForce = abs(vnorm(...Contacts.Femur_Patella.Fmaster));
//            AnyVar Contact_Stress =
//            NONE_ZERO_DIVISION(ContactForce, ...Contacts.Femur_Patella.ContactArea, 1e-5);
//
//            AnyVar Contact_Ratio_BW = ContactForce / .BodyWeight;
//          };
//        #endif
//
//        AnyFolder PatelloTibial =
//        {
//          AnyVar TendonForce = abs(REF_HUMAN_BODYMODEL.Right.Leg.Jnt.PatellaMovement.Reaction.Fout[0]);
//          AnyVar TendonForce_Ratio_BW = TendonForce / .BodyWeight;
//        };

      #endif
    };
  };
};
