#include "ScalingInterfaceConfig.any"

AnyFolder Morphing = {

  AnyFolder Settings = {
    AnyInt LandmarkNumber = 2500;  //default landmark number for RBF morphings
  };

  // Currently surface filenames, eventually may be redundant and taken from AMMR
  AnyFolder SourceData = {
    #include "<USER_PATH_COMMONS>\Morphing\Config.any"
  };

   #ifdef _override_scaling_for_Pelvis
   MORPHING_FUNC Pelvis(
     REF_BODY_PART= Main.HumanModel.BodyModel.Trunk.Segments.PelvisSeg,
     REF_BODY_PART_SCALING = Main.HumanModel.Scaling.GeometricalScaling.PelvisSeg,
     CUSTOM_NODE = PatientNode,
     PELVIS=1
   ) = {};
   #endif


#if BM_LEG_RIGHT == ON

   #ifdef _override_scaling_for_Right_Thigh
   MORPHING_FUNC RightThigh(
     REF_BODY_PART= Main.HumanModel.BodyModel.Right.Leg.Segments.Thigh,
     REF_BODY_PART_SCALING = Main.HumanModel.Scaling.GeometricalScaling.Right.Thigh,
     CUSTOM_NODE = PatientNode
   ) = {};
   #endif


   #ifdef _override_scaling_for_Right_Shank
   MORPHING_FUNC RightShank(
     REF_BODY_PART= Main.HumanModel.BodyModel.Right.Leg.Segments.Shank,
     REF_BODY_PART_SCALING = Main.HumanModel.Scaling.GeometricalScaling.Right.Shank,
     CUSTOM_NODE = PatientNode
   ) = {};
   #endif

   #ifdef _override_scaling_for_Right_Patella
   MORPHING_FUNC RightPatella(
     REF_BODY_PART= Main.HumanModel.BodyModel.Right.Leg.Segments.Patella,
     REF_BODY_PART_SCALING = Main.HumanModel.Scaling.GeometricalScaling.Right.Patella,
     CUSTOM_NODE = PatientNode
   ) = {};
   #endif

#endif


// This is a place holder for the inclusion of custom scaling laws
#if BM_LEG_LEFT == ON

   #ifdef _override_scaling_for_Left_Thigh
   MORPHING_FUNC LeftThigh(
     REF_BODY_PART= Main.HumanModel.BodyModel.Left.Leg.Segments.Thigh,
     REF_BODY_PART_SCALING = Main.HumanModel.Scaling.GeometricalScaling.Left.Thigh,
     CUSTOM_NODE = PatientNode
   ) = {};
   #endif


   #ifdef _override_scaling_for_Left_Shank
   MORPHING_FUNC LeftShank(
     REF_BODY_PART= Main.HumanModel.BodyModel.Left.Leg.Segments.Shank,
     REF_BODY_PART_SCALING = Main.HumanModel.Scaling.GeometricalScaling.Left.Shank,
     CUSTOM_NODE = PatientNode
   ) = {};
   #endif

   #ifdef _override_scaling_for_Left_Patella
   MORPHING_FUNC LeftPatella(
     REF_BODY_PART= Main.HumanModel.BodyModel.Left.Leg.Segments.Patella,
     REF_BODY_PART_SCALING = Main.HumanModel.Scaling.GeometricalScaling.Left.Patella,
     CUSTOM_NODE = PatientNode
   ) = {};
   #endif

#endif
};
