TensorFasciaeLatae = {
  AnyMuscleViaPoint TensorFasciaeLatae1New =
  {
    AnyMuscleModel& MusMdl = ...MuscleModels.TensorFasciaeLatae1NewPar;
    AnyRefFrame& Org = .TensorFasciaeLatae1.Org;
    AnyRefFrame& Ins = ...Seg.Shank.TensorFasciaeLatae1NodeNew;

    AnyDrawMuscle DrwMus = {#include "<PATH_DRAWSETTINGS_AMMR>/MusDrawSettings.any"};
  };

  AnyMuscleViaPoint TensorFasciaeLatae2New =
  {
    AnyMuscleModel& MusMdl = ...MuscleModels.TensorFasciaeLatae2NewPar;
    AnyRefFrame& Org = .TensorFasciaeLatae2.Org;
    AnyRefFrame& Ins = ...Seg.Shank.TensorFasciaeLatae2NodeNew;

    AnyDrawMuscle DrwMus = {#include "<PATH_DRAWSETTINGS_AMMR>/MusDrawSettings.any"};
  };
};

BicepsFemorisCaputLongum = {
  AnyMuscleViaPoint BicepsFemorisCaputLongum1New =
  {
    AnyMuscleModel& MusMdl = ...MuscleModels.BicepsFemorisCaputLongum1NewPar;
    AnyRefFrame& Org = .BicepsFemorisCaputLongum1.Org;
    AnyRefFrame& Ins = ...Seg.Shank.BicepsFemorisCaputLongum1NodeNew;

    AnyDrawMuscle DrwMus = {#include "<PATH_DRAWSETTINGS_AMMR>/MusDrawSettings.any"};
  };
};

BicepsFemorisCaputBreve = {
  AnyMuscleShortestPath BicepsFemorisCaputBreve1New =
  {
    AnyMuscleModel& MusMdl = ...MuscleModels.BicepsFemorisCaputBreve1NewPar ;
    AnyRefFrame& Org = .BicepsFemorisCaputBreve1.Org;
    AnyParamSurf& srf = .BicepsFemorisCaputBreve1.srf;
    AnyRefFrame& Ins = ...Seg.Shank.BicepsFemorisCaputBreve1NodeNew;

    SPLine =
    {
      StringMesh = ..BicepsFemorisCaputBreve1.SPLine.StringMesh;
      InitWrapPosVecArr = ..BicepsFemorisCaputBreve1.SPLine.InitWrapPosVecArr;
    };

    AnyDrawMuscle DrwMus = {#include "<PATH_DRAWSETTINGS_AMMR>/MusDrawSettings.any"};
  };

  AnyMuscleShortestPath BicepsFemorisCaputBreve2New =
  {
    AnyMuscleModel& MusMdl = ...MuscleModels.BicepsFemorisCaputBreve2NewPar ;
    AnyRefFrame& Org = .BicepsFemorisCaputBreve2.Org;
    AnyParamSurf& srf = .BicepsFemorisCaputBreve2.srf;
    AnyRefFrame& Ins = ...Seg.Shank.BicepsFemorisCaputBreve2NodeNew;

    SPLine =
    {
      StringMesh = ..BicepsFemorisCaputBreve2.SPLine.StringMesh;
      InitWrapPosVecArr = ..BicepsFemorisCaputBreve2.SPLine.InitWrapPosVecArr;
    };

    AnyDrawMuscle DrwMus = {#include "<PATH_DRAWSETTINGS_AMMR>/MusDrawSettings.any"};
  };

  AnyMuscleShortestPath BicepsFemorisCaputBreve3New =
  {
    AnyMuscleModel& MusMdl = ...MuscleModels.BicepsFemorisCaputBreve3NewPar ;
    AnyRefFrame& Org = .BicepsFemorisCaputBreve3.Org;
    AnyParamSurf& srf = .BicepsFemorisCaputBreve3.srf;
    AnyRefFrame& Ins = ...Seg.Shank.BicepsFemorisCaputBreve3NodeNew;

    SPLine =
    {
      StringMesh = ..BicepsFemorisCaputBreve3.SPLine.StringMesh;
      InitWrapPosVecArr = ..BicepsFemorisCaputBreve3.SPLine.InitWrapPosVecArr;
    };

    AnyDrawMuscle DrwMus = {#include "<PATH_DRAWSETTINGS_AMMR>/MusDrawSettings.any"};
  };
};

RectusFemoris = {
  AnyMuscleShortestPath RectusFemoris1New =
  {
    AnyMuscleModel& MusMdl = ...MuscleModels.RectusFemoris1NewPar;
    AnyRefFrame& Org = .RectusFemoris1.Org;
    AnyRefFrame& Ins = .RectusFemoris1.Ins;
    AnyParamSurf& srf1 =  ...Seg.Thigh.IliacusWrapSurfNew.Surf;
    AnyParamSurf& srf2 = .RectusFemoris1.srf2;

    SPLine =
    {
      StringMesh = ..RectusFemoris1.SPLine.StringMesh;
      InitWrapPosVecArr = ..RectusFemoris1.SPLine.InitWrapPosVecArr;
    };
    AnyDrawMuscle DrwMus = {#include "<PATH_DRAWSETTINGS_AMMR>/MusDrawSettings.any"};
  };//RectusFemoris1New

  AnyMuscleShortestPath RectusFemoris2New =
  {
    AnyMuscleModel& MusMdl = ...MuscleModels.RectusFemoris2NewPar;
    AnyRefFrame& Org = .RectusFemoris2.Org;
    AnyRefFrame& Ins = .RectusFemoris2.Ins;
    AnyParamSurf& srf1 =  ...Seg.Thigh.IliacusWrapSurfNew.Surf;
    AnyParamSurf& srf2 = .RectusFemoris2.srf2;

    SPLine =
    {
      StringMesh = ..RectusFemoris2.SPLine.StringMesh;
      InitWrapPosVecArr = ..RectusFemoris2.SPLine.InitWrapPosVecArr;
    };
    AnyDrawMuscle DrwMus = {#include "<PATH_DRAWSETTINGS_AMMR>/MusDrawSettings.any"};
  };//RectusFemoris2New
};

IliacusMid = {
  AnyMuscleShortestPath IliacusMid1New =
  {
    AnyMuscleModel& MusMdl = ...MuscleModels.IliacusMid1NewPar;
    AnyRefFrame& Org = .IliacusMid1.Org;
    AnyRefFrame& Via1 = .IliacusMid1.Via1;
    AnyRefFrame& Ins = .IliacusMid1.Ins;
    AnyParamSurf& srf =  ...Seg.Thigh.IliacusWrapSurfNew.Surf;
    SPLine =
    {
      StringMesh = ..IliacusMid1.SPLine.StringMesh;
      InitWrapPosVecArr = ..IliacusMid1.SPLine.InitWrapPosVecArr;
    };
    AnyDrawMuscle DrwMus = {#include "<PATH_DRAWSETTINGS_AMMR>/MusDrawSettings.any"};
  };//IliacusMid2New

  AnyMuscleShortestPath IliacusMid2New =
  {
    AnyMuscleModel& MusMdl = ...MuscleModels.IliacusMid2NewPar;
    AnyRefFrame& Org = .IliacusMid2.Org;
    AnyRefFrame& Via1 = .IliacusMid2.Via1;
    AnyRefFrame& Ins = .IliacusMid2.Ins;
    AnyParamSurf& srf =  ...Seg.Thigh.IliacusWrapSurfNew.Surf;
    SPLine =
    {
      StringMesh = ..IliacusMid2.SPLine.StringMesh;
      InitWrapPosVecArr = ..IliacusMid2.SPLine.InitWrapPosVecArr;
    };
    AnyDrawMuscle DrwMus = {#include "<PATH_DRAWSETTINGS_AMMR>/MusDrawSettings.any"};
  };//IliacusMid2New
};

IliacusMedialis = {
  AnyMuscleShortestPath IliacusMedialis1New =
  {
    AnyMuscleModel& MusMdl = ...MuscleModels.IliacusMedialis1NewPar;
    AnyRefFrame& Org = .IliacusMedialis1.Org;
    AnyRefFrame& Via1 = .IliacusMedialis1.Via1;
    AnyRefFrame& Ins = .IliacusMedialis1.Ins;
    AnyParamSurf& srf =  ...Seg.Thigh.IliacusWrapSurfNew.Surf;
    SPLine =
    {
      StringMesh = ..IliacusMedialis1.SPLine.StringMesh;
      InitWrapPosVecArr = ..IliacusMedialis1.SPLine.InitWrapPosVecArr;
    };
    AnyDrawMuscle DrwMus = {#include "<PATH_DRAWSETTINGS_AMMR>/MusDrawSettings.any"};
  };//IliacusMedialis1New

  AnyMuscleShortestPath IliacusMedialis2New =
  {
    AnyMuscleModel& MusMdl = ...MuscleModels.IliacusMedialis2NewPar;
    AnyRefFrame& Org = .IliacusMedialis2.Org;
    AnyRefFrame& Via1 = .IliacusMedialis2.Via1;
    AnyRefFrame& Ins = .IliacusMedialis2.Ins;
    AnyParamSurf& srf =  ...Seg.Thigh.IliacusWrapSurfNew.Surf;
    SPLine =
    {
      StringMesh = ..IliacusMedialis2.SPLine.StringMesh;
      InitWrapPosVecArr = ..IliacusMedialis2.SPLine.InitWrapPosVecArr;
    };
    AnyDrawMuscle DrwMus = {#include "<PATH_DRAWSETTINGS_AMMR>/MusDrawSettings.any"};
  };//IliacusMedialis2New
};

//AnyMuscleShortestPath Pectineus1New =
//{
//  AnyMuscleModel& MusMdl = ..MuscleModels.Pectineus1NewPar;
//  AnyRefFrame& Org = .Pectineus1.Org;
//  AnyRefFrame& Ins = .Pectineus1.Ins;
//  AnyParamSurf& srf =  ..Seg.Thigh.IliacusWrapSurfNew.Surf;
//  SPLine =
//  {
//    StringMesh = ..Pectineus1.SPLine.StringMesh;
//
//  };
//  AnyDrawMuscle DrwMus = {#include "<PATH_DRAWSETTINGS_AMMR>/MusDrawSettings.any"};
//};//Pectineus1New
//
//AnyMuscleShortestPath Pectineus2New =
//{
//  AnyMuscleModel& MusMdl = ..MuscleModels.Pectineus2NewPar;
//  AnyRefFrame& Org = .Pectineus2.Org;
//  AnyRefFrame& Ins = .Pectineus2.Ins;
//  AnyParamSurf& srf =  ..Seg.Thigh.IliacusWrapSurfNew.Surf;
//  SPLine =
//  {
//    StringMesh = ..Pectineus2.SPLine.StringMesh;
//
//  };
//  AnyDrawMuscle DrwMus = {#include "<PATH_DRAWSETTINGS_AMMR>/MusDrawSettings.any"};
//};//Pectineus2New
//
//AnyMuscleShortestPath Pectineus3New =
//{
//  AnyMuscleModel& MusMdl = ..MuscleModels.Pectineus3NewPar;
//  AnyRefFrame& Org = .Pectineus3.Org;
//  AnyRefFrame& Ins = .Pectineus3.Ins;
//  AnyParamSurf& srf =  ..Seg.Thigh.IliacusWrapSurfNew.Surf;
//  SPLine =
//  {
//    StringMesh = ..Pectineus3.SPLine.StringMesh;
//
//  };
//  AnyDrawMuscle DrwMus = {#include "<PATH_DRAWSETTINGS_AMMR>/MusDrawSettings.any"};
//};//Pectineus3New
//
//AnyMuscleShortestPath Pectineus4New =
//{
//  AnyMuscleModel& MusMdl = ..MuscleModels.Pectineus4NewPar;
//  AnyRefFrame& Org = .Pectineus4.Org;
//  AnyRefFrame& Ins = .Pectineus4.Ins;
//  AnyParamSurf& srf =  ..Seg.Thigh.IliacusWrapSurfNew.Surf;
//  SPLine =
//  {
//    StringMesh = ..Pectineus4.SPLine.StringMesh;
//
//  };
//  AnyDrawMuscle DrwMus = {#include "<PATH_DRAWSETTINGS_AMMR>/MusDrawSettings.any"};
//};//Pectineus4New
