AnyObjectPtrArray pArrMusList = ObjSearch("*.*", "AnyMuscle");

PsoasMajor.PsoasMajor_PMT12I_TM= { #include "MusAdditions.any" };
PsoasMajor.PsoasMajor_PML1I_TM= { #include "MusAdditions.any" };
PsoasMajor.PsoasMajor_PML1T_TM= { #include "MusAdditions.any" };
PsoasMajor.PsoasMajor_PML2I_TM= { #include "MusAdditions.any" };
PsoasMajor.PsoasMajor_PML2T_TM= { #include "MusAdditions.any" };
PsoasMajor.PsoasMajor_PML3I_TM= { #include "MusAdditions.any" };
PsoasMajor.PsoasMajor_PML3T_TM= { #include "MusAdditions.any" };
PsoasMajor.PsoasMajor_PML4I_TM= { #include "MusAdditions.any" };
PsoasMajor.PsoasMajor_PML4T_TM= { #include "MusAdditions.any" };
PsoasMajor.PsoasMajor_PML5_TM= { #include "MusAdditions.any" };
PsoasMajor.PsoasMajor_PML5T_TM= { #include "MusAdditions.any" };
SoleusMedialis.SoleusMedialis1= { #include "MusAdditions.any" };
SoleusMedialis.SoleusMedialis2= { #include "MusAdditions.any" };
SoleusMedialis.SoleusMedialis3= { #include "MusAdditions.any" };
SoleusLateralis.SoleusLateralis1= { #include "MusAdditions.any" };
SoleusLateralis.SoleusLateralis2= { #include "MusAdditions.any" };
SoleusLateralis.SoleusLateralis3= { #include "MusAdditions.any" };
GastrocnemiusLateralis.GastrocnemiusLateralis1= { #include "MusAdditions.any" };
GastrocnemiusMedialis.GastrocnemiusMedialis1= { #include "MusAdditions.any" };
FlexorDigitorumLongus.FlexorDigitorumLongus1= { #include "MusAdditions.any" };
FlexorDigitorumLongus.FlexorDigitorumLongus2= { #include "MusAdditions.any" };
FlexorDigitorumLongus.FlexorDigitorumLongus3= { #include "MusAdditions.any" };
FlexorDigitorumLongus.FlexorDigitorumLongus4= { #include "MusAdditions.any" };
FlexorHallucisLongus.FlexorHallucisLongus1= { #include "MusAdditions.any" };
FlexorHallucisLongus.FlexorHallucisLongus2= { #include "MusAdditions.any" };
FlexorHallucisLongus.FlexorHallucisLongus3= { #include "MusAdditions.any" };
TibialisPosteriorLateralis.TibialisPosteriorLateralis1= { #include "MusAdditions.any" };
TibialisPosteriorLateralis.TibialisPosteriorLateralis2= { #include "MusAdditions.any" };
TibialisPosteriorLateralis.TibialisPosteriorLateralis3= { #include "MusAdditions.any" };
TibialisPosteriorMedialis.TibialisPosteriorMedialis1= { #include "MusAdditions.any" };
TibialisPosteriorMedialis.TibialisPosteriorMedialis2= { #include "MusAdditions.any" };
TibialisPosteriorMedialis.TibialisPosteriorMedialis3= { #include "MusAdditions.any" };
TibialisAnterior.TibialisAnterior1= { #include "MusAdditions.any" };
TibialisAnterior.TibialisAnterior2= { #include "MusAdditions.any" };
TibialisAnterior.TibialisAnterior3= { #include "MusAdditions.any" };
PeroneusBrevis.PeroneusBrevis1= { #include "MusAdditions.any" };
PeroneusBrevis.PeroneusBrevis2= { #include "MusAdditions.any" };
PeroneusBrevis.PeroneusBrevis3= { #include "MusAdditions.any" };
PeroneusLongus.PeroneusLongus1= { #include "MusAdditions.any" };
PeroneusLongus.PeroneusLongus2= { #include "MusAdditions.any" };
PeroneusLongus.PeroneusLongus3= { #include "MusAdditions.any" };
ExtensorDigitorumLongus.ExtensorDigitorumLongus1= { #include "MusAdditions.any" };
ExtensorDigitorumLongus.ExtensorDigitorumLongus2= { #include "MusAdditions.any" };
ExtensorDigitorumLongus.ExtensorDigitorumLongus3= { #include "MusAdditions.any" };
ExtensorDigitorumLongus.ExtensorDigitorumLongus4= { #include "MusAdditions.any" };
ExtensorHallucisLongus.ExtensorHallucisLongus1= { #include "MusAdditions.any" };
ExtensorHallucisLongus.ExtensorHallucisLongus2= { #include "MusAdditions.any" };
ExtensorHallucisLongus.ExtensorHallucisLongus3= { #include "MusAdditions.any" };
VastusLateralisInferior.VastusLateralisInferior1= { #include "MusAdditions.any" };
VastusLateralisInferior.VastusLateralisInferior2= { #include "MusAdditions.any" };
VastusLateralisInferior.VastusLateralisInferior3= { #include "MusAdditions.any" };
VastusLateralisInferior.VastusLateralisInferior4= { #include "MusAdditions.any" };
VastusLateralisInferior.VastusLateralisInferior5= { #include "MusAdditions.any" };
VastusLateralisInferior.VastusLateralisInferior6= { #include "MusAdditions.any" };
VastusLateralisSuperior.VastusLateralisSuperior1= { #include "MusAdditions.any" };
VastusLateralisSuperior.VastusLateralisSuperior2= { #include "MusAdditions.any" };
VastusMedialisInferior.VastusMedialisInferior1= { #include "MusAdditions.any" };
VastusMedialisInferior.VastusMedialisInferior2= { #include "MusAdditions.any" };
VastusMedialisMid.VastusMedialisMid1= { #include "MusAdditions.any" };
VastusMedialisMid.VastusMedialisMid2= { #include "MusAdditions.any" };
VastusMedialisSuperior.VastusMedialisSuperior1= { #include "MusAdditions.any" };
VastusMedialisSuperior.VastusMedialisSuperior2= { #include "MusAdditions.any" };
VastusMedialisSuperior.VastusMedialisSuperior3= { #include "MusAdditions.any" };
VastusMedialisSuperior.VastusMedialisSuperior4= { #include "MusAdditions.any" };
VastusIntermedius.VastusIntermedius1= { #include "MusAdditions.any" };
VastusIntermedius.VastusIntermedius2= { #include "MusAdditions.any" };
VastusIntermedius.VastusIntermedius3= { #include "MusAdditions.any" };
VastusIntermedius.VastusIntermedius4= { #include "MusAdditions.any" };
VastusIntermedius.VastusIntermedius5= { #include "MusAdditions.any" };
VastusIntermedius.VastusIntermedius6= { #include "MusAdditions.any" };
RectusFemoris.RectusFemoris1= { #include "MusAdditions.any" };
RectusFemoris.RectusFemoris2= { #include "MusAdditions.any" };
Semitendinosus.Semitendinosus1= { #include "MusAdditions.any" };
Semimembranosus.Semimembranosus1= { #include "MusAdditions.any" };
Semimembranosus.Semimembranosus2= { #include "MusAdditions.any" };
Semimembranosus.Semimembranosus3= { #include "MusAdditions.any" };
BicepsFemorisCaputLongum.BicepsFemorisCaputLongum1= { #include "MusAdditions.any" };
BicepsFemorisCaputBreve.BicepsFemorisCaputBreve1= { #include "MusAdditions.any" };
BicepsFemorisCaputBreve.BicepsFemorisCaputBreve2= { #include "MusAdditions.any" };
BicepsFemorisCaputBreve.BicepsFemorisCaputBreve3= { #include "MusAdditions.any" };
Sartorius.Sartorius1= { #include "MusAdditions.any" };
IliacusLateralis.IliacusLateralis1= { #include "MusAdditions.any" };
IliacusLateralis.IliacusLateralis2= { #include "MusAdditions.any" };
IliacusMid.IliacusMid1= { #include "MusAdditions.any" };
IliacusMid.IliacusMid2= { #include "MusAdditions.any" };
IliacusMedialis.IliacusMedialis1= { #include "MusAdditions.any" };
IliacusMedialis.IliacusMedialis2= { #include "MusAdditions.any" };
GluteusMinimus.GluteusMinimusAnterior1= { #include "MusAdditions.any" };
GluteusMinimus.GluteusMinimusMid1= { #include "MusAdditions.any" };
GluteusMinimus.GluteusMinimusPosterior1= { #include "MusAdditions.any" };
GluteusMediusAnterior.GluteusMediusAnterior1= { #include "MusAdditions.any" };
GluteusMediusAnterior.GluteusMediusAnterior2= { #include "MusAdditions.any" };
GluteusMediusAnterior.GluteusMediusAnterior3= { #include "MusAdditions.any" };
GluteusMediusAnterior.GluteusMediusAnterior4= { #include "MusAdditions.any" };
GluteusMediusAnterior.GluteusMediusAnterior5= { #include "MusAdditions.any" };
GluteusMediusAnterior.GluteusMediusAnterior6= { #include "MusAdditions.any" };
GluteusMediusPosterior.GluteusMediusPosterior1= { #include "MusAdditions.any" };
GluteusMediusPosterior.GluteusMediusPosterior2= { #include "MusAdditions.any" };
GluteusMediusPosterior.GluteusMediusPosterior3= { #include "MusAdditions.any" };
GluteusMediusPosterior.GluteusMediusPosterior4= { #include "MusAdditions.any" };
GluteusMediusPosterior.GluteusMediusPosterior5= { #include "MusAdditions.any" };
GluteusMediusPosterior.GluteusMediusPosterior6= { #include "MusAdditions.any" };
GluteusMaximusSuperior.GluteusMaximusSuperior1= { #include "MusAdditions.any" };
GluteusMaximusSuperior.GluteusMaximusSuperior2= { #include "MusAdditions.any" };
GluteusMaximusSuperior.GluteusMaximusSuperior3= { #include "MusAdditions.any" };
GluteusMaximusSuperior.GluteusMaximusSuperior4= { #include "MusAdditions.any" };
GluteusMaximusSuperior.GluteusMaximusSuperior5= { #include "MusAdditions.any" };
GluteusMaximusSuperior.GluteusMaximusSuperior6= { #include "MusAdditions.any" };
GluteusMaximusInferior.GluteusMaximusInferior1= { #include "MusAdditions.any" };
GluteusMaximusInferior.GluteusMaximusInferior2= { #include "MusAdditions.any" };
GluteusMaximusInferior.GluteusMaximusInferior3= { #include "MusAdditions.any" };
GluteusMaximusInferior.GluteusMaximusInferior4= { #include "MusAdditions.any" };
GluteusMaximusInferior.GluteusMaximusInferior5= { #include "MusAdditions.any" };
GluteusMaximusInferior.GluteusMaximusInferior6= { #include "MusAdditions.any" };
TensorFasciaeLatae.TensorFasciaeLatae1= { #include "MusAdditions.any" };
TensorFasciaeLatae.TensorFasciaeLatae2= { #include "MusAdditions.any" };
Piriformis.Piriformis1= { #include "MusAdditions.any" };
Gracilis.Gracilis1= { #include "MusAdditions.any" };
Gracilis.Gracilis2= { #include "MusAdditions.any" };
AdductorLongus.AdductorLongus1= { #include "MusAdditions.any" };
AdductorLongus.AdductorLongus2= { #include "MusAdditions.any" };
AdductorLongus.AdductorLongus3= { #include "MusAdditions.any" };
AdductorLongus.AdductorLongus4= { #include "MusAdditions.any" };
AdductorLongus.AdductorLongus5= { #include "MusAdditions.any" };
AdductorLongus.AdductorLongus6= { #include "MusAdditions.any" };
AdductorMagnusDistal.AdductorMagnusDistal1= { #include "MusAdditions.any" };
AdductorMagnusDistal.AdductorMagnusDistal2= { #include "MusAdditions.any" };
AdductorMagnusDistal.AdductorMagnusDistal3= { #include "MusAdditions.any" };
AdductorMagnusMid.AdductorMagnusMid1= { #include "MusAdditions.any" };
AdductorMagnusMid.AdductorMagnusMid2= { #include "MusAdditions.any" };
AdductorMagnusMid.AdductorMagnusMid3= { #include "MusAdditions.any" };
AdductorMagnusMid.AdductorMagnusMid4= { #include "MusAdditions.any" };
AdductorMagnusMid.AdductorMagnusMid5= { #include "MusAdditions.any" };
AdductorMagnusMid.AdductorMagnusMid6= { #include "MusAdditions.any" };
AdductorMagnusProximal.AdductorMagnusProximal1= { #include "MusAdditions.any" };
AdductorMagnusProximal.AdductorMagnusProximal2= { #include "MusAdditions.any" };
AdductorMagnusProximal.AdductorMagnusProximal3= { #include "MusAdditions.any" };
AdductorMagnusProximal.AdductorMagnusProximal4= { #include "MusAdditions.any" };
AdductorBrevisProximal.AdductorBrevisProximal1= { #include "MusAdditions.any" };
AdductorBrevisProximal.AdductorBrevisProximal2= { #include "MusAdditions.any" };
AdductorBrevisMid.AdductorBrevisMid1= { #include "MusAdditions.any" };
AdductorBrevisMid.AdductorBrevisMid2= { #include "MusAdditions.any" };
AdductorBrevisDistal.AdductorBrevisDistal1= { #include "MusAdditions.any" };
AdductorBrevisDistal.AdductorBrevisDistal2= { #include "MusAdditions.any" };
Gemellus.GemellusInferior1= { #include "MusAdditions.any" };
Gemellus.GemellusSuperior1= { #include "MusAdditions.any" };
ObturatorExternusSuperior.ObturatorExternusSuperior1= { #include "MusAdditions.any" };
ObturatorExternusSuperior.ObturatorExternusSuperior2= { #include "MusAdditions.any" };
ObturatorExternusSuperior.ObturatorExternusSuperior3= { #include "MusAdditions.any" };
ObturatorExternusInferior.ObturatorExternusInferior1= { #include "MusAdditions.any" };
ObturatorExternusInferior.ObturatorExternusInferior2= { #include "MusAdditions.any" };
ObturatorInternus.ObturatorInternus1= { #include "MusAdditions.any" };
ObturatorInternus.ObturatorInternus2= { #include "MusAdditions.any" };
ObturatorInternus.ObturatorInternus3= { #include "MusAdditions.any" };
ObturatorInternus.ObturatorInternus4= { #include "MusAdditions.any" };
ObturatorInternus.ObturatorInternus5= { #include "MusAdditions.any" };
ObturatorInternus.ObturatorInternus6= { #include "MusAdditions.any" };
Pectineus.Pectineus1= { #include "MusAdditions.any" };
Pectineus.Pectineus2= { #include "MusAdditions.any" };
Pectineus.Pectineus3= { #include "MusAdditions.any" };
Pectineus.Pectineus4= { #include "MusAdditions.any" };
Plantaris.Plantaris1= { #include "MusAdditions.any" };
Popliteus.Popliteus1= { #include "MusAdditions.any" };
Popliteus.Popliteus2= { #include "MusAdditions.any" };
Popliteus.Popliteus3= { #include "MusAdditions.any" };
QuadratusFemoris.QuadratusFemoris1= { #include "MusAdditions.any" };
QuadratusFemoris.QuadratusFemoris2= { #include "MusAdditions.any" };
QuadratusFemoris.QuadratusFemoris3= { #include "MusAdditions.any" };
QuadratusFemoris.QuadratusFemoris4= { #include "MusAdditions.any" };

TensorFasciaeLatae.TensorFasciaeLatae1New= { #include "MusAdditions.any" };
TensorFasciaeLatae.TensorFasciaeLatae2New= { #include "MusAdditions.any" };
BicepsFemorisCaputLongum.BicepsFemorisCaputLongum1New= { #include "MusAdditions.any" };
BicepsFemorisCaputBreve.BicepsFemorisCaputBreve1New= { #include "MusAdditions.any" };
BicepsFemorisCaputBreve.BicepsFemorisCaputBreve2New= { #include "MusAdditions.any" };
BicepsFemorisCaputBreve.BicepsFemorisCaputBreve3New= { #include "MusAdditions.any" };
RectusFemoris.RectusFemoris1New= { #include "MusAdditions.any" };
RectusFemoris.RectusFemoris2New= { #include "MusAdditions.any" };
IliacusMid.IliacusMid1New= { #include "MusAdditions.any" };
IliacusMid.IliacusMid2New= { #include "MusAdditions.any" };
IliacusMedialis.IliacusMedialis1New= { #include "MusAdditions.any" };
IliacusMedialis.IliacusMedialis2New= { #include "MusAdditions.any" };
//Pectineus1New= { #include "MusAdditions.any" };
//Pectineus2New= { #include "MusAdditions.any" };
//Pectineus3New= { #include "MusAdditions.any" };
//Pectineus4New= { #include "MusAdditions.any" };
