#define RETURN_OBJ_MUSCLE(strMusFolder,strMusName) ObjSearchRecursive(strMusFolder, strMusName, "AnyMuscle")
#define RETURN_OBJ_SPLINE(strMusFolder,strMusName) ObjSearchRecursive(strMusFolder+"."+strMusName, "*", "AnyMechObject")
//#define RETURN_OBJ_MUSCLEMODEL(strMusFolder,strMusName)

AnyFolder ExcludedMuscles =
{
  AnyObjectPtr pArrMuscles = arrcat
  (
    arrcat(
    RETURN_OBJ_MUSCLE("..Mus", "TensorFasciaeLatae1"),
    RETURN_OBJ_MUSCLE("..Mus", "TensorFasciaeLatae2")
    ),
    arrcat(
    RETURN_OBJ_MUSCLE("..Mus", "BicepsFemorisCaputLongum1"),
    RETURN_OBJ_MUSCLE("..Mus", "BicepsFemorisCaputBreve1"),
    RETURN_OBJ_MUSCLE("..Mus", "BicepsFemorisCaputBreve2"),
    RETURN_OBJ_MUSCLE("..Mus", "BicepsFemorisCaputBreve3")
    ),
    arrcat(
    RETURN_OBJ_MUSCLE("..Mus", "RectusFemoris1"),
    RETURN_OBJ_MUSCLE("..Mus", "RectusFemoris2")
    ),
    arrcat(
    RETURN_OBJ_MUSCLE("..Mus", "IliacusMid1"),
    RETURN_OBJ_MUSCLE("..Mus", "IliacusMid2")
    ),
    arrcat(
    RETURN_OBJ_MUSCLE("..Mus", "IliacusMedialis1"),
    RETURN_OBJ_MUSCLE("..Mus", "IliacusMedialis2")
    )
//    arrcat(
//    RETURN_OBJ_MUSCLE("..Mus", "Pectineus1"),
//    RETURN_OBJ_MUSCLE("..Mus", "Pectineus2"),
//    RETURN_OBJ_MUSCLE("..Mus", "Pectineus3"),
//    RETURN_OBJ_MUSCLE("..Mus", "Pectineus4")
//    )
  );
  AnyObjectPtr pArrSPLines = arrcat
  (
    arrcat(
    RETURN_OBJ_SPLINE("..Mus", "TensorFasciaeLatae1"),
    RETURN_OBJ_SPLINE("..Mus", "TensorFasciaeLatae2")
    ),
    arrcat(
    RETURN_OBJ_SPLINE("..Mus", "BicepsFemorisCaputLongum1"),
    RETURN_OBJ_SPLINE("..Mus", "BicepsFemorisCaputBreve1"),
    RETURN_OBJ_SPLINE("..Mus", "BicepsFemorisCaputBreve2"),
    RETURN_OBJ_SPLINE("..Mus", "BicepsFemorisCaputBreve3")
    ),
    arrcat(
    RETURN_OBJ_SPLINE("..Mus", "RectusFemoris1"),
    RETURN_OBJ_SPLINE("..Mus", "RectusFemoris2")
    ),
    arrcat(
    RETURN_OBJ_SPLINE("..Mus", "IliacusMid1"),
    RETURN_OBJ_SPLINE("..Mus", "IliacusMid2")
    ),
    arrcat(
    RETURN_OBJ_SPLINE("..Mus", "IliacusMedialis1"),
    RETURN_OBJ_SPLINE("..Mus", "IliacusMedialis2")
    )
//    arrcat(
//    RETURN_OBJ_SPLINE("..Mus", "Pectineus1"),
//    RETURN_OBJ_SPLINE("..Mus", "Pectineus2"),
//    RETURN_OBJ_SPLINE("..Mus", "Pectineus3"),
//    RETURN_OBJ_SPLINE("..Mus", "Pectineus4")
//    )
  );

  AnyObjectPtr Objects = arrcat(pArrMuscles, pArrSPLines);
};

TensorFasciaeLatae.TensorFasciaeLatae1.viewMuscle.Visible = Off;
TensorFasciaeLatae.TensorFasciaeLatae2.viewMuscle.Visible = Off;
BicepsFemorisCaputLongum.BicepsFemorisCaputLongum1.viewMuscle.Visible = Off;
BicepsFemorisCaputBreve.BicepsFemorisCaputBreve1.viewMuscle.Visible = Off;
BicepsFemorisCaputBreve.BicepsFemorisCaputBreve2.viewMuscle.Visible = Off;
BicepsFemorisCaputBreve.BicepsFemorisCaputBreve3.viewMuscle.Visible = Off;
RectusFemoris.RectusFemoris1.viewMuscle.Visible = Off;
RectusFemoris.RectusFemoris2.viewMuscle.Visible = Off;
IliacusMid.IliacusMid1.viewMuscle.Visible = Off;
IliacusMid.IliacusMid2.viewMuscle.Visible = Off;
IliacusMedialis.IliacusMedialis1.viewMuscle.Visible = Off;
IliacusMedialis.IliacusMedialis2.viewMuscle.Visible = Off;
//Pectineus1.viewMuscle.Visible = Off;
//Pectineus2.viewMuscle.Visible = Off;
//Pectineus3.viewMuscle.Visible = Off;
//Pectineus4.viewMuscle.Visible = Off;

#undef RETURN_OBJ_MUSCLE
#undef RETURN_OBJ_SPLINE
