#if BM_LEG_LEFT == ON
ForcePlateType2 Plate1 (
PlateName = Plate1,
No=0,
Folder = Main.ModelSetup.C3DFileData,
Limb = Main.Studies.HumanModel.BodyModel.Left.Leg.Seg.Foot,
Fx=Main.ModelSetup.C3DFileData.Analog.DataFiltered.Fx1,
Fy=Main.ModelSetup.C3DFileData.Analog.DataFiltered.Fy1,
Fz=Main.ModelSetup.C3DFileData.Analog.DataFiltered.Fz1,
Mx=Main.ModelSetup.C3DFileData.Analog.DataFiltered.Mx1,
My=Main.ModelSetup.C3DFileData.Analog.DataFiltered.My1,
Mz=Main.ModelSetup.C3DFileData.Analog.DataFiltered.Mz1
)
={
  Switch_DrawForceVectorFromCOP = On;
};
#endif

#if BM_LEG_RIGHT == ON
ForcePlateType2 Plate2 (
PlateName = Plate2,
No=1,
Folder = Main.ModelSetup.C3DFileData,
Limb = Main.Studies.HumanModel.BodyModel.Right.Leg.Seg.Foot,
Fx=Main.ModelSetup.C3DFileData.Analog.DataFiltered.Fx2,
Fy=Main.ModelSetup.C3DFileData.Analog.DataFiltered.Fy2,
Fz=Main.ModelSetup.C3DFileData.Analog.DataFiltered.Fz2,
Mx=Main.ModelSetup.C3DFileData.Analog.DataFiltered.Mx2,
My=Main.ModelSetup.C3DFileData.Analog.DataFiltered.My2,
Mz=Main.ModelSetup.C3DFileData.Analog.DataFiltered.Mz2
)
={
  Switch_DrawForceVectorFromCOP = On;
};

ForcePlateType2 Plate3 (
PlateName = Plate3,
No=2,
Folder = Main.ModelSetup.C3DFileData,
Limb = Main.Studies.HumanModel.BodyModel.Right.Leg.Seg.Foot,
Fx=Main.ModelSetup.C3DFileData.Analog.DataFiltered.Fx3,
Fy=Main.ModelSetup.C3DFileData.Analog.DataFiltered.Fy3,
Fz=Main.ModelSetup.C3DFileData.Analog.DataFiltered.Fz3,
Mx=Main.ModelSetup.C3DFileData.Analog.DataFiltered.Mx3,
My=Main.ModelSetup.C3DFileData.Analog.DataFiltered.My3,
Mz=Main.ModelSetup.C3DFileData.Analog.DataFiltered.Mz3
)
={
  Switch_DrawForceVectorFromCOP = On;
};
#endif

//ForcePlateType2AutoDetection Plate3 (
//PlateName = Plate3,
//No=2,
//Folder =Main.ModelSetup.C3DFileData,
//Limb1=  Main.Studies.HumanModel.BodyModel.Left.Leg.Seg.Foot,
//Limb2=  Main.Studies.HumanModel.BodyModel.Left.Leg.Seg.Foot,
//VerticalDirection ="Z",
//HeightTolerance=0.07,
//VelThreshold=2.2,
//FootPresent = 1,
//Fx=Main.ModelSetup.C3DFileData.Analog.DataFiltered.Fx3,
//Fy=Main.ModelSetup.C3DFileData.Analog.DataFiltered.Fy3,
//Fz=Main.ModelSetup.C3DFileData.Analog.DataFiltered.Fz3,
//Mx=Main.ModelSetup.C3DFileData.Analog.DataFiltered.Mx3,
//My=Main.ModelSetup.C3DFileData.Analog.DataFiltered.My3,
//Mz=Main.ModelSetup.C3DFileData.Analog.DataFiltered.Mz3
//)
//={
//  Switch_DrawForceVectorFromCOP = On;
//};
