  // ************************************
  // Drivers for the right arm
  // ************************************


  #if BM_ARM_SHOULDER_RHYTHM == 0
  //Sterno clavicular joint driver
  AnyKinEqSimpleDriver SCDriverRight ={
    AnyKinMeasureOrg &ref1 =...HumanModel.Interface.Right.SternoClavicularProtraction;
    AnyKinMeasureOrg &ref2 =...HumanModel.Interface.Right.SternoClavicularElevation;
    AnyKinMeasureOrg &ref3 =...HumanModel.Interface.Right.SternoClavicularAxialRotation;
    DriverPos = pi/180*{
      .JntPos.Right.SternoClavicularProtraction,
      .JntPos.Right.SternoClavicularElevation,
      .JntPos.Right.SternoClavicularAxialRotation
    };
    DriverVel = {
            .JntVel.Right.SternoClavicularProtraction,
      .JntVel.Right.SternoClavicularElevation,
      .JntVel.Right.SternoClavicularAxialRotation
    };
    Reaction.Type={Off,Off,Off};
  };
  #endif


  //Glenohumeral joint
  AnyKinEqSimpleDriver GHDriverRight=
  {
    AnyKinMeasureOrg &ref1 =...HumanModel.Interface.Right.GlenohumeralAbduction;
    //AnyKinMeasureOrg &ref2 =...HumanModel.Interface.Right.GlenohumeralFlexion;
    AnyKinMeasureOrg &ref3 =...HumanModel.Interface.Right.GlenohumeralExternalRotation;

     DriverPos=pi/180*
     {
      .JntPos.Right.GlenohumeralAbduction,  //GH joint
      //.JntPos.Right.GlenohumeralFlexion,  //GH joint
      .JntPos.Right.GlenohumeralExternalRotation  //GH joint
     };
     DriverVel = pi/180*
     {
      .JntVel.Right.GlenohumeralAbduction,  //GH joint
      //.JntVel.Right.GlenohumeralFlexion,  //GH joint
      .JntVel.Right.GlenohumeralExternalRotation  //GH joint
     };
     //Reaction.Type={Off, Off, Off};
     Reaction.Type={Off, Off};
  };

  AnyKinEqSimpleDriver GHFlexionDriverRight =
  {
    AnyKinLinear lin =
    {
      AnyRefFrame& ref0 = ....HumanModel.Right.ShoulderArm.Seg.Humerus.gh;
      AnyRefFrame& ref1 = ....HumanModel.Right.ShoulderArm.Seg.Humerus.fe;
      Ref = -1;
    };
    MeasureOrganizer = {1};
    DriverPos = {0};
    DriverVel = {0};
    Reaction.Type = {Off};
  };

  //Elbow flexion driver
  AnyKinEqSimpleDriver ElbowFEDriverRight=
  {
    AnyKinMeasureOrg  &Elbow =...HumanModel.Interface.Right.ElbowFlexion;
    DriverPos = pi/180*{.JntPos.Right.ElbowFlexion};
    DriverVel = pi/180*{.JntVel.Right.ElbowFlexion};
    Reaction.Type={Off};
  };

  //Elbow pronation driver
  AnyKinEqSimpleDriver ElbowPSDriverRight=
  {
    AnyKinMeasureOrg &Elbow =...HumanModel.Interface.Right.ElbowPronation;
    DriverPos = pi/180*{.JntPos.Right.ElbowPronation };
    DriverVel = pi/180*{.JntVel.Right.ElbowPronation };
    Reaction.Type={Off};
  };

  //Wrist driver
  AnyKinEqSimpleDriver WristDriverRight =
  {
    AnyKinMeasureOrg &ref1 =...HumanModel.Interface.Right.WristFlexion;
    AnyKinMeasureOrg &ref2 =...HumanModel.Interface.Right.WristAbduction;
    DriverPos = pi/180*
    {
      .JntPos.Right.WristFlexion,
      .JntPos.Right.WristAbduction
    };

    DriverVel = pi/180*
    {
      .JntVel.Right.WristFlexion,
      .JntVel.Right.WristAbduction
    };
    Reaction.Type={Off,Off};
  };
