//AnyInt femoral_comp_vertices = {43, 59, 1497, 1501, 1508, 9774, 11317, 11340, 11344, 11379, 11451, 11507, 11725, 11763, 11767, 11802, 11804, 11816, 12040, 12174, 12382, 12612, 12928, 13042, 33007, 34579, 35268, 36033};
//AnyInt femoral_comp_vertices = {51, 52, 57, 79, 80, 81, 84, 85, 86, 87, 99, 1500, 1501, 1502, 1503, 1505, 1506, 1507, 1508, 1509, 1510, 1512, 1524, 2405, 2406, 2407, 2802, 2803, 2804, 2852,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37730};
//AnyInt femoral_comp_vertices = {31, 43, 44, 45, 58, 59, 60, 61, 68, 69, 76, 78, 94, 95, 96, 122, 123, 138, 139, 149, 150, 151, 156, 157, 158, 159, 165, 166, 167, 168,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37716};
//AnyInt femoral_comp_vertices = {31, 43, 44, 45, 58, 59, 60, 61, 68, 69, 76, 78, 94, 95, 96, 122, 123, 138, 139, 149, 150, 151, 156, 157, 158, 159, 165, 166, 167, 168,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37716};
//AnyInt femoral_comp_vertices = {31, 43, 44, 45, 58, 59, 60, 61, 68, 69, 76, 78, 94, 95, 96, 122, 123, 138, 139, 149, 150, 151, 156, 157, 158, 159, 165, 166, 167, 168,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37716};
AnyInt femoral_comp_vertices = {58, 59, 60, 61, 76, 77, 78, 93, 95, 96, 97, 98, 106, 122, 123, 124, 138, 139, 140, 156, 157, 158, 159, 165, 166, 167, 184, 190, 191, 192,
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  37716};

// Test by Pavel
//AnyInt medial_vertices = {28, 29, 30, 31, 32, 33, 34, 35, 36, 37, 39, 41, 42, 43, 44, 45, 47, 48, 49, 50, 51, 52, 53, 54, 55, 57, 58, 59, 60, 61,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37716};
//AnyInt lateral_vertices = {88, 89, 90, 99, 100, 101, 102, 103, 104, 105, 106, 107, 125, 126, 127, 128, 156, 157, 158, 159, 189, 191, 1495, 1496, 1497, 1498, 1499, 1500, 1501, 1502,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37737};
//AnyInt femoral_comp_vertices = arrcat(medial_vertices, lateral_vertices);
//

// Test by Yunsub
//AnyInt lateral_vertices = {158, 1503, 3706, 5859, 5860, 5861, 11642, 11656, 11662, 11771, 11772, 11773, 11778, 11779, 11780, 11781, 11782, 11783, 11784, 11785, 11786, 11787, 11788, 11789, 11790, 11837, 11838, 11839, 11840, 11841,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37730};
//AnyInt medial_vertices = {43, 44, 45, 58, 1488, 1489, 1490, 1524, 2248, 2249, 2802, 2803, 2804, 2852, 8416, 11201, 11202, 11203, 11204, 11239, 11240, 11241, 11242, 11243, 11244, 11245, 11251, 11252, 11253, 11254,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36996};
//
//AnyInt femoral_comp_vertices = arrcat(medial_vertices, lateral_vertices);

//Good
//AnyInt femoral_comp_vertices = {158, 1503, 3706, 5859, 5860, 5861, 11642, 11656, 11662, 11771, 11772, 11773, 11778, 11779, 11780, 11781, 11782, 11783, 11784, 11785, 11786, 11787, 11788, 11789, 11790, 11837, 11838, 11839, 11840, 11841,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37730};
