Main.Studies.InverseDynamicStudy = {
  AnyFolder MedialLateralKneeContactForces = {

    AnyFolder Right = {
          // Some references for convenience and less typing.
          #if BM_LEG_RIGHT == ON
        AnyFolder& LegRef = Main.HumanModel.BodyModel.Right.Leg;
        #else
        AnyFolder& LegRef = Main.HumanModel.BodyModel.Left.Leg;
        #endif

        AnyFolder& GlobalRef = Main.EnvironmentModel.GlobalRef;

        // We can get the forces/moments in the knee joint by finding the Contraints.Reactions object in the joint.
        // F[0] or F[1] are the same force vector but with different signs. Depends if we want the force femur inserts on tibia or opposite.
        // Here we chose [0] which is the force the shank inserts on the femur.
        AnyVec3 KneeForceInGlobal = LegRef.Jnt.Knee.Constraints.Reaction.RefFrameOutput.F[0];
        AnyVec3 KneeMomentInGlobal = LegRef.Jnt.Knee.Constraints.Reaction.RefFrameOutput.M[0];

        // We can now express the force and moments in the coordinate system we want.
        AnyVec3 KneeForceInShank = transf3D(KneeForceInGlobal, &GlobalRef, &LegRef.Seg.Shank.KneeJoint);
        AnyVec3 KneeMomentInShank = transf3D(KneeMomentInGlobal, &GlobalRef, &LegRef.Seg.Shank.KneeJoint);

       AnyVar L_medial = Main.ModelSetup.SubjectSpecificData.Right_Lm;
       AnyVar L_lateral = Main.ModelSetup.SubjectSpecificData.Right_Ll;

      // Here F_total is the vertical component of the force and M_total is the abbduction moment in the frontal plane.
      AnyVar F_total = KneeForceInShank[1];
      AnyVar M_total = KneeMomentInShank[0];

      // The relationships with the lateral/medial forces can be expressed as:
      //
      //  F_total = F_medial + F_lateral
      //  M_total = F_medial*L_medial - F_lateral*L_lateral
      //
      // From these the F_medial/F_lateral can be found:

      AnyFloat F_lateral = (F_total * L_medial - M_total) / (L_lateral + L_medial);
      AnyFloat F_medial = F_total - F_lateral;

      // check:
      // System of equations:
      // a) Fr + Fl=F0
      // b) Fr*Lr + FL*Ll = M0
      //
      // c) (Fr+Fl)*Lr=F0*Lr
      // d) c)-b) => (Fr*Lr) + Fl*Lr + (- Fr*Lr) - Fl*Ll = F0*Lr - M0
      // e) Fl*Lr - Fl*Ll = F0*Lr - M0
      // Fl =( F0 * Lr - M0) / (Lr - Ll)

      // Finally let us visualize the forces and the knee axis:
      // First we create the nodes at some medial/lateral distance
      // along the knee axis. Inside the nodes we create small
      // vectors representing the forces.

      LegRef.Seg.Shank = {
        AnyRefNode LateralKneeContactNode = {
          AnyVec3 uKneeAxis = {0,0,1}*ARel';
          sRel = .KneeJoint.sRel + ....L_lateral *uKneeAxis;
          ARel = .KneeJoint.ARel;
          AnyDrawVector LateralForceVec = {
            // We scale the force so the vector gets a resonable length
            Vec = {0,.....F_lateral, 0}/5000;
            GlobalCoord = Off;
            Line.End.Style = Line3DCapStyleArrow;
          };
        };
        AnyRefNode MedialKneeContactNode = {
          AnyVec3 uKneeAxis = {0,0,1}*.KneeJoint.ARel';
          sRel = .KneeJoint.sRel - ....L_medial *uKneeAxis;
          ARel = .KneeJoint.ARel;
          AnyDrawVector MedialForceVec = {
            Vec = {0,.....F_medial, 0}/5000;
            GlobalCoord = Off;
            Line.End.Style = Line3DCapStyleArrow;
          };
        };
        KneeJoint = {
//          AnyDrawLine DrawKneeJointAxis = {
//            p0 = {0,0,-0.06};
//            p1 = {0,0, 0.06};
//            Line.RGB = 0.1*{1,1,1};
//            Opacity = 0.3;
//            GlobalCoord = Off;
//          };
        };
      };

    };


    AnyFolder Left = {

    };


  };
};
