//Main.ModelSetup.C3DFileData.MarkerUseAllPointsOnOff = On;
// How it works:
//
// Marker on the Left Posterior Superior Iliac
// CreateMarkerDriver LPSI (                         // A marker on the skeleton is created!
// MarkerName= LPSI,                                 // Change the name here to the name of your Marker Protocol!:
// MarkerPlacement=Trunk.SegmentsLumbar.PelvisSeg,   // Marker is assigned to Pelvis Segment
// OptX=OFF, OptY=OFF, OptZ=ON,                // Is the position of the Marker good, or does it need to be optimised?
//                                                   // Please be aware that having to many Markers optimised can lead to model failure
// WeightX=1.0,WeightY=1.0,WeightZ=1.0,              // If you are convinced of the position of this Marker, you an increase the importance of it (weight)
// Model1=MotionAndParameterOptimizationModel,
// Model2= InverseDynamicModel,
// sRelOptScalingOnOff="On"                          // Determine whether sRelOpt value will be scaled by the geometrical scaling funciton or not
// ) = {
//   sRelOpt ={-0.06727544, -0.03, -0.045};          // Position of the Marker on the skeleton, relativ to the segment. Please adjust!
//   sRelOptDelta = {0, 0, 0}                        // This value is optional. This value will be optimized and you can set the initial guess if you want.
// };


// Hip/Pelvis

// Marker on the Left Posterior Superior Iliac
CreateMarkerDriver LPsis (
MarkerName= LPSIS,
MarkerPlacement=Trunk.SegmentsLumbar.PelvisSeg,
OptX=OFF, OptY=OFF, OptZ=OFF,
WeightX=10.0,WeightY=10.0,WeightZ=10.0,
ScaleMarkerPosOnOff = 1
) = {
  //sRelOpt = {-0.14,0.02, -0.04};
  sRelOpt = {-0.145,0.05, -0.04};
};

// Marker on the Right Posterior Superior Iliac
CreateMarkerDriver RPsis (
MarkerName= RPSIS,
MarkerPlacement=Trunk.SegmentsLumbar.PelvisSeg,
OptX=OFF, OptY=OFF, OptZ=OFF,
WeightX=10.0,WeightY=10.0,WeightZ=10.0,
ScaleMarkerPosOnOff = 1
) = {
 //sRelOpt = {-0.14,0.02, 0.04};
 sRelOpt = {-0.145,0.05, 0.04};
};

// Marker on the Right Anterior Superior Iliac
CreateMarkerDriver RAsis(
MarkerName= RASIS,
MarkerPlacement=Trunk.SegmentsLumbar.PelvisSeg,
OptX=OFF,OptY=OFF,OptZ=OFF,
WeightX=10.0,WeightY=10.0,WeightZ=10.0,
ScaleMarkerPosOnOff = 1
) = {
 //sRelOpt = {0.04, 0.005, 0.125};
 sRelOpt = {0.035, 0.005, 0.125};
};

// Marker on the Left Anterior Superior Iliac
CreateMarkerDriver LAsis (
MarkerName= LASIS ,
MarkerPlacement=Trunk.SegmentsLumbar.PelvisSeg,
OptX=OFF,OptY=OFF,OptZ=OFF,
WeightX=10.0,WeightY=10.0,WeightZ=10.0,
//WeightX=1.0,WeightY=1.0,WeightZ=1.0,
ScaleMarkerPosOnOff = 1
) = {
  //sRelOpt = {0.04,0.005, -0.125};
  sRelOpt = {0.035,0.005, -0.125};
};

//// Head

//// Marker on the Right Front Head
//CreateMarkerDriver RFHD (
//MarkerName= RFHD,
//MarkerPlacement=Trunk.SegmentsThorax.SkullSeg,
//OptX=OFF,OptY=OFF,OptZ=OFF,
//WeightX=1.0,WeightY=1.0,WeightZ=1.0
//) = {
//  sRelOpt = {0.08,0.06,0.07} + {0.02, -0.02, 0};
////  sRelOpt = {0.08,0.06,0.07};
//};
//
//// Marker on the Left Front Head
//CreateMarkerDriver LFHD (
//MarkerName= LFHD,
//MarkerPlacement=Trunk.SegmentsThorax.SkullSeg,
//OptX=OFF,OptY=OFF,OptZ=OFF,
//WeightX=1.0,WeightY=1.0,WeightZ=1.0
//) = {
//  sRelOpt = {0.08,0.06,-0.07} + {0.02, -0.02, 0};
////  sRelOpt = {0.08,0.06,-0.07};
//};
//
//// Marker on the Right Back Head
//CreateMarkerDriver RBHD (
//MarkerName= RBHD,
//MarkerPlacement=Trunk.SegmentsThorax.SkullSeg,
//OptX=OFF,OptY=OFF,OptZ=OFF,
//WeightX=1.0,WeightY=1.0,WeightZ=1.0
//) = {
//  sRelOpt = {-0.07,0.05,0.08};
//};
//
//// Marker on the Left Back Head
//CreateMarkerDriver LBHD (
//MarkerName= LBHD,
//MarkerPlacement=Trunk.SegmentsThorax.SkullSeg,
//OptX=OFF,OptY=OFF,OptZ=OFF,
//WeightX=1.0,WeightY=1.0,WeightZ=1.0
//) = {
//  sRelOpt = {-0.07,0.05,-0.08};
//};

//// Thorax

// Marker on the Sternum
//CreateMarkerDriver Sternum (
//MarkerName= Trunk,
//MarkerPlacement=Trunk.SegmentsThorax.ThoraxSeg,
//OptX=OFF, OptY=OFF, OptZ=OFF,
//WeightX=1.0,WeightY=1.0,WeightZ=1.0,
//ScaleMarkerPosOnOff = 1
//) = {
// sRelOpt = {0.12,0.42,0.0};
//};
//
//CreateMarkerDriver Xiphoid (
//MarkerName= Trunk,
//MarkerPlacement=Trunk.SegmentsThorax.ThoraxSeg,
//OptX=OFF, OptY=OFF, OptZ=OFF,
//WeightX=1.0,WeightY=1.0,WeightZ=1.0,
//ScaleMarkerPosOnOff = 1
//) = {
//  sRelOpt = {0.18,0.24,0.0};
//};

//// Marker on the Thoracic Vertebra 10
//CreateMarkerDriver Thoracic (
//MarkerName= Thoracic,
//MarkerPlacement=Trunk.SegmentsThorax.ThoraxSeg,
//OptX=ON, OptY=ON, OptZ=OFF,
//WeightX=1.0,WeightY=1.0,WeightZ=1.0,
//ScaleMarkerPosOnOff = 1
//) = {
//  sRelOpt = {-0.052,0.187,0};
//};

// Lower Extremity Markers

#if BM_LEG_RIGHT != OFF
CreateMarkerDriver RKneeLateralThigh (
MarkerName= RKNEELATERAL,
MarkerPlacement=Right.Leg.Seg.Thigh,
OptX=OFF,OptY=OFF,OptZ=OFF,
//WeightX=1.0,WeightY=1.0,WeightZ=1.0,
WeightX=5.0,WeightY=5.0,WeightZ=5.0,
//PlaceMarkerAt = LateralTibialEpicondyle,
PlaceMarkerAt = EpicondylusFemorisLateralis,
ScaleMarkerPosOnOff = 0
) = {
   sRelOpt = {0.0, -0.0, 0.01};
};


//CreateMarkerDriver RKneeLateral (
//MarkerName= RKNEELATERAL,
//MarkerPlacement=Right.Leg.Seg.Shank,
//OptX=OFF,OptY=OFF,OptZ=OFF,
//WeightX=3.0,WeightY=1.0,WeightZ=1.0,
//PlaceMarkerAt = LateralTibialEpicondyle,
////PlaceMarkerAt = EpicondylusFemorisLateralis,
//ScaleMarkerPosOnOff = 0
//) = {
//   sRelOpt = {0.0, 0.04, 0.01};
//};

CreateMarkerDriver RThighLateral (
MarkerName=  RTHIGHLATERAL,
MarkerPlacement =Right.Leg.Seg.Thigh,
OptX=ON,OptY=ON,OptZ=ON,
WeightX=1.0,WeightY=1.0,WeightZ=1.0,
ScaleMarkerPosOnOff = 0
)= {
  sRelOpt = {0.03, -0.23, 0.1};
};

CreateMarkerDriver RThighSuperior (
MarkerName=  RTHIGHSUPERIOR,
MarkerPlacement =Right.Leg.Seg.Thigh,
OptX=ON,OptY=ON,OptZ=ON,
WeightX=1.0,WeightY=1.0,WeightZ=1.0,
ScaleMarkerPosOnOff = 0
)= {
  //sRelOpt = {0.0, -0.1, 0.1};
  sRelOpt = {0.05, -0.15, 0.03};
  //sRelOptDelta = {3.728481808195790e-002, -3.255583942745915e-002, -5.862821320407746e-003};
};

CreateMarkerDriver RThighInferior (
MarkerName=  RTHIGHINFERIOR,
MarkerPlacement =Right.Leg.Seg.Thigh,
OptX=ON,OptY=ON,OptZ=ON,
WeightX=1.0,WeightY=1.0,WeightZ=1.0,
ScaleMarkerPosOnOff = 0
)= {
  //sRelOpt = {0.041, -0.38, 0.038};
  sRelOpt = {0.1, -0.3, 0.03};
};

// Marker on the Right Tibia
CreateMarkerDriver RShankLateral (
MarkerName= RSHANKLATERAL,
MarkerPlacement=Right.Leg.Seg.Shank,
OptX=ON,OptY=ON,OptZ=ON,
WeightX=1.0,WeightY=1.0,WeightZ=1.0,
ScaleMarkerPosOnOff = 0
) = {
  sRelOpt = {-0.1, -0.21, 0.05};
  //sRelOptDelta = {5.539990738901292e-002, 4.076080214897407e-003, -4.342266343416248e-002};
};

CreateMarkerDriver RShankSuperior (
MarkerName= RSHANKSUPERIOR,
MarkerPlacement=Right.Leg.Seg.Shank,
OptX=ON,OptY=ON,OptZ=ON,
WeightX=1.0,WeightY=1.0,WeightZ=1.0,
ScaleMarkerPosOnOff = 0
) = {
   sRelOpt = {0.0, -0.05, 0.05};
};

CreateMarkerDriver RShankInferior (
MarkerName= RSHANKINFERIOR,
MarkerPlacement=Right.Leg.Seg.Shank,
OptX=ON,OptY=ON,OptZ=ON,
WeightX=1.0,WeightY=1.0,WeightZ=1.0,
ScaleMarkerPosOnOff = 0
) = {
    sRelOpt = {0.0, -0.28, 0.05};
    //sRelOptDelta = {1.147059634176613e-002, -2.699140262551636e-002, -1.460903582796406e-003};
};

// Marker on the Right Lateral Ankle
CreateMarkerDriver RAnkleLateral (
MarkerName= RANKLELATERAL ,
MarkerPlacement=Right.Leg.Seg.Shank,
PlaceMarkerAt=LateralMalleolus,
OptX=OFF,OptY=OFF,OptZ=OFF,
WeightX=5.0,WeightY=5.0,WeightZ=5.0,
ScaleMarkerPosOnOff = 0
) = {
 sRelOpt =  {-0.0, 0.0, 0.01};
 //sRelOptDelta = {5.283303983585375e-002, -6.541685627869250e-002, 7.322103609461393e-003};
};


//// Marker on the Right Lateral Ankle
//CreateMarkerDriver RAnkleLateral (
//MarkerName= RANKLELATERAL ,
//MarkerPlacement=Right.Leg.Seg.Foot,
//OptX=OFF,OptY=OFF,OptZ=OFF,
//WeightX=5.0,WeightY=1.0,WeightZ=1.0,
//ScaleMarkerPosOnOff = 0
//) = {
// sRelOpt =  {-0.05, 0.07, 0.03};
// sRelOptDelta = {5.283303983585375e-002, -6.541685627869250e-002, 7.322103609461393e-003};
//};

// Marker on the Right Toe
CreateMarkerDriver RToe (
MarkerName= RTOE,
MarkerPlacement=Right.Leg.Seg.Foot,
OptX=OFF, OptY=OFF, OptZ=OFF,
WeightX=1.0,WeightY=1.0,WeightZ=1.0,
ScaleMarkerPosOnOff = 1
) = {
   sRelOpt = {0.13, -0.04, 0.015};
};

CreateMarkerDriver RToeLateral (
MarkerName= RTOELATERAL,
MarkerPlacement=Right.Leg.Seg.Foot,
//OptX=OFF, OptY=OFF, OptZ=OFF,
OptX=ON, OptY=OFF, OptZ=ON,
WeightX=5.0,WeightY=5.0,WeightZ=5.0,
ScaleMarkerPosOnOff = 1
) = {
  sRelOpt =  {0.12, -0.04, 0.05};

};

CreateMarkerDriver RToeMedial (
MarkerName= RTOEMEDIAL ,
MarkerPlacement=Right.Leg.Seg.Foot,
//OptX=OFF, OptY=OFF, OptZ=OFF,
OptX=ON, OptY=OFF, OptZ=ON,
WeightX=5.0,WeightY=5.0,WeightZ=5.0,
ScaleMarkerPosOnOff = 1
) = {
  sRelOpt =  {0.13, -0.035, -0.03};
};

// Marker on the Right Heel
CreateMarkerDriver RHeel (
MarkerName= RHEEL,
MarkerPlacement=Right.Leg.Seg.Foot,
OptX=OFF, OptY=OFF, OptZ=OFF,
WeightX=1.0,WeightY=1.0,WeightZ=1.0,
ScaleMarkerPosOnOff = 1
) = {
 //sRelOpt =  {-0.07, -0.04, -0.001512914};
 sRelOpt =  {-0.07 + 0.02, -0.04, 0.01};
};
#endif

#if BM_LEG_LEFT != OFF
CreateMarkerDriver LThighLateral (
MarkerName= LTHIGHLATERAL ,
MarkerPlacement=Left.Leg.Seg.Thigh,
OptX=ON,OptY=ON,OptZ=ON,
WeightX=1.0,WeightY=1.0,WeightZ=1.0,
ScaleMarkerPosOnOff = 0
) = {
    sRelOpt = {0.03, -0.23, -0.1};
    //sRelOptDelta = {2.468222008645767e-002, 9.264820683019570e-003, 4.951772112609798e-003};
};

CreateMarkerDriver LThighSuperior (
MarkerName= LTHIGHSUPERIOR,
MarkerPlacement=Left.Leg.Seg.Thigh,
OptX=ON,OptY=ON,OptZ=ON,
WeightX=1.0,WeightY=1.0,WeightZ=1.0,
ScaleMarkerPosOnOff = 0
) = {
   sRelOpt = {0.05, -0.15, -0.03};
   //sRelOptDelta = {3.821732031813194e-002, -8.854168997953195e-003, -5.340414759915583e-003};
};

CreateMarkerDriver LThighInferior (
MarkerName= LTHIGHINFERIOR,
MarkerPlacement=Left.Leg.Seg.Thigh,
OptX=ON,OptY=ON,OptZ=ON,
WeightX=1.0,WeightY=1.0,WeightZ=1.0,
ScaleMarkerPosOnOff = 0
) = {
   sRelOpt = {0.1, -0.3, -0.03};
};

CreateMarkerDriver LKneeLateralThigh (
MarkerName= LKNEELATERAL,
MarkerPlacement=Left.Leg.Seg.Thigh,
OptX=OFF,OptY=OFF,OptZ=OFF,
WeightX=5.0,WeightY=5.0,WeightZ=5.0,
//PlaceMarkerAt = LateralTibialEpicondyle,
PlaceMarkerAt = EpicondylusFemorisLateralis,
ScaleMarkerPosOnOff = 0
) = {
   sRelOpt = {0.0, -0.0,-0.01};
};


//CreateMarkerDriver LKneeLateral (
//MarkerName= LKNEELATERAL,
//MarkerPlacement=Left.Leg.Seg.Shank,
//OptX=OFF,OptY=OFF,OptZ=OFF,
//WeightX=1.0,WeightY=1.0,WeightZ=1.0,
//PlaceMarkerAt = LateralTibialEpicondyle,
////PlaceMarkerAt = EpicondylusFemorisLateralis,
//ScaleMarkerPosOnOff = 0
//) = {
//   sRelOpt = {-0.0, 0.04, -0.01};
//};


// Marker on the Left Tibia
CreateMarkerDriver LShankLateral (
MarkerName= LSHANKLATERAL,
MarkerPlacement=Left.Leg.Seg.Shank,
OptX=ON,OptY=ON,OptZ=ON,
WeightX=1.0,WeightY=1.0,WeightZ=1.0,
ScaleMarkerPosOnOff = 0
) = {
  sRelOpt = {-0.1, -0.21, -0.05};
  //sRelOptDelta = {5.374450635614104e-002, -1.594930751166518e-002, 3.799114338593220e-002};
};

CreateMarkerDriver LShankSuperior (
MarkerName= LSHANKSUPERIOR,
MarkerPlacement=Left.Leg.Seg.Shank,
OptX=ON,OptY=ON,OptZ=ON,
WeightX=1.0,WeightY=1.0,WeightZ=1.0,
ScaleMarkerPosOnOff = 0
) = {
  sRelOpt = {0.0, -0.05, -0.05};
  //sRelOptDelta = {2.868835123236436e-002, 1.084341702085235e-002, -2.935142561827216e-002};
};

CreateMarkerDriver LShankInferior (
MarkerName= LSHANKINFERIOR,
MarkerPlacement=Left.Leg.Seg.Shank,
OptX=ON,OptY=ON,OptZ=ON,
WeightX=1.0,WeightY=1.0,WeightZ=1.0,
ScaleMarkerPosOnOff = 0
) = {
  sRelOpt = {0.0, -0.28, -0.05};
  //sRelOptDelta = {1.892990727255045e-002, -1.545168516386526e-002, -6.504704902749914e-004};
};

// Marker on the Left Ankle
//CreateMarkerDriver LHindfoot (
//MarkerName= LHindfoot,
//MarkerPlacement=Left.Leg.Seg.Foot,
//OptX=ON,OptY=ON,OptZ=ON,
//WeightX=1.0,WeightY=1.0,WeightZ=1.0,
//ScaleMarkerPosOnOff = 0
//) = {
//  sRelOpt =  {-0.07 + 0.07, -0.04, 0.001512914 - 0.05};
//  sRelOptDelta = {3.127341898753362e-002, -4.599760650812604e-002, -2.081487528189753e-002};
//};


// Marker on the Right Lateral Ankle
CreateMarkerDriver LAnkleLateral (
MarkerName= LANKLELATERAL ,
MarkerPlacement=Left.Leg.Seg.Shank,
PlaceMarkerAt=LateralMalleolus,
OptX=OFF,OptY=OFF,OptZ=OFF,
WeightX=5.0,WeightY=5.0,WeightZ=5.0,
ScaleMarkerPosOnOff = 0
) = {
 sRelOpt =  {-0.0, 0.0, -0.01};
 //sRelOptDelta = {5.283303983585375e-002, -6.541685627869250e-002, 7.322103609461393e-003};
};

// Marker on the Left Toe
CreateMarkerDriver LToe (
MarkerName= LTOE,
MarkerPlacement=Left.Leg.Seg.Foot,
OptX=OFF,OptY=OFF,OptZ=OFF,
WeightX=1.0,WeightY=1.0,WeightZ=1.0,
ScaleMarkerPosOnOff = 1
) = {
  sRelOpt = {0.13, -0.04, -0.015};
};

// Marker on the Left Toe
CreateMarkerDriver LToeLateral (
MarkerName= LTOELATERAL,
MarkerPlacement=Left.Leg.Seg.Foot,
OptX=OFF,OptY=OFF,OptZ=OFF,
//OptX=ON,OptY=OFF,OptZ=ON,
WeightX=5.0,WeightY=5.0,WeightZ=5.0,
ScaleMarkerPosOnOff = 1
) = {
  sRelOpt =  {0.12, -0.04, -0.05};
};

CreateMarkerDriver LToeMedial (
MarkerName= LTOEMEDIAL ,
MarkerPlacement=Left.Leg.Seg.Foot,
OptX=OFF,OptY=OFF,OptZ=OFF,
//OptX=ON,OptY=OFF,OptZ=ON,
WeightX=5.0,WeightY=5.0,WeightZ=5.0,
ScaleMarkerPosOnOff = 1
) = {
  sRelOpt =  {0.13, -0.035, 0.03};
};

// Marker on the Left Heel
CreateMarkerDriver LHeel(
MarkerName= LHEEL,
MarkerPlacement=Left.Leg.Seg.Foot,
OptX=OFF, OptY=OFF, OptZ=OFF,
WeightX=1.0,WeightY=1.0,WeightZ=1.0,
ScaleMarkerPosOnOff = 1
) = {
  sRelOpt =  {-0.07 + 0.02, -0.04, -0.01};
};
#endif

#if BM_ARM_RIGHT != OFF
// Marker on the Right Acromio-clavicular joint
CreateMarkerDriver RShoulder (
MarkerName= RShoulder,
MarkerPlacement=Right.ShoulderArm.Seg.Scapula,
OptX=OFF,OptY=OFF,OptZ=OFF,
WeightX=1.0,WeightY=1.0,WeightZ=1.0
) = {
  sRelOpt = {0.03,-0.0,-0.04};
//sRelOpt = {0.035, 0.005,-0.04};
//sRelOpt = {0.02,-0.015,0.02};
};

// Marker on the Right Elbow
CreateMarkerDriver RElbow (
MarkerName= RElbow ,
MarkerPlacement=Right.ShoulderArm.Seg.Humerus,
OptX=OFF,OptY=OFF,OptZ=OFF,
WeightX=1.0,WeightY=1.0,WeightZ=1.0
) = {
  sRelOpt = {0.0 - 0.01,-0.34,-0.01 + 0.04};
  //sRelOpt = {0.0,-0.34,-0.01};
};

// Marker on the Right Wrist A
CreateMarkerDriver RRadius (
MarkerName= RRadius,
MarkerPlacement=Right.ShoulderArm.Seg.Hand,
OptX=OFF,OptY=OFF,OptZ=OFF,
WeightX=1.0,WeightY=1.0,WeightZ=1.0
) = {
  sRelOpt = {0.0,-0.07,0.01} + {0.0,0.03,0.0};
};

// Marker on the Right Wrist B
CreateMarkerDriver RUlna (
MarkerName= RUlna,
MarkerPlacement=Right.ShoulderArm.Seg.Hand,
OptX=OFF,OptY=OFF,OptZ=OFF,
WeightX=1.0,WeightY=1.0,WeightZ=1.0
) = {
  sRelOpt = {0.0,0.07,0.01} + {0.0,-0.04,0.0};
};

CreateMarkerDriver RWrist (
MarkerName= RWrist,
MarkerPlacement=Right.ShoulderArm.Seg.Hand,
OptX=OFF,OptY=OFF,OptZ=OFF,
WeightX=1.0,WeightY=1.0,WeightZ=1.0
) = {
  sRelOpt = {-0.01,0.00,0.01} ;
};
#endif

#if BM_ARM_LEFT != OFF
// Marker on the Left Acromio-clavicular joint
CreateMarkerDriver LShoulder (
MarkerName= LShoulder,
MarkerPlacement=Left.ShoulderArm.Seg.Scapula,
OptX=OFF,OptY=OFF,OptZ=OFF,
WeightX=1.0,WeightY=1.0,WeightZ=1.0
) = {
  sRelOpt = {0.03,0.0,-0.04};
//sRelOpt = {0.035,-0.005,-0.04};
};

// Marker on the Left Elbow
CreateMarkerDriver LElbow (
MarkerName= LElbow ,
MarkerPlacement=Left.ShoulderArm.Seg.Humerus,
OptX=OFF,OptY=OFF,OptZ=OFF,
WeightX=1.0,WeightY=1.0,WeightZ=1.0
) = {
  sRelOpt = {0.0 + 0.01,-0.34,-0.01 + 0.04};
 //sRelOpt = {0.0,-0.34,-0.01};
};

// Marker on the Left Wrist A
CreateMarkerDriver LRadius (
MarkerName= LRadius,
MarkerPlacement=Left.ShoulderArm.Seg.Hand,
OptX=OFF,OptY=OFF,OptZ=OFF,
WeightX=1.0,WeightY=1.0,WeightZ=1.0
) = {
  sRelOpt = {0.0,-0.07,0.01} + {0.0,0.03,0.0};
};

// Marker on the Left Wrist B
CreateMarkerDriver LUlna (
MarkerName= LUlna,
MarkerPlacement=Left.ShoulderArm.Seg.Hand,
OptX=OFF,OptY=OFF,OptZ=OFF,
WeightX=1.0,WeightY=1.0,WeightZ=1.0
) = {
  sRelOpt = {0.0,0.07,0.01} + {0.0,-0.04,0.0};
};

CreateMarkerDriver LWrist (
MarkerName= LWrist,
MarkerPlacement=Left.ShoulderArm.Seg.Hand,
OptX=OFF,OptY=OFF,OptZ=OFF,
WeightX=1.0,WeightY=1.0,WeightZ=1.0
) = {
  sRelOpt = {-0.01,0.00,0.01} ;
};
#endif

//#endif
//// EXAMPLE of MarkerProcol file for the plug-in-gait protocol.
//
//#define _LPSI
//#define _RPSI
//#define _RASI
//#define _LASI
//#define _RFHD
//#define _LFHD
//#define _RBHD
//#define _LBHD
//#define _STRN
//#define _CLAV
//#define _T10
//#define _C7
//#define _RTHI
//#define _RKNE
//#define _RTIB
//#define _RANK
//#define _RTOE
//#define _RHEE
//#define _RMT5
//#define _LTHI
//#define _LKNE
//#define _LTIB
//#define _LANK
//#define _LTOE
//#define _LHEE
//#define _LMT5
//
//#if INCLUDE_UPPERBODY == ON
//  #define _RSHO
//  #define _LSHO
//  #define _RUPA
//  #define _LUPA
//  #define _RELB
//  #define _LELB
//  #define _LFRA
//  #define _RFRA
//  #define _RWRA
//  #define _RWRB
//  #define _LWRA
//  #define _LWRB
//  #define _RFIN
//  #define _LFIN
//#endif
