AnyFolder MedialLateralKneeContactForces = {

  // Some references for convenience and less typing.
  #if BM_LEG_RIGHT == ON
  AnyFolder& LegRef = Main.HumanModel.BodyModel.Right.Leg;
  AnyFile FemurSTL = Main.Morphing.RightThigh.TargetSTL;
  #else
  AnyFolder& LegRef = Main.HumanModel.BodyModel.Left.Leg;
  AnyFile FemurSTL = Main.Morphing.LeftThigh.TargetSTL;
  #endif

  AnyFolder& GlobalRef = Main.EnvironmentModel.GlobalRef;

  // We can get the forces/moments in the knee joint by finding the Contraints.Reactions object in the joint.
  // F[0] or F[1] are the same force vector but with different signs. Depends if we want the force femur inserts on tibia or opposite.
  // Here we chose [0] which is the force the shank inserts on the femur.
  AnyVec3 KneeForceInGlobal = LegRef.Jnt.Knee.Constraints.Reaction.RefFrameOutput.F[0];
  AnyVec3 KneeMomentInGlobal = LegRef.Jnt.Knee.Constraints.Reaction.RefFrameOutput.M[0] + LegRef.Jnt.KneeMoments.RefFrameOutput.M[0];

  // We can now express the force and moments in the coordinate system we want.
  AnyVec3 KneeForceInShank = transf3D(KneeForceInGlobal, &GlobalRef, &LegRef.Seg.Shank.KneeJoint);
  AnyVec3 KneeMomentInShank = transf3D(KneeMomentInGlobal, &GlobalRef, &LegRef.Seg.Shank.KneeJoint);

  AnyInt  ArtPointIndices = {11364, 33003}; // specific to this mesh topology
  AnyFloat ArtPoints = STL_Vertices(FemurSTL, ArtPointIndices, 1)*0.001;

  AnyFloat v = (LegRef.Seg.Thigh.PatientNode.KneeJointFit.ARel*{0,0,1}')';
  AnyFloat p0 = LegRef.Seg.Thigh.PatientNode.KneeJointFit.sRel;

  AnyFloat L_medial = abs(sum(mult(p0-ArtPoints[0], v)) / vnorm(v));
  AnyFloat L_lateral = abs(sum(mult(p0-ArtPoints[1], v)) / vnorm(v));

//  LegRef.Seg.Thigh.PatientNode = {
//    AnyDrawSphere MedContact = {Position = Main.Studies.InverseDynamicStudy.AAU_MRI_Output.MedialLateralKneeContactForces.ArtPoints[0]; RGB={1,1,1};ScaleXYZ={1,1,1}*0.0025;};
//    AnyDrawSphere LatContact = {Position = Main.Studies.InverseDynamicStudy.AAU_MRI_Output.MedialLateralKneeContactForces.ArtPoints[1]; RGB={1,1,1}-1;ScaleXYZ={1,1,1}*0.0025;};
//  };


  // Here F_total is the vertical component of the force and M_total is the abbduction moment in the frontal plane.
  AnyVar F_total = KneeForceInShank[1];
  AnyVar M_total = KneeMomentInShank[0];

  // The relationships with the lateral/medial forces can be expressed as:
  //
  //  F_total = F_medial + F_lateral
  //  M_total = F_medial*L_medial - F_lateral*L_lateral (correct for the Right leg, multiply right side by -1 for the Left)
  //
  // From these the F_medial/F_lateral can be found:

  AnyFloat F_lateral = (F_total * L_medial - LegRef.Seg.Shank.Sign * M_total) / (L_lateral + L_medial);
  AnyFloat F_medial = F_total - F_lateral;


  // Finally let us visualize the forces and the knee axis:
  // First we create the nodes at some medial/lateral distance
  // along the knee axis. Inside the nodes we create small
  // vectors representing the forces.

  LegRef.Seg.Shank = {
    AnyRefNode LateralKneeContactNode = {
      AnyVec3 uKneeAxis = {0,0,1}*ARel';
      sRel = .KneeJoint.sRel + .Sign * ....L_lateral *uKneeAxis;
      ARel = .KneeJoint.ARel;
      AnyDrawVector LateralForceVec = {
        // We scale the force so the vector gets a resonable length
        Vec = {0,.....F_lateral, 0}/5000;
        GlobalCoord = Off;
        Line.End.Style = Line3DCapStyleArrow;
      };
    };
    AnyRefNode MedialKneeContactNode = {
      AnyVec3 uKneeAxis = {0,0,1}*.KneeJoint.ARel';
      sRel = .KneeJoint.sRel - .Sign * ....L_medial *uKneeAxis;
      ARel = .KneeJoint.ARel;
      AnyDrawVector MedialForceVec = {
        Vec = {0,.....F_medial, 0}/5000;
        GlobalCoord = Off;
        Line.End.Style = Line3DCapStyleArrow;
      };
    };
    KneeJoint = {
      //          AnyDrawLine DrawKneeJointAxis = {
      //            p0 = {0,0,-0.06};
      //            p1 = {0,0, 0.06};
      //            Line.RGB = 0.1*{1,1,1};
      //            Opacity = 0.3;
      //            GlobalCoord = Off;
      //          };
    };
  };

};
