#define KNEE_MODEL_VERSION "GCK5"
#path USER_PATH_INPUTDATA "./"


//Main.ModelSetup.SubjectSpecificData =
//{
//  #include "./JointFit/DataConfig.any"
//  #include "./Morphing/DataConfig.any"
//
//};

AnyVar Right_Lm = 0.03;
AnyVar Right_Ll = 0.03;

AnyVar Left_Lm = 0.03;
AnyVar Left_Ll = 0.03;

// This sets the Anthropometrics for all trials for this subject
Main.HumanModel.Anthropometrics =
{
  BodyMass = 66.7;
  BodyHeight = 1.68;

  // These antrhopometric data will be used as initial guess for
  // the optimization alogorithm for segment length. Default length
  // based on the subjects' height will be used if these values are obmitted.
  SegmentDimensions =
  {
    PelvisWidth = DesignVar( 0.16); ///< distance between hip joints
    HeadHeight = DesignVar( 0.14);///< height in neutral position from  C1HatNode to top of head
    TrunkHeight = DesignVar( 0.594);///< height in neautral position from  C1HatNode to L5SacrumJnt

    Right =
    {
      UpperArmLength = DesignVar(0.286);
      LowerArmLength = DesignVar(0.235);
      HandLength = DesignVar(0.182);
      HandBreadth = DesignVar(0.085);
      ThighLength = DesignVar(0.41);
      ShankLength = DesignVar(0.40);
      FootLength = DesignVar(0.258);
    };
    Left =
    {
       UpperArmLength = DesignVar(0.286);
       LowerArmLength = DesignVar(0.235);
       HandLength = DesignVar(0.182);
       HandBreadth = DesignVar(0.085);
       ThighLength = DesignVar(0.41);
       ShankLength = DesignVar(0.40);
       FootLength = DesignVar(0.258);
    };
  };
};

#define DEF_CUSTOM_SCALING_LEVEL_RIGHT_THIGH "RBF"
#define DEF_CUSTOM_SCALING_LEVEL_LEFT_THIGH "RBF"
#define DEF_CUSTOM_SCALING_LEVEL_RIGHT_SHANK "STL"
#define DEF_CUSTOM_SCALING_LEVEL_LEFT_SHANK "STL"
#define DEF_CUSTOM_SCALING_LEVEL_RIGHT_PATELLA "STL"
#define DEF_CUSTOM_SCALING_LEVEL_LEFT_PATELLA "STL"

#define DEF_CUSTOM_SCALING_PATELLA_TENDON_LENGTH 0.060

#define DEF_MUS_STRENGTH_SCALE_KNEE_FLEXION_RIGHT 0.50
#define DEF_MUS_STRENGTH_SCALE_KNEE_EXTENSION_RIGHT 0.50

#define DEF_MUS_STRENGTH_SCALE_KNEE_FLEXION_LEFT 1.0
#define DEF_MUS_STRENGTH_SCALE_KNEE_EXTENSION_LEFT 1.0

#define DEF_MUS_STRENGTH_SCALE_GASTROCNEMIUS_RIGHT 0.35
#define DEF_MUS_STRENGTH_SCALE_GASTROCNEMIUS_LEFT 0.35

#define DEF_CUSTOM_KNEE_JOINT_CONTACT_INIT_OFFSET 0.0000

//// This sets load time arm positions for all trials for this subject.
//Main.HumanModel.Mannequin.Posture =
//{
//  Left =
//  {
//    GlenohumeralFlexion = 30;
//    GlenohumeralAbduction =  0;
//    GlenohumeralExternalRotation =  -65;
//    ElbowFlexion =  120;
//    ElbowPronation =  0;
//    WristFlexion =  0;
//    WristAbduction =  0;
//
//  };
//
//  Right =
//  {
//    GlenohumeralFlexion =  30;
//    GlenohumeralAbduction =  0;
//    GlenohumeralExternalRotation =  -70;
//    ElbowFlexion = 120;
//    ElbowPronation =  0;
//    WristFlexion =  0;
//    WristAbduction = 0;
//  };
//
//
//};
