#include "..\..\..\..\..\..\libdef.any"

// Enter and edit Trial Specific Data in this file:
#path MOCAP_TRIAL_SPECIFIC_DATA "TrialSpecificData.any"

// Enter and edit Subject-Spcific Data in this file:
#path MOCAP_SUBJECT_SPECIFIC_DATA "..\..\SubjectSpecificData.any"

// Enter and edit Lab-Specific Data in this file:
#path MOCAP_LAB_SPECIFIC_DATA "..\..\..\..\Lab\LabSpecificData.any"

#define BM_JOINT_TYPE_ANKLE_RIGHT  _JOINT_TYPE_DEFAULT_
#define BM_JOINT_TYPE_ANKLE_LEFT  _JOINT_TYPE_DEFAULT_

// Include the AnyMoCap Framwork
#include "<ANYMOCAP_MODEL>"

#include "<GRANDCHALLENGE_MODEL>"

//#include "<TESTING>/DisplaySubjectGeometries.any"
