 // ----------------------------------------------------------
// Model configuration:
// For more info on body model configuration options please load the model and double click on:
// #include "<ANYBODY_PATH_BODY>\Documentation\BodyModel.parameters.any"
// ----------------------------------------------------------
Main = {

  #define BM_SCALING _SCALING_XYZ_
  #define BM_MANNEQUIN_DRIVER_DEFAULT OFF

  #ifndef BM_LEG_MODEL
  #define BM_LEG_MODEL _LEG_MODEL_TLEM2_
  #endif

  #if INCLUDE_UPPERBODY == ON
    #ifndef BM_TRUNK_NECK_MUSCLES
      #define BM_TRUNK_NECK_MUSCLES OFF
    #endif
    #ifndef BM_TRUNK_MUSCLES
      #define BM_TRUNK_MUSCLES OFF
    #endif
    #ifndef BM_ARM_MUSCLES_BOTH
      #define BM_ARM_MUSCLES_BOTH OFF
    #endif
    #ifndef BM_ARM_RIGHT
      #define BM_ARM_RIGHT ON
    #endif
    #ifndef BM_ARM_LEFT
      #define BM_ARM_LEFT ON
    #endif
    #ifndef BM_LEG_MUSCLES_LEFT
      #define BM_LEG_MUSCLES_LEFT ON
    #endif
    #ifndef BM_LEG_MUSCLES_RIGHT
     #define BM_LEG_MUSCLES_RIGHT ON
    #endif
    #ifndef BM_LEG_LEFT
      #define BM_LEG_LEFT ON
    #endif
    #ifndef BM_LEG_RIGHT
      #define BM_LEG_RIGHT ON
    #endif
  #else
    #ifndef BM_TRUNK_NECK_MUSCLES
      #define BM_TRUNK_NECK_MUSCLES ON
    #endif
    #ifndef BM_TRUNK_MUSCLES
      #define BM_TRUNK_MUSCLES ON
    #endif
    #ifndef BM_ARM_MUSCLES_BOTH
      #define BM_ARM_MUSCLES_BOTH OFF
    #endif
    #ifndef BM_ARM_RIGHT
      #define BM_ARM_RIGHT OFF
    #endif
    #ifndef BM_ARM_LEFT
      #define BM_ARM_LEFT OFF
    #endif
    #ifndef BM_LEG_MUSCLES_LEFT
      #define BM_LEG_MUSCLES_LEFT ON
    #endif
    #ifndef BM_LEG_MUSCLES_RIGHT
     #define BM_LEG_MUSCLES_RIGHT ON
    #endif
    #ifndef BM_LEG_LEFT
      #define BM_LEG_LEFT ON
      //#define BM_LEG_LEFT OFF
    #endif
    #ifndef BM_LEG_RIGHT
      #define BM_LEG_RIGHT OFF
    #endif
  #endif

#define BM_JOINT_TYPE_PATELLOFEMORAL_RIGHT _JOINT_TYPE_USERDEFINED_
#define BM_JOINT_TYPE_PATELLOFEMORAL_LEFT _JOINT_TYPE_USERDEFINED_
#define BM_JOINT_TYPE_KNEE_RIGHT _JOINT_TYPE_USERDEFINED_
#define BM_JOINT_TYPE_KNEE_LEFT _JOINT_TYPE_USERDEFINED_
#define BM_JOINT_TYPE_HIP_RIGHT _JOINT_TYPE_USERDEFINED_
#define BM_JOINT_TYPE_HIP_LEFT _JOINT_TYPE_USERDEFINED_

 #define BM_JOINT_TYPE_ANKLE_RIGHT  _JOINT_TYPE_DEFAULT_
 #define BM_JOINT_TYPE_ANKLE_LEFT  _JOINT_TYPE_DEFAULT_
  // Default Settings
#include "<USER_PATH_COMMONS>\Settings_Default.any"

//#include "Settings_Default.GCK5.any"

};
