// Filenames of boney surfaces used for scaling
//AnyFile SurfPelvis = "Target/Patella_target_R.stl";
#ifndef TARGET_DATA
  #path TARGET_DATA "<USER_PATH_INPUTDATA>/Morphing/Target/"
#endif

AnyFile SourceLandmarkPelvisRFileName = LAB_CONFIG_PATH+"./Morphing/STL/Bone/Source/TLEM2_Pelvis_picked_points.pp";
AnyFile SourceLandmarkFemurRFileName = LAB_CONFIG_PATH+"./Morphing/STL/Bone/Source/TLEM2_femur_picked_points.pp";
AnyFile SourceLandmarkTibiaRFileName = LAB_CONFIG_PATH+"./Morphing/STL/Bone/Source/TLEM2_tibia_picked_points.pp";
AnyFile SourceLandmarkPatellaRFileName = LAB_CONFIG_PATH+"./Morphing/STL/Bone/Source/TLEM2_patella_picked_points.pp";

AnyFile SurfTalusRFileName   = TARGET_DATA + "TalusR.stl";
AnyFile SurfPelvisLFileName  = TARGET_DATA + "PelvisL.stl";
AnyFile SurfFemurLFileName   = TARGET_DATA + "FemurL.stl";
AnyFile SurfTibiaLFileName   = TARGET_DATA + "TibiaL.stl";
AnyFile SurfPatellaLFileName = TARGET_DATA + "PatellaL.stl";
AnyFile SurfTalusLFileName   = TARGET_DATA + "TalusL.stl";


#define _READ_PP_LANDMARKS(LANDMARK_OBJECT, READER_OBJECT, SURF_FILE_OBJECT, MIRROR)\
    AnyInputXML READER_OBJECT =\
    {\
      FileName = SURF_FILE_OBJECT;\
      AnyFloat xptr0 = Obj2Num(ObjSelect("Contents.PickedPoints.point*.active", "==1", ".x_*"));\
      AnyFloat yptr0 = Obj2Num(ObjSelect("Contents.PickedPoints.point*.active", "==1", ".y_*"));\
      AnyFloat zptr0 = Obj2Num(ObjSelect("Contents.PickedPoints.point*.active", "==1", ".z_*"));\
      AnyString PointNames = Obj2Str(ObjSelect("Contents.PickedPoints.point*.active", "==1", ".name")) ;\
    };\
    LANDMARK_OBJECT = {READER_OBJECT.xptr0',READER_OBJECT.yptr0',READER_OBJECT.zptr0'}'* {{1,0,0},{0,1,0},{0,0,MIRROR}}


#define _EXTRACT_LANDMARKS(LANDMARK_OBJECT, SURF_HANDLE, SURF_FILE_OBJECT, LANDMARK_NUMBER, MIRROR)\
    AnyIntVar LandmarkNumber##_##SURF_HANDLE = LANDMARK_NUMBER;\
    AnyFileVar SURF_HANDLE = SURF_FILE_OBJECT;\
    AnyInt NumPoints_##SURF_HANDLE = STL_Size(SURF_HANDLE, 1)[0];\
    LANDMARK_OBJECT = STL_Vertices(SURF_HANDLE, iarr(0, floor((NumPoints_##SURF_HANDLE)/LandmarkNumber##_##SURF_HANDLE), (NumPoints_##SURF_HANDLE) - 1), 1)*0.001 * {{1,0,0},{0,1,0},{0,0,MIRROR}}

#define _EXTRACT_LANDMARKS_PELVIS(LANDMARK_OBJECT, SURF_HANDLE, SURF_FILE_OBJECT, LANDMARK_NUMBER, MIRROR)\
    AnyIntVar LandmarkNumber##_##SURF_HANDLE = LANDMARK_NUMBER;\
    AnyFileVar SURF_HANDLE = SURF_FILE_OBJECT;\
    AnyInt NumPoints_##SURF_HANDLE = STL_Size(SURF_HANDLE, 1)[0];\
    AnyFloat LANDMARK_OBJECT = STL_Vertices(SURF_HANDLE, iarr(0, floor((NumPoints_##SURF_HANDLE)/LandmarkNumber##_##SURF_HANDLE), (NumPoints_##SURF_HANDLE) - 1), 1)*0.001 * {{1,0,0},{0,1,0},{0,0,MIRROR}}

// This section is for configuring landmarks or surfaces used for scaling. We open morphing function objects and overwrite landmarks of the class template
Main.Morphing = {

//      Pelvis = {
//        _EXTRACT_LANDMARKS_PELVIS(SourceLandmarksR, SourceSTLR, Main.Morphing.SourceData.SurfPelvisRFileName, Main.Morphing.Settings.LandmarkNumber, 1);
//        _EXTRACT_LANDMARKS_PELVIS(SourceLandmarksL, SourceSTLL, Main.Morphing.SourceData.SurfPelvisLFileName, Main.Morphing.Settings.LandmarkNumber, 1);
//
//        _EXTRACT_LANDMARKS_PELVIS(TargetLandmarksR, TargetSTLR, Main.ModelSetup.SubjectSpecificData.SurfPelvisRFileName, Main.Morphing.Settings.LandmarkNumber, 1);
//        _EXTRACT_LANDMARKS_PELVIS(TargetLandmarksL, TargetSTLL, Main.ModelSetup.SubjectSpecificData.SurfPelvisLFileName, Main.Morphing.Settings.LandmarkNumber, 1);
//
//        AnyInt test1 = assert(
//          eqfun(
//            STL_Size(Main.Morphing.SourceData.SurfPelvisRFileName, 1)[0],
//            STL_Size(Main.ModelSetup.SubjectSpecificData.SurfPelvisRFileName, 1)[0]),
//            "Source and target files do not have the same number of vertices: pelvis R"
//          );
//        AnyInt test2 = assert(
//          eqfun(
//            STL_Size(Main.Morphing.SourceData.SurfPelvisLFileName, 1)[0],
//            STL_Size(Main.ModelSetup.SubjectSpecificData.SurfPelvisLFileName, 1)[0]),
//            "Source and target files do not have the same number of vertices: pelvis L"
//          );
//
//        SourceLandmarks = arrcat(SourceLandmarksR, SourceLandmarksL);
//        TargetLandmarks = arrcat(TargetLandmarksR, TargetLandmarksL);
//      };


      #if BM_LEG_RIGHT != OFF

      RightThigh = {
        _READ_PP_LANDMARKS(SourceLandmarks, XMLObjectSource, Main.ModelSetup.SubjectSpecificData.SourceLandmarkFemurRFileName, 1);
        _READ_PP_LANDMARKS(TargetLandmarks, XMLObjectTarget, Main.ModelSetup.SubjectSpecificData.TargetLandmarkFemurRFileName, 1);

        AnyInt test = assert(
          eqfun(
            SizesOf(SourceLandmarks)[0],
            SizesOf(TargetLandmarks)[0]),
            "Source and target files do not have the same number of vertices: femur R"
          );
        //SourceLandmarks from XML

        //_EXTRACT_LANDMARKS(SourceLandmarks, SourceSTL, Main.Morphing.SourceData.SurfFemurFileName, Main.Morphing.Settings.LandmarkNumber, 1);
        //_EXTRACT_LANDMARKS(TargetLandmarks, TargetSTL, Main.ModelSetup.SubjectSpecificData.SurfFemurRFileName, Main.Morphing.Settings.LandmarkNumber, 1);
      };

      RightShank = {
        _READ_PP_LANDMARKS(SourceLandmarks, XMLObjectSource, Main.ModelSetup.SubjectSpecificData.SourceLandmarkTibiaRFileName, 1);
        _READ_PP_LANDMARKS(TargetLandmarks, XMLObjectTarget, Main.ModelSetup.SubjectSpecificData.TargetLandmarkTibiaRFileName, 1);

        AnyInt test = assert(
          eqfun(
            SizesOf(SourceLandmarks)[0],
            SizesOf(TargetLandmarks)[0]),
            "Source and target files do not have the same number of vertices: tibia R"
          );

//        _EXTRACT_LANDMARKS(SourceLandmarks, SourceSTL, Main.Morphing.SourceData.SurfTibiaFileName, Main.Morphing.Settings.LandmarkNumber, 1);
//        _EXTRACT_LANDMARKS(TargetLandmarks, TargetSTL, Main.ModelSetup.SubjectSpecificData.SurfTibiaRFileName, Main.Morphing.Settings.LandmarkNumber, 1);
      };

      RightPatella = {
        _READ_PP_LANDMARKS(SourceLandmarks, XMLObjectSource, Main.ModelSetup.SubjectSpecificData.SourceLandmarkPatellaRFileName, 1);
        _READ_PP_LANDMARKS(TargetLandmarks, XMLObjectTarget, Main.ModelSetup.SubjectSpecificData.TargetLandmarkPatellaRFileName, 1);

        AnyInt test = assert(
          eqfun(
            SizesOf(SourceLandmarks)[0],
            SizesOf(TargetLandmarks)[0]),
            "Source and target files do not have the same number of vertices: patella R"
          );
//        _EXTRACT_LANDMARKS(SourceLandmarks, SourceSTL, Main.Morphing.SourceData.SurfPatellaFileName, Main.Morphing.Settings.LandmarkNumber, 1);
//        _EXTRACT_LANDMARKS(TargetLandmarks, TargetSTL, Main.ModelSetup.SubjectSpecificData.SurfPatellaRFileName, Main.Morphing.Settings.LandmarkNumber, 1);
      };
//       #ifdef _override_scaling_for_Right_Patella
//       AnyFunTransform3DLin ScalePatella = {
//         //pfjoint_ptcl.PointNames = Obj2Str(&femoral_pf_vertices);
//         AnyInt ap_pf_vertices = {13728,13797};
//         AnyFloat ap_pf_points = STL_Vertices(Main.Morphing.SourceData.SurfFemurFileName, ap_pf_vertices, 1);  // two points around saddle peak of AP cartilage
//         AnyFloat ScaleFactor = (Main.HumanModel.BodyModel.Right.Leg.Segments.Thigh.PatientNode.PatellaFemoralJointFit.Radius+0.005) / // fitted radius and cartilage assumption
//           abs(vnorm(Main.HumanModel.BodyModel.Right.Leg.ModelParameters.Thigh.PatellaFemurJoint - 0.001*mean(ap_pf_points')));
//
//
//         ScaleMat=eye(3)*ScaleFactor;
//         Offset={0,0,0};
//       };
//       Main.HumanModel.Scaling.GeometricalScaling.Right.Patella.ScaleFunction.Custom = &ScalePatella;
//
//       #endif
      #endif

      #if BM_LEG_LEFT != OFF

      LeftThigh = {
        _READ_PP_LANDMARKS(SourceLandmarks, XMLObjectSource, Main.ModelSetup.SubjectSpecificData.SourceLandmarkFemurRFileName, -1);
        _READ_PP_LANDMARKS(TargetLandmarks, XMLObjectTarget, Main.ModelSetup.SubjectSpecificData.TargetLandmarkFemurRFileName, -1);

        AnyInt test = assert(
          eqfun(
            SizesOf(SourceLandmarks)[0],
            SizesOf(TargetLandmarks)[0]),
            "Source and target files do not have the same number of vertices: femur L"
          );

//        _EXTRACT_LANDMARKS(SourceLandmarks, SourceSTL, Main.Morphing.SourceData.SurfFemurFileName, Main.Morphing.Settings.LandmarkNumber, -1);
//        _EXTRACT_LANDMARKS(TargetLandmarks, TargetSTL, Main.ModelSetup.SubjectSpecificData.SurfFemurLFileName, Main.Morphing.Settings.LandmarkNumber, 1);
      };

      LeftShank = {
        _READ_PP_LANDMARKS(SourceLandmarks, XMLObjectSource, Main.ModelSetup.SubjectSpecificData.SourceLandmarkTibiaRFileName, -1);
        _READ_PP_LANDMARKS(TargetLandmarks, XMLObjectTarget, Main.ModelSetup.SubjectSpecificData.TargetLandmarkTibiaRFileName, -1);

        AnyInt test = assert(
          eqfun(
            SizesOf(SourceLandmarks)[0],
            SizesOf(TargetLandmarks)[0]),
            "Source and target files do not have the same number of vertices: tibia L"
          );

//        _EXTRACT_LANDMARKS(SourceLandmarks, SourceSTL, Main.Morphing.SourceData.SurfTibiaFileName, Main.Morphing.Settings.LandmarkNumber, -1);
//        _EXTRACT_LANDMARKS(TargetLandmarks, TargetSTL, Main.ModelSetup.SubjectSpecificData.SurfTibiaLFileName, Main.Morphing.Settings.LandmarkNumber, 1);
      };
      LeftPatella = {
        _READ_PP_LANDMARKS(SourceLandmarks, XMLObjectSource, Main.ModelSetup.SubjectSpecificData.SourceLandmarkPatellaRFileName, -1);
        _READ_PP_LANDMARKS(TargetLandmarks, XMLObjectTarget, Main.ModelSetup.SubjectSpecificData.TargetLandmarkPatellaRFileName, -1);

        AnyInt test = assert(
          eqfun(
            SizesOf(SourceLandmarks)[0],
            SizesOf(TargetLandmarks)[0]),
            "Source and target files do not have the same number of vertices: patella L"
          );
//        _EXTRACT_LANDMARKS(SourceLandmarks, SourceSTL, Main.Morphing.SourceData.SurfPatellaFileName, Main.Morphing.Settings.LandmarkNumber, -1);
//        _EXTRACT_LANDMARKS(TargetLandmarks, TargetSTL, Main.ModelSetup.SubjectSpecificData.SurfPatellaLFileName, Main.Morphing.Settings.LandmarkNumber, 1);
      };

//       #ifdef _override_scaling_for_Left_Patella
//       AnyFunTransform3DLin ScalePatella = {
//         //pfjoint_ptcl.PointNames = Obj2Str(&femoral_pf_vertices);
//         AnyInt ap_pf_vertices = {13728,13797};
//         AnyFloat ap_pf_points = STL_Vertices(Main.Morphing.SourceData.SurfFemurFileName, ap_pf_vertices, 1)*{{1,0,0}, {0,1,0},{0,0,-1}} ;  // two points around saddle peak of AP cartilage
//         AnyFloat ScaleFactor = (Main.HumanModel.BodyModel.Left.Leg.Segments.Thigh.PatientNode.PatellaFemoralJointFit.Radius+0.005) / // fitted radius and cartilage assumption
//           abs(vnorm(Main.HumanModel.BodyModel.Left.Leg.ModelParameters.Thigh.PatellaFemurJoint - 0.001*mean(ap_pf_points')));
//
//
//         ScaleMat=eye(3)*ScaleFactor;
//         Offset={0,0,0};
//       };
//       Main.HumanModel.Scaling.GeometricalScaling.Left.Patella.ScaleFunction.Custom = &ScalePatella;
//
//       #endif
      #endif
};
#if BM_LEG_LEFT != OFF
AnyFolder &LeftThigh = Main.HumanModel.BodyModel.Left.Leg.Segments.Thigh.PatientNode;
AnyFolder &LeftShank = Main.HumanModel.BodyModel.Left.Leg.Segments.Shank.PatientNode;
AnyFolder &LeftPatella = Main.HumanModel.BodyModel.Left.Leg.Segments.Patella.PatientNode;
#endif

#if BM_LEG_RIGHT != OFF
AnyFolder &RightThigh = Main.HumanModel.BodyModel.Right.Leg.Segments.Thigh.PatientNode;
AnyFolder &RightShank = Main.HumanModel.BodyModel.Right.Leg.Segments.Shank.PatientNode;
AnyFolder &RightPatella = Main.HumanModel.BodyModel.Right.Leg.Segments.Patella.PatientNode;
#endif

//AnyFolder &Pelvis = Main.HumanModel.BodyModel.Trunk.SegmentsLumbar.PelvisSeg.PatientNode;
//
//Pelvis = {
//  AnyDrawSurf SurfR = {
//    FileName = ..SurfPelvisRFileName;
//    ScaleXYZ={1,1,1}*0.001;
//  };
//  AnyDrawSurf SurfL = {
//    FileName = ..SurfPelvisLFileName;
//    ScaleXYZ={1,1,1}*0.001;
//  };
//};

#if BM_LEG_LEFT != OFF

LeftShank = {
  AnyDrawSurf Surf = {
    FileName = ..SurfTibiaRFileName;
    ScaleXYZ={1,1,-1};
  };
};
LeftThigh = {
  AnyDrawSurf Surf = {
    FileName = ..SurfFemurRFileName;
    ScaleXYZ={1,1,-1};
  };
};
LeftPatella = {
  AnyDrawSurf Surf = {
    FileName = ..SurfPatellaRFileName;
    ScaleXYZ={1,1,-1};
  };
};
#endif

#if BM_LEG_RIGHT != OFF
RightShank = {
  AnyDrawSurf Surf = {
    FileName = ..SurfTibiaRFileName;
    ScaleXYZ={1,1,1};
  };
  AnySurfSTL TibiaSurfObj = {
    FileName = ..SurfTibiaRFileName;
    ScaleXYZ={1,1,1};
  };
};
RightThigh = {
  AnyDrawSurf Surf = {
    FileName = ..SurfFemurRFileName;
    ScaleXYZ={1,1,1};
  };
};
RightPatella = {
  AnyDrawSurf Surf= {
    FileName = ..SurfPatellaRFileName;
    ScaleXYZ={1,1,1};
  };
};
#endif
//  AnyDrawPointCloud VisualizeLandmarks = {
//    Points = Main.Morphing.LeftThigh.TargetLandmarks;
//    RGB = {1, 0, 0};
//    Opacity = 0.5;
//    PointStyle.Size = 0.005;
//    Points3D = On;
//    ShowNames = Off;
//  };
