// Filenames of boney surfaces used for scaling
//AnyFile SurfPelvis = "Target/Patella_target_R.stl";

AnyFile SurfPelvisRFileName = USER_PATH_INPUTDATA+"./Morphing/Target/PelvisR.stl";
AnyFile SurfFemurRFileName = USER_PATH_INPUTDATA+"./Morphing/Target/Femur_target.stl";
AnyFile SurfTibiaRFileName ??= USER_PATH_INPUTDATA+"./Morphing/Target/Tibia_target.stl";
AnyFile SurfTibiaFibulaRFileName ??= USER_PATH_INPUTDATA+"./Morphing/Target/Tibiafibula_target.stl";
AnyFile SurfPatellaRFileName = USER_PATH_INPUTDATA+"./Morphing/Target/Patella_target.stl";
AnyFile SurfTalusRFileName = USER_PATH_INPUTDATA+"./Morphing/Target/TalusR.stl";

AnyFile SurfPelvisLFileName = USER_PATH_INPUTDATA+"./Morphing/Target/PelvisL.stl";

AnyFile SurfFemurLFileName = USER_PATH_INPUTDATA+"./Morphing/Target/Femur_target.stl";
AnyFile SurfTibiaLFileName = USER_PATH_INPUTDATA+"./Morphing/Target/Tibia_target.stl";
AnyFile SurfPatellaLFileName = USER_PATH_INPUTDATA+"./Morphing/Target/Patella_target.stl";
AnyFile SurfTibiaFibulaLFileName ??= USER_PATH_INPUTDATA+"./Morphing/Target/Tibiafibula_target.stl";
AnyFile SurfTalusLFileName = USER_PATH_INPUTDATA+"./Morphing/Target/TalusL.stl";


#define _EXTRACT_LANDMARKS(LANDMARK_OBJECT, SURF_HANDLE, SURF_FILE_OBJECT, LANDMARK_NUMBER, MIRROR)\
    AnyIntVar LandmarkNumber##_##SURF_HANDLE = LANDMARK_NUMBER;\
    AnyFileVar SURF_HANDLE = SURF_FILE_OBJECT;\
    AnyInt NumPoints_##SURF_HANDLE = STL_Size(SURF_HANDLE, 1)[0];\
    LANDMARK_OBJECT = STL_Vertices(SURF_HANDLE, iarr(0, floor((NumPoints_##SURF_HANDLE)/LandmarkNumber##_##SURF_HANDLE), (NumPoints_##SURF_HANDLE) - 1), 1)*0.001 * {{1,0,0},{0,1,0},{0,0,MIRROR}}

#define _EXTRACT_LANDMARKS_PELVIS(LANDMARK_OBJECT, SURF_HANDLE, SURF_FILE_OBJECT, LANDMARK_NUMBER, MIRROR)\
    AnyIntVar LandmarkNumber##_##SURF_HANDLE = LANDMARK_NUMBER;\
    AnyFileVar SURF_HANDLE = SURF_FILE_OBJECT;\
    AnyInt NumPoints_##SURF_HANDLE = STL_Size(SURF_HANDLE, 1)[0];\
    AnyFloat LANDMARK_OBJECT = STL_Vertices(SURF_HANDLE, iarr(0, floor((NumPoints_##SURF_HANDLE)/LandmarkNumber##_##SURF_HANDLE), (NumPoints_##SURF_HANDLE) - 1), 1)*0.001 * {{1,0,0},{0,1,0},{0,0,MIRROR}}


// This section is for configuring landmarks or surfaces used for scaling. We open morphing function objects and overwrite landmarks of the class template
Main.Morphing = {

//      Pelvis = {
//        _EXTRACT_LANDMARKS_PELVIS(SourceLandmarksR, SourceSTLR, Main.Morphing.SourceData.SurfPelvisRFileName, Main.Morphing.Settings.LandmarkNumber, 1);
//        _EXTRACT_LANDMARKS_PELVIS(SourceLandmarksL, SourceSTLL, Main.Morphing.SourceData.SurfPelvisLFileName, Main.Morphing.Settings.LandmarkNumber, 1);
//
//        _EXTRACT_LANDMARKS_PELVIS(TargetLandmarksR, TargetSTLR, Main.ModelSetup.SubjectSpecificData.SurfPelvisRFileName, Main.Morphing.Settings.LandmarkNumber, 1);
//        _EXTRACT_LANDMARKS_PELVIS(TargetLandmarksL, TargetSTLL, Main.ModelSetup.SubjectSpecificData.SurfPelvisLFileName, Main.Morphing.Settings.LandmarkNumber, 1);
//
//        AnyInt test1 = assert(
//          eqfun(
//            STL_Size(Main.Morphing.SourceData.SurfPelvisRFileName, 1)[0],
//            STL_Size(Main.ModelSetup.SubjectSpecificData.SurfPelvisRFileName, 1)[0]),
//            "Source and target files do not have the same number of vertices: pelvis R"
//          );
//        AnyInt test2 = assert(
//          eqfun(
//            STL_Size(Main.Morphing.SourceData.SurfPelvisLFileName, 1)[0],
//            STL_Size(Main.ModelSetup.SubjectSpecificData.SurfPelvisLFileName, 1)[0]),
//            "Source and target files do not have the same number of vertices: pelvis L"
//          );
//
//        SourceLandmarks = arrcat(SourceLandmarksR, SourceLandmarksL);
//        TargetLandmarks = arrcat(TargetLandmarksR, TargetLandmarksL);
//      };
//

      #if BM_LEG_RIGHT != OFF

      RightThigh = {
        AnyInt test = assert(
          eqfun(
            STL_Size(Main.Morphing.SourceData.SurfFemurFileName, 1)[0],
            STL_Size(Main.ModelSetup.SubjectSpecificData.SurfFemurRFileName, 1)[0]),
            "Source and target files do not have the same number of vertices: femur R"
          );

        _EXTRACT_LANDMARKS(SourceLandmarks, SourceSTL, Main.Morphing.SourceData.SurfFemurFileName, Main.Morphing.Settings.LandmarkNumber, 1);
        _EXTRACT_LANDMARKS(TargetLandmarks, TargetSTL, Main.ModelSetup.SubjectSpecificData.SurfFemurRFileName, Main.Morphing.Settings.LandmarkNumber, 1);
      };

      RightShank = {
        AnyInt test = assert(
          eqfun(
            STL_Size(Main.Morphing.SourceData.SurfTibiaFileName, 1)[0],
            STL_Size(Main.ModelSetup.SubjectSpecificData.SurfTibiaRFileName, 1)[0]),
            "Source and target files do not have the same number of vertices: tibia R"
          );

        _EXTRACT_LANDMARKS(SourceLandmarks, SourceSTL, Main.Morphing.SourceData.SurfTibiaFileName, Main.Morphing.Settings.LandmarkNumber, 1);
        _EXTRACT_LANDMARKS(TargetLandmarks, TargetSTL, Main.ModelSetup.SubjectSpecificData.SurfTibiaRFileName, Main.Morphing.Settings.LandmarkNumber, 1);
      };

       #ifdef _override_scaling_for_Right_Patella
       //#ifndef _override_scaling_for_Right_Patella
       AnyFunTransform3DLin ScalePatellaR = {
         //pfjoint_ptcl.PointNames = Obj2Str(&femoral_pf_vertices);
         AnyInt ap_pf_vertices = {13728,13797};
         AnyFloat ap_pf_points = STL_Vertices(Main.Morphing.SourceData.SurfFemurFileName, ap_pf_vertices, 1);  // two points around saddle peak of AP cartilage
         AnyFloat ScaleFactor = (Main.HumanModel.BodyModel.Right.Leg.Segments.Thigh.PatientNode.PatellaFemoralJointFit.Radius+0.005) / // fitted radius and cartilage assumption
           abs(vnorm(Main.HumanModel.BodyModel.Right.Leg.ModelParameters.Thigh.PatellaFemurJoint - 0.001*mean(ap_pf_points')));


         ScaleMat=eye(3)*ScaleFactor;
         Offset={0,0,0};
       };
       Main.HumanModel.Scaling.GeometricalScaling.Right.Patella.ScaleFunction.Custom = &ScalePatellaR;
       #else
        RightPatella = {
          AnyInt test = assert(
            eqfun(
              STL_Size(Main.Morphing.SourceData.SurfPatellaFileName, 1)[0],
              STL_Size(Main.ModelSetup.SubjectSpecificData.SurfPatellaRFileName, 1)[0]),
              "Source and target files do not have the same number of vertices: patella R"
            );
          _EXTRACT_LANDMARKS(SourceLandmarks, SourceSTL, Main.Morphing.SourceData.SurfPatellaFileName, Main.Morphing.Settings.LandmarkNumber, 1);
          _EXTRACT_LANDMARKS(TargetLandmarks, TargetSTL, Main.ModelSetup.SubjectSpecificData.SurfPatellaRFileName, Main.Morphing.Settings.LandmarkNumber, 1);
        };
       #endif
      #endif

      #if BM_LEG_LEFT != OFF

      LeftThigh = {
        AnyInt test = assert(
          eqfun(
            STL_Size(Main.Morphing.SourceData.SurfFemurFileName, 1)[0],
            STL_Size(Main.ModelSetup.SubjectSpecificData.SurfFemurLFileName, 1)[0]),
            "Source and target files do not have the same number of vertices: femur L"
          );

        _EXTRACT_LANDMARKS(SourceLandmarks, SourceSTL, Main.Morphing.SourceData.SurfFemurFileName, Main.Morphing.Settings.LandmarkNumber, -1);
        _EXTRACT_LANDMARKS(TargetLandmarks, TargetSTL, Main.ModelSetup.SubjectSpecificData.SurfFemurRFileName, Main.Morphing.Settings.LandmarkNumber, -1);
      };

      LeftShank = {
        AnyInt test = assert(
          eqfun(
            STL_Size(Main.Morphing.SourceData.SurfTibiaFileName, 1)[0],
            STL_Size(Main.ModelSetup.SubjectSpecificData.SurfTibiaRFileName, 1)[0]),
            "Source and target files do not have the same number of vertices: tibia L"
          );

        _EXTRACT_LANDMARKS(SourceLandmarks, SourceSTL, Main.Morphing.SourceData.SurfTibiaFileName, Main.Morphing.Settings.LandmarkNumber, -1);
        _EXTRACT_LANDMARKS(TargetLandmarks, TargetSTL, Main.ModelSetup.SubjectSpecificData.SurfTibiaRFileName, Main.Morphing.Settings.LandmarkNumber, -1);
      };

       //#ifndef _override_scaling_for_Left_Patella
       #ifdef _override_scaling_for_Left_Patella
        AnyFunTransform3DLin ScalePatellaL = {
         //pfjoint_ptcl.PointNames = Obj2Str(&femoral_pf_vertices);
         AnyInt ap_pf_vertices = {13728,13797};
         AnyFloat ap_pf_points = STL_Vertices(Main.Morphing.SourceData.SurfFemurFileName, ap_pf_vertices, 1)*{{1,0,0}, {0,1,0},{0,0,-1}} ;  // two points around saddle peak of AP cartilage
         AnyFloat ScaleFactor = (Main.HumanModel.BodyModel.Left.Leg.Segments.Thigh.PatientNode.PatellaFemoralJointFit.Radius+0.005) / // fitted radius and cartilage assumption
           abs(vnorm(Main.HumanModel.BodyModel.Left.Leg.ModelParameters.Thigh.PatellaFemurJoint - 0.001*mean(ap_pf_points')));


         ScaleMat=eye(3)*ScaleFactor;
         Offset={0,0,0};
       };
       Main.HumanModel.Scaling.GeometricalScaling.Left.Patella.ScaleFunction.Custom = &ScalePatellaL;
       #else
        LeftPatella = {
          AnyInt test = assert(
            eqfun(
              STL_Size(Main.Morphing.SourceData.SurfPatellaFileName, 1)[0],
              STL_Size(Main.ModelSetup.SubjectSpecificData.SurfPatellaLFileName, 1)[0]),
              "Source and target files do not have the same number of vertices: patella L"
            );
          _EXTRACT_LANDMARKS(SourceLandmarks, SourceSTL, Main.Morphing.SourceData.SurfPatellaFileName, Main.Morphing.Settings.LandmarkNumber, -1);
          _EXTRACT_LANDMARKS(TargetLandmarks, TargetSTL, Main.ModelSetup.SubjectSpecificData.SurfPatellaLFileName, Main.Morphing.Settings.LandmarkNumber, -1);
        };

       #endif
      #endif
};

AnyFolder &Pelvis = Main.HumanModel.BodyModel.Trunk.Segments.PelvisSeg.PatientNode;

//Pelvis = {
//  AnyDrawSurf SurfR = {
//    FileName = ..SurfPelvisRFileName;
//    ScaleXYZ={1,1,1}*0.001;
//  };
//  AnyDrawSurf SurfL = {
//    FileName = ..SurfPelvisLFileName;
//    ScaleXYZ={1,1,1}*0.001;
//  };
//};

#if BM_LEG_LEFT != OFF

AnyFolder &LeftThigh = Main.HumanModel.BodyModel.Left.Leg.Segments.Thigh.PatientNode;
AnyFolder &LeftShank = Main.HumanModel.BodyModel.Left.Leg.Segments.Shank.PatientNode;
#ifdef _override_scaling_for_Left_Patella
AnyFolder &LeftPatella = Main.HumanModel.BodyModel.Left.Leg.Segments.Patella.PatientNode;
LeftPatella = {
  AnyDrawSurf Surf = {
    FileName = ..SurfPatellaLFileName;
    ScaleXYZ={1,1,-1}*0.001;
  };
};
#endif

LeftShank = {
  AnyDrawSurf Surf = {
    FileName = ..SurfTibiaRFileName;
    ScaleXYZ={1,1,-1}*0.001;
  };
};
LeftThigh = {
  AnyDrawSurf Surf = {
    FileName = ..SurfFemurRFileName;
    ScaleXYZ={1,1,-1}*0.001;
  };
};
#endif

#if BM_LEG_RIGHT != OFF

AnyFolder &RightThigh = Main.HumanModel.BodyModel.Right.Leg.Segments.Thigh.PatientNode;
AnyFolder &RightShank = Main.HumanModel.BodyModel.Right.Leg.Segments.Shank.PatientNode;
#ifdef _override_scaling_for_Right_Patella
AnyFolder &RightPatella = Main.HumanModel.BodyModel.Right.Leg.Segments.Patella.PatientNode;
RightPatella = {
  AnyDrawSurf Surf= {
    FileName = ..SurfPatellaRFileName;
    ScaleXYZ={1,1,1}*0.001;
  };
};
#endif

RightShank = {
  AnyDrawSurf Surf = {
    FileName = ..SurfTibiaRFileName;
    ScaleXYZ={1,1,1}*0.001;
  };
  AnySurfSTL TibiaSurfObj = {
    FileName = ..SurfTibiaRFileName;
    ScaleXYZ={1,1,1}*0.001;
  };
};
RightThigh = {
  AnyDrawSurf Surf = {
    FileName = ..SurfFemurRFileName;
    ScaleXYZ={1,1,1}*0.001;
  };
};
#endif
//  AnyDrawPointCloud VisualizeLandmarks = {
//    Points = Main.Morphing.LeftThigh.TargetLandmarks;
//    RGB = {1, 0, 0};
//    Opacity = 0.5;
//    PointStyle.Size = 0.005;
//    Points3D = On;
//    ShowNames = Off;
//  };
