#define UseCustomFemCompSTL
#define FEM_COMP_FLEXION 6
#define FEM_COMP_SIZE "3L"

TrialSpecificData = {
  #include "../../FemComp3LSpecificData.any"

  AnyVec3 FemCompPos = {-0.824073,-2.517457,0}/1000;
  AnyMat33 FemCompRot = {{0.9945,-0.1045,0},{0.1045,0.9945,0},{0,0,1}};
};

#include "../PS_chairrise1/TrialSpecificData.any"

#ifdef LABEL
#undef LABEL
#endif

#ifdef INV_DYN_DRIVER_STRATEGY
#undef INV_DYN_DRIVER_STRATEGY
#endif

#ifdef USE_2DOF_SUBTALAR_JOINT
#undef USE_2DOF_SUBTALAR_JOINT
#endif

#define USE_2DOF_SUBTALAR_JOINT
#define INV_DYN_DRIVER_STRATEGY 4
#define LABEL "_InvDyn4"
