//Set this to 1 if you want to run the motion and Parameter Optimization identification
//**************************************************
#ifndef MotionAndParameterOptimizationModel
#define MotionAndParameterOptimizationModel 0
#endif

//Set this to 1 if you want to run the inverse dynamic analysis
#ifndef InverseDynamicModel
#define InverseDynamicModel 1
#endif
//Usually only have one of the two switches active so set the inactive analysis to 0
//**************************************************

#ifdef INCLUDE_EXTRA_TOE_SEGMENT
#undef INCLUDE_EXTRA_TOE_SEGMENT
#endif


Main = {

  // This file controls most of the Settings of your Model, the following items are defined here:
  //  1. Marker Names
  //  2. Marker locations
  #include "./ModelSetup.any"

  // Define the Environment around the human
  #include "../../../../Model/Environment.any"

  AnyFolder Studies ={
  // Usually, there is no need to make changes in the following files. PLease be aware. that
  // changes in the Kinematics and InverseDynamics may lead to model failure and/or unrealistic results:
    #if  MotionAndParameterOptimizationModel
    #include "../../../../Model/Kinematics.any"
    #endif

    #if InverseDynamicModel
    #include "./InverseDynamics.any"
    #endif

  };
}; //Main
