#path TRIAL_PATH "."
AnyFolder TrialSpecificData = {

  #ifndef NO_MARKER_DRIVERS
   #define NO_MARKER_DRIVERS
  #endif

  #ifndef TRIAL_SPECIFIC_FDK_INITIAL_CONDITIONS
   #define TRIAL_SPECIFIC_FDK_INITIAL_CONDITIONS
  #endif

  #define STATIC_DRIVERSET 0

  #define EXCLUDE_FORCEPLATES

  // Name of the kinematic data file to be analysed
  AnyString TrialName = ANYBODY_NAME_MAINFILEDIR; //Trialname specifies naming of output files

  // initial position of knee joint measures
//  AnyVector TibiaFemoralFDKInitPos = {-0.0127, -0.0068, 0}; //x,y,z translations
//  AnyVector TibiaFemoralFDKInitRot = {0.025, 0.01}; //y,x rotations
//  AnyVector PatellaFemurFDKInitRot = {-1.28}; // initial patella flexion

//  AnyVector TibiaFemoralFDKInitPos = {0, -0.003, 0}; //x,y,z translations
//  AnyVector TibiaFemoralFDKInitRot = {0.0, 0.0}; //y,x rotations
//  AnyVector PatellaTendonFDKInitPos = {0.066}; // intial patella tendon FDK length
//  AnyVector PatellaFemurFDKInitPos = {0,0,0,0,0}; //initial patella-femur FDK position

  AnyVector TibiaFemoralFDKInitPos = {0.000550652, -0.00279323, -0.001688786}; //x,y,z translations
  AnyVector TibiaFemoralFDKInitRot = {0.05825339, 0.0449764}; //y,x rotations
  AnyVector PatellaFemurFDKInitPos = {0.001690631, 0.000343101, -0.004782881, 0.07828545, -0.05762803}; //initial patella-femur FDK position
  AnyVector PatellaTendonFDKInitPos = {0.06358889}; // intial patella tendon FDK length

  AnyFolder DrvInitPos = { // deg
    AnyVar KneeFlexion              =  (95.00);
    AnyVar HipFlexion               =  (61.55);
    AnyVar HipAbduction             =  ( 0.00);
    AnyVar HipExternalRotation      =  ( 4.58);
//    AnyVar HipAbduction             =  ( 7.00);
//    AnyVar HipExternalRotation      =  (20.00);
//    AnyVar HipAbduction             =  ( 0.00);
//    AnyVar HipExternalRotation      =  (15.00);
  };
  AnyFolder DrvInitVel = { // deg/s
    AnyVar KneeFlexion              = (-80.00);
  };

  #ifdef USE_2DOF_SUBTALAR_JOINT
  #undef USE_2DOF_SUBTALAR_JOINT
  #endif

  // ********** Time ***********
  // change these according to your fluoroscopy data!
  AnyIntVar nFrames = 27;
  AnyFloatVar FluoroFrameRate = 30;
  // FirstFrameOffset is the offset value from the first frame of track file
  AnyIntVar FirstFrameOffset = 0;
  // LastFrameOffset is the offset value from the last frame of track file
  AnyIntVar LastFrameOffset  = 0;
  // Number of steps for the analysis but can be changed is needed
  AnyIntVar nStep = 4*Main.ModelSetup.nStep + 1;

  // ********** Gravity ***********
  // Gravity vector that is consistent with the laboratory setting
  AnyVector Gravity = {0,0,-9.82}; // Z direction is normal to the ground

  //This is the initial position of the body it should only be touched it the kinematics does not work it first timestep
  //then these variable can be used to create a better guess, otherwise leave them unchanged
  AnyFolder InitialPositionOfBody ={

    // Initial Pelvis rotation. Rotation is calculated automatically if
    // the PelvisRotMat is defined.
    AnyVar PelvisRotZ = 0;
    AnyVar PelvisRotY = -10;
    AnyVar PelvisRotX = 90;

    AnyVar PelvisThoraxExtension = -20;
    AnyVar PelvisThoraxLateralBending=0;
    AnyVar PelvisThoraxRotation=0;

    AnyVar NeckExtension=0;

    AnyFolder Right= {
      AnyVar HipFlexion                   =  0;
      AnyVar HipAbduction                 =  0;
      AnyVar HipExternalRotation          =  0;
      AnyVar KneeFlexion                  =  0;
      AnyVar AnklePlantarFlexion          =  0;
      AnyVar SubTalarEversion             =  0;
      AnyVar GlenohumeralFlexion          = 20;
      AnyVar GlenohumeralAbduction        = 30;
      AnyVar GlenohumeralExternalRotation = 00;
      AnyVar ElbowFlexion                 = 90;
      AnyVar ElbowPronation               =-60;
      AnyVar WristFlexion                 =  0;
      AnyVar WristAbduction               =  0;
    };

    AnyFolder Left = {
      AnyVar HipFlexion                   = 61.43;
      AnyVar HipAbduction                 =  0;
      AnyVar HipExternalRotation          =  4.58;
      AnyVar KneeFlexion                  = 93.16;
      AnyVar AnklePlantarFlexion          =  0;
      AnyVar SubTalarEversion             =  0;
      AnyVar GlenohumeralFlexion          = 20;
      AnyVar GlenohumeralAbduction        = 30;
      AnyVar GlenohumeralExternalRotation =  0;
      AnyVar ElbowFlexion                 = 90;
      AnyVar ElbowPronation               =-60;
      AnyVar WristFlexion                 =  0;
      AnyVar WristAbduction               =  0;
    };
  };

};
