#path TRIAL_PATH "."
AnyFolder TrialSpecificData={
  #define StrengthTrial
  #define HipAbdAddStrengthTrial

  #define STATIC_DRIVERSET 0

  // Name of the C3D file to be analysed
  AnyString TrialName = ANYBODY_NAME_MAINFILEDIR; //Trialname specifies naming of output files
  AnyString C3DFile = TrialName + ".c3d"; // If named or placed differently then specify relative path and name o


  // ********** Time ***********
  // FirstFrameOffset is the offset value from the first frame of C3D file
  AnyIntVar FirstFrameOffset = 250;
  // LastFrameOffset is the offset value from the last frame of C3D file
  AnyIntVar LastFrameOffset  = 64;
  // Number of steps for the analysis but can be changed is needed
  AnyIntVar nStep = Main.ModelSetup.nStep;

  // ********** Gravity ***********
  // Gravity vector that is consistent with the laboratory setting
  AnyVector Gravity = {0.0, 0.0, -9.82}; // Z direction is normal to the ground

  // Link between forceplates and feet
  // #define FootOnForcePlate1 .HumanModelRef.Left.Leg.Seg.Foot
  // #define FootOnForcePlate2 .HumanModelRef.Left.Leg.Seg.Foot
  // #define FootOnForcePlate3 .HumanModelRef.Right.Leg.Seg.Foot
  // #define FootOnForcePlate4 .HumanModelRef.Left.Leg.Seg.Foot


   // HeelStrike times
 //  #define UseHeelStrikesTimes
 //  AnyVar RightHeelStrike1 = 1.102;
 //  AnyVar RightHeelStrike2 = 2.32;
 //  AnyVar LeftHeelStrike1 = 0.535;
 //  AnyVar LeftHeelStrike2 = 1.685;
 //  AnyInt nStep_BetweenHeelStrikes = 100;


  //This is the initial position of the body it should only be touched it the kinematics does not work it first timestep
  //then these variable can be used to create a better guess, otherwise leave them unchanged
  AnyFolder InitialPositionOfBody ={

    // Initial Pelvis rotation. Rotation is calculated automatically if
    // the PelvisRotMat is defined.
    AnyVar PelvisRotZ = 0;
    AnyVar PelvisRotY = -10;
    AnyVar PelvisRotX = 90;

    AnyVar PelvisThoraxExtension = -20;
    AnyVar PelvisThoraxLateralBending=0;
    AnyVar PelvisThoraxRotation=0;

    AnyVar NeckExtension=0;

    AnyFolder Right= {
      AnyVar HipFlexion                   = 0;
      AnyVar HipAbduction                 =  0;
      AnyVar HipExternalRotation          = 5;
      AnyVar KneeFlexion                  =  0;
      AnyVar AnklePlantarFlexion          =  0;
      AnyVar SubTalarEversion             =  0;
      AnyVar GlenohumeralFlexion          = 20;
      AnyVar GlenohumeralAbduction        =  30;
      AnyVar GlenohumeralExternalRotation =  00;
      AnyVar ElbowFlexion                 =  90;
      AnyVar ElbowPronation               = -60;
      AnyVar WristFlexion                 =  0;
      AnyVar WristAbduction               =  0;
    };

    AnyFolder Left = {
      AnyVar HipFlexion                   =  0;
      AnyVar HipAbduction                 = 0;
      AnyVar HipExternalRotation          =  5;
      AnyVar KneeFlexion                  =  0;
      AnyVar AnklePlantarFlexion          =  0;
      AnyVar SubTalarEversion             =  0;
      AnyVar GlenohumeralFlexion          =  20;
      AnyVar GlenohumeralAbduction        =  30;
      AnyVar GlenohumeralExternalRotation =  0;
      AnyVar ElbowFlexion                 =  90;
      AnyVar ElbowPronation               = -60;
      AnyVar WristFlexion                 =  0;
      AnyVar WristAbduction               =  0;
    };
  };

  // ********** Extra Drivers ***********
  // Some Gait Labs protocols do not record sufficient markers to create a full body model.
  // In particular, markers on the head, trunk and a third marker on the foot are not standard.
  // Therefore, additioanl drivers have been added to the model fix the head, drive the trunk
  // above the pelvis and fix subtalar eversio. You can switch them on for your own C3D files:

// Excluded markers
#define EXCLUDE_MARKER_RASIS 1
#define EXCLUDE_MARKER_XIPHOID 1
#define EXCLUDE_MARKER_LUMBAR 1
#define EXCLUDE_MARKER_RTHIGHSUPERIOR 1
#define EXCLUDE_MARKER_RTHIGHINFERIOR 1
#define EXCLUDE_MARKER_RSHANKLATERAL 1
#define EXCLUDE_MARKER_RMIDFOOTLATERAL 1
#define EXCLUDE_MARKER_RMIDFOOTSUPERIOR 1
#define EXCLUDE_MARKER_RHINDFOOT 1
#define EXCLUDE_MARKER_LTHIGHSUPERIOR 1
#define EXCLUDE_MARKER_LTHIGHINFERIOR 1
#define EXCLUDE_MARKER_RTOEMEDIAL 1
#define EXCLUDE_MARKER_RTOELATERAL 1
#define EXCLUDE_MARKER_RHEEL 1
#define EXCLUDE_MARKER_LTOEMEDIAL 1
#define EXCLUDE_MARKER_LTOELATERAL 1
#define EXCLUDE_MARKER_LHEEL 1
#define EXCLUDE_FORCEPLATES

// Do you have markers on the head? If not turn on following switch:
#ifndef HeadMarkersOnOff
  #define HeadMarkersOnOff 0
#endif
  // Do you have markers on the Trunk? If not turn on following switch:
#ifndef TrunkMarkersOnOff
  #define TrunkMarkersOnOff 1
#endif
  // Do you have three markers on the Foot? If not turn on following switch:
#ifndef ThreeFootMarkersOnOff
  #define ThreeFootMarkersOnOff 1
#endif
  // Do you have markers on the Scapula/Clavicle? If not turn on following switch:
#ifndef SCMarkersOnOff
  #define SCMarkersOnOff 1
#endif

#ifndef UseDetailNeckModel
  #define UseDetailNeckModel 0
#endif

};
