#path TRIAL_PATH "."
AnyFolder TrialSpecificData = {

  #ifdef GENERATE_SURROGATE_MODEL
   #undef GENERATE_SURROGATE_MODEL
  #endif

  #ifndef NO_MARKER_DRIVERS
   #define NO_MARKER_DRIVERS
  #endif

  #ifndef TRIAL_SPECIFIC_FDK_INITIAL_CONDITIONS
   #define TRIAL_SPECIFIC_FDK_INITIAL_CONDITIONS
  #endif

  #define STATIC_DRIVERSET 0

  #define EXCLUDE_FORCEPLATES

  // Name of the kinematic data file to be analysed
  AnyString TrialName = ANYBODY_NAME_MAINFILEDIR; //Trialname specifies naming of output files

 #ifndef KNEE_FLEXION_ANGLE
  AnyVector TibiaFemoralFDKInitPos = {0.0, 0.0, 0.0}; //x,y,z translations
  AnyVector TibiaFemoralFDKInitRot = {0.0, 0.0}; //y,x rotations
 #endif

  // deg
  AnyFolder DrvInitPos = {
    //AnyVar KneeFlexion              =  ( 90.00);
    AnyVar KneeFlexion              =  ( KNEE_FLEXION_ANGLE);
    AnyVar HipFlexion               =  ( KneeFlexion/2);
    AnyVar HipAbduction             =  ( 5.00);
    AnyVar HipExternalRotation      =  ( 12.00);
    AnyVar AnklePlantarFlexion      =  ( KneeFlexion/4);
    AnyVar PelvisRotZ               =  (180);
    AnyVar PelvisRotY               =  (0);
    AnyVar PelvisRotX               =  (90);
  };

  // ********** Time ***********
  // change these according to your fluoroscopy data!
  AnyIntVar nFrames = 5;
  // FirstFrameOffset is the offset value from the first frame of track file
  AnyIntVar FirstFrameOffset = 0;
  // LastFrameOffset is the offset value from the last frame of track file
  AnyIntVar LastFrameOffset  = 0;
  // Number of steps for the analysis but can be changed is needed
  AnyIntVar nStep = nFrames;
  AnyFloatVar tStart= 0;
  AnyFloatVar tEnd= 10000;


  // ********** Gravity ***********
  // Gravity vector that is consistent with the laboratory setting
  AnyVector Gravity = {0,0,-9.82}; // Z direction is normal to the ground

  //This is the initial position of the body it should only be touched it the kinematics does not work it first timestep
  //then these variable can be used to create a better guess, otherwise leave them unchanged
  AnyFolder InitialPositionOfBody ={

    // Initial Pelvis rotation. Rotation is calculated automatically if
    // the PelvisRotMat is defined.
    AnyVar PelvisRotZ = 180.0;
    AnyVar PelvisRotY = 0;
    AnyVar PelvisRotX = 90;

    AnyVar PelvisThoraxExtension = 0;
    AnyVar PelvisThoraxLateralBending=0;
    AnyVar PelvisThoraxRotation=0;

    AnyVar NeckExtension=0;

    AnyFolder Right= {
      AnyVar HipFlexion                   =  0;
      AnyVar HipAbduction                 =  0;
      AnyVar HipExternalRotation          =  5;
      AnyVar KneeFlexion                  =  0;
      AnyVar AnklePlantarFlexion          =  0;
      AnyVar SubTalarEversion             =  0;
      AnyVar GlenohumeralFlexion          = 20;
      AnyVar GlenohumeralAbduction        = 30;
      AnyVar GlenohumeralExternalRotation = 00;
      AnyVar ElbowFlexion                 = 90;
      AnyVar ElbowPronation               =-60;
      AnyVar WristFlexion                 =  0;
      AnyVar WristAbduction               =  0;
    };

    AnyFolder Left = {
      AnyVar HipFlexion                   = ..DrvInitPos.HipFlexion;
      AnyVar HipAbduction                 = ..DrvInitPos.HipAbduction;
      AnyVar HipExternalRotation          = ..DrvInitPos.HipExternalRotation;
      AnyVar KneeFlexion                  = ..DrvInitPos.KneeFlexion;
      AnyVar AnklePlantarFlexion          = ..DrvInitPos.AnklePlantarFlexion;
      AnyVar SubTalarEversion             =  0;
      AnyVar GlenohumeralFlexion          = 20;
      AnyVar GlenohumeralAbduction        = 30;
      AnyVar GlenohumeralExternalRotation =  0;
      AnyVar ElbowFlexion                 = 90;
      AnyVar ElbowPronation               =-60;
      AnyVar WristFlexion                 =  0;
      AnyVar WristAbduction               =  0;
    };
  };

};

// Distance between KneeJoint and ForceAttachment node
AnyKinLinear VargusValusForceDistance = {
  Ref = 0;
  AnyRefFrame &VarusValgusNode = Main.Studies.HumanModel.BodyModel.Left.Leg.Seg.Shank.VarusValgusLoadNode;
  AnyRefFrame &Shank = Main.Studies.HumanModel.BodyModel.Left.Leg.Seg.Shank.KneeJoint;
};
