// Morphing configuration file
#include "<LAB_CONFIG_PATH>/Morphing/DataConfig.any"

// in GC5 surface-vertices were used and tibiofibular surfaces was used for the topology match
Main.Morphing.SourceData.SurfTibiaFileName = Main.Morphing.SourceData.SurfTibiaFibulaFileName;
Main.ModelSetup.SubjectSpecificData.SurfTibiaRFileName = Main.ModelSetup.SubjectSpecificData.SurfTibiaFibulaRFileName;

#ifndef _override_scaling_for_Pelvis
//  #define _override_scaling_for_Pelvis
#endif
//
//
#ifndef _override_scaling_for_Right_Thigh
  #define _override_scaling_for_Right_Thigh
#endif

#ifndef _override_scaling_for_Left_Thigh
  #define _override_scaling_for_Left_Thigh
#endif

#ifndef _override_scaling_for_Right_Shank
  #define _override_scaling_for_Right_Shank
#endif

#ifndef _override_scaling_for_Left_Shank
  #define _override_scaling_for_Left_Shank
#endif

#ifndef _override_scaling_for_Right_Patella
  #define _override_scaling_for_Right_Patella
#endif

#ifndef _override_scaling_for_Left_Patella
  #define _override_scaling_for_Left_Patella
#endif
