//#define _EXTRACT_LANDMARKS(LANDMARK_OBJECT, SURF_HANDLE, SURF_FILE_OBJECT, LANDMARK_NUMBER)\
//    AnyIntVar LandmarkNumber##_##SURF_HANDLE = LANDMARK_NUMBER;\
//    AnyFileVar SURF_HANDLE = SURF_FILE_OBJECT;\
//    AnyInt NumPoints_##SURF_HANDLE = STL_Size(SURF_HANDLE, 1)[0];\
//    LANDMARK_OBJECT = STL_Vertices(SURF_HANDLE, iarr(0, floor((NumPoints_##SURF_HANDLE)/LandmarkNumber##_##SURF_HANDLE), (NumPoints_##SURF_HANDLE) - 1), 1)*0.001
//
////RightThigh = {
////  _EXTRACT_LANDMARKS(SourceLandmarks, SourceSTL, Main.Morphing.SourceData.SurfFemurFileName, Main.Morphing.Settings.LandmarkNumber);
////  _EXTRACT_LANDMARKS(TargetLandmarks, TargetSTL, Main.ModelSetup.SubjectSpecificData.SurfFemurFileName, Main.Morphing.Settings.LandmarkNumber);
////};
////
////RightShank = {
////  _EXTRACT_LANDMARKS(SourceLandmarks, SourceSTL, Main.Morphing.SourceData.SurfTibiaFibulaFileName, Main.Morphing.Settings.LandmarkNumber);
////  _EXTRACT_LANDMARKS(TargetLandmarks, TargetSTL, Main.ModelSetup.SubjectSpecificData.SurfTibiaFibulaFileName, Main.Morphing.Settings.LandmarkNumber);
////};
////
////RightPatella = {
////  _EXTRACT_LANDMARKS(SourceLandmarks, SourceSTL, Main.Morphing.SourceData.SurfPatellaFileName, Main.Morphing.Settings.LandmarkNumber);
////  _EXTRACT_LANDMARKS(TargetLandmarks, TargetSTL, Main.ModelSetup.SubjectSpecificData.SurfPatellaFileName, Main.Morphing.Settings.LandmarkNumber);
////};
//
//
//LeftThigh = {
//  _EXTRACT_LANDMARKS(SourceLandmarks, SourceSTL, Main.Morphing.SourceData.SurfFemurFileName, Main.Morphing.Settings.LandmarkNumber);
//  _EXTRACT_LANDMARKS(TargetLandmarks, TargetSTL, Main.ModelSetup.SubjectSpecificData.SurfFemurFileName, Main.Morphing.Settings.LandmarkNumber);
//};
//
//LeftShank = {
//  _EXTRACT_LANDMARKS(SourceLandmarks, SourceSTL, Main.Morphing.SourceData.SurfTibiaFibulaFileName, Main.Morphing.Settings.LandmarkNumber);
//  _EXTRACT_LANDMARKS(TargetLandmarks, TargetSTL, Main.ModelSetup.SubjectSpecificData.SurfTibiaFibulaFileName, Main.Morphing.Settings.LandmarkNumber);
//};
//
//LeftPatella = {
//  _EXTRACT_LANDMARKS(SourceLandmarks, SourceSTL, Main.Morphing.SourceData.SurfPatellaFileName, Main.Morphing.Settings.LandmarkNumber);
//  _EXTRACT_LANDMARKS(TargetLandmarks, TargetSTL, Main.ModelSetup.SubjectSpecificData.SurfPatellaFileName, Main.Morphing.Settings.LandmarkNumber);
//};
