Main.ModelSetup.TrialSpecificData =
{
  // This switch is specific to this application, and allow
  // us to multiple configuration in a single application
  #define INCLUDE_UPPERBODY OFF

  // This ensure that the segment scaling and marker parameters are
  // loaded from the standing reference trial.

  //TODO: comment in and update to ..\..\Trials Static\PS_staticfor1
  LoadParametersFrom = {"..\..\Trials Static\PS_staticfor1"};

  // This is the name of the trial c3d file without extension.
  // Here we assume the c3d file has the same name as the mainfile directory.
  TrialFileName = MOCAP_NAME_MAINFILEDIR;

  // This the C3D frame where the analysis starts
  // If not specified it defaults to the first frame of the C3D file
  FirstFrame = 93+.C3DFileData.Header.FirstFrameNo;

  // This the C3D frame where the analysis ends
  // If not specified it defaults the first frame of the C3D file
  LastFrame = -25+.C3DFileData.Header.LastFrameNo;

  // tStart specifies the time of the analysis. Setting this overrides
  // the 'FirstFrame' value
  //tStart = ;

  // tEnd specifies the tEnd time of the analysis. Setting this overrides
  // the 'LastFrame' value
  //tEnd = ;

  // nStep specifies the number of steps used in the analysis.
  // If not specified it defaults to: 1+(tEnd-tStart)*C3D_video_frame_rate
  //nStep = ;


  // The switch MOCAP_C3D_DATA_PATH can be used to specify the directory
  // where the C3D file is stored. Defaults to the main file directory.
  // #path MOCAP_C3D_DATA_PATH "<MOCAP_PATH_MAINFILEDIR>"

  // The switch MOCAP_OUTPUT_FILENAME_PREFIX can be used to specify
  // a prefix to all output files. Useful in some cases
  // to differentiate trials. Defautls to nothing ""
  //#define MOCAP_OUTPUT_FILENAME_PREFIX ""

  //  Main.ModelSetup.C3DFileData ={
  //    SearchAndReplace = {{"JW:", ""}};
  //  };

  Main.ModelSetup.LabSpecificData.LowPassFilterSettings =
  {
    MarkerFilterCutOffFrequency = 5;
    ForceFilterCutOffFrequency = 7;
  };

  // This class_template calculates the load time position and orientation of
  // the pelvis based on markers.
  AutoPelvisPos AutoPos(RASIS=RAsis, LASIS=LAsis, BACK=RPsis) = {};

  /// The following settings define the initial posture of the
  /// model (e.g. at load time)
  Main.HumanModel.Mannequin.Posture = {


    // This can be ommitted if AutoPelvisPos above is used.
    //    PelvisPosX = -0.08;
    //    PelvisPosY = 0.89;
    //    PelvisPosZ = -0.33;
    //
    //    PelvisRotX = 0.0;
    //    PelvisRotY = 0.0;
    //    PelvisRotZ = 0.0;


    PelvisThoraxExtension = -20;
    PelvisThoraxLateralBending = 0;
    PelvisThoraxRotation = 0;

    NeckExtension = 0;
    NeckLateralBending = 0;
    NeckRotation = 0;

    Right = {

      HipFlexion = 10;
      HipAbduction = 0;
      HipExternalRotation = 0;
      KneeFlexion = 10;
      AnklePlantarFlexion = 0;
      SubTalarEversion = 0;


      ////    These Values are configure from the SubjectSpecificData.any
      ////    since it is shared by all trials
      //      GlenohumeralFlexion = 0;
      //      GlenohumeralAbduction = 0;
      //      GlenohumeralExternalRotation = 0;
      //      ElbowFlexion = 0;
      //      ElbowPronation = 0;
      //      WristFlexion = 0;
      //      WristAbduction = 0;

    };
    Left = {

      HipFlexion = -30;
      HipAbduction = 0;
      HipExternalRotation = 0;
      KneeFlexion = 0;
      AnklePlantarFlexion = 0;
      SubTalarEversion = 0;

      ////    These Values are configure from the SubjectSpecificData.any
      ////    since it is shared by all trials
      //      GlenohumeralFlexion = 0;
      //      GlenohumeralAbduction = 0;
      //      GlenohumeralExternalRotation = 0;
      //      ElbowFlexion = 0;
      //      ElbowPronation = 0;
      //      WristFlexion = 0;
      //      WristAbduction = 0;

    };


  }; // InitialPositionOfBody

};

#path PATH_eKneeData "PS_ngait_og_ss1_eTibia.csv"
