#path TRIAL_PATH "."
AnyFolder TrialSpecificData={
  //#define EXCLUDE_MARKER_LTOEMEDIAL
  #define EXCLUDE_MARKER_RTOEMEDIAL

  //#define EXCLUDE_MARKER_LTOELATERAL
  #define EXCLUDE_MARKER_RTOELATERAL

  #define EXCLUDE_MARKER_RMIDFOOTSUPERIOR
  //#define EXCLUDE_MARKER_LMIDFOOTSUPERIOR

  #define EXCLUDE_MARKER_RMIDFOOTMEDIAL
  //#define EXCLUDE_MARKER_LMIDFOOTMEDIAL

  // Link between forceplates and feet
#ifndef NO_MARKER_DRIVERS
  #define FootOnForcePlate1 .BodyModelRef.Left.Leg.Seg.Foot
  #define FootOnForcePlate2 .BodyModelRef.Right.Leg.Seg.Foot
  #define FootOnForcePlate3 .BodyModelRef.Right.Leg.Seg.Foot
#else
  #define EXCLUDE_FORCEPLATE1
#endif

  #define STATIC_DRIVERSET 0

  #define EXCLUDE_FORCEPLATE2
  #define EXCLUDE_FORCEPLATE3

  #define INCLUDE_ETIBIA_FORCES


  // Name of the C3D file to be analysed
  AnyString TrialName = ANYBODY_NAME_MAINFILEDIR; //Trialname specifies naming of output files
  AnyString C3DFile = TrialName + ".c3d"; // If named or placed differently then specify relative path and name o


  // ********** Time ***********
  // FirstFrameOffset is the offset value from the first frame of C3D file
  AnyIntVar FirstFrameOffset = 128;
  // LastFrameOffset is the offset value from the last frame of C3D file
  AnyIntVar LastFrameOffset  = 25;
  // Number of steps for the analysis but can be changed is needed
#ifndef NO_MARKER_DRIVERS
  AnyIntVar nStep = Main.ModelSetup.nStep;
#endif

  // ********** Gravity ***********
  // Gravity vector that is consistent with the laboratory setting
  AnyVector Gravity = {0.0, 0.0, -9.82}; // Z direction is normal to the ground


  // HeelStrike times
  //  #define UseHeelStrikesTimes
  //  AnyVar RightHeelStrike1 = 1.102;
  //  AnyVar RightHeelStrike2 = 2.32;
  //  AnyVar LeftHeelStrike1 = 0.535;
  //  AnyVar LeftHeelStrike2 = 1.685;
  //  AnyInt nStep_BetweenHeelStrikes = 100;


  //This is the initial position of the body it should only be touched it the kinematics does not work it first timestep
  //then these variable can be used to create a better guess, otherwise leave them unchanged
  AnyFolder InitialPositionOfBody ={

    // Initial Pelvis rotation. Rotation is calculated automatically if
    // the PelvisRotMat is defined.
    AnyVar PelvisRotZ = 180;
    AnyVar PelvisRotY = -10;
    AnyVar PelvisRotX = 90;

    AnyVar PelvisThoraxExtension = -20;
    AnyVar PelvisThoraxLateralBending=0;
    AnyVar PelvisThoraxRotation=0;

    AnyVar NeckExtension=0;

    AnyFolder Right= {
      AnyVar HipFlexion                   =  0;
      AnyVar HipAbduction                 =  0;
      AnyVar HipExternalRotation          =  5;
      AnyVar KneeFlexion                  =  0;
      AnyVar AnklePlantarFlexion          =  0;
      AnyVar SubTalarEversion             =  0;
      AnyVar GlenohumeralFlexion          = 20;
      AnyVar GlenohumeralAbduction        = 30;
      AnyVar GlenohumeralExternalRotation = 00;
      AnyVar ElbowFlexion                 = 90;
      AnyVar ElbowPronation               =-60;
      AnyVar WristFlexion                 =  0;
      AnyVar WristAbduction               =  0;
    };

    AnyFolder Left = {
      AnyVar HipFlexion                   =  0;
      AnyVar HipAbduction                 =  0;
      AnyVar HipExternalRotation          =  5;
      AnyVar KneeFlexion                  =  0;
      AnyVar AnklePlantarFlexion          =  0;
      AnyVar SubTalarEversion             =  0;
      AnyVar GlenohumeralFlexion          = 20;
      AnyVar GlenohumeralAbduction        = 30;
      AnyVar GlenohumeralExternalRotation =  0;
      AnyVar ElbowFlexion                 = 90;
      AnyVar ElbowPronation               =-60;
      AnyVar WristFlexion                 =  0;
      AnyVar WristAbduction               =  0;
    };
  };

  // ********** Extra Drivers ***********
  // Some Gait Labs protocols do not record sufficient markers to create a full body model.
  // In particular, markers on the head, trunk and a third marker on the foot are not standard.
  // Therefore, additioanl drivers have been added to the model fix the head, drive the trunk
  // above the pelvis and fix subtalar eversio. You can switch them on for your own C3D files:

  // Do you have markers on the head? If not turn on following switch:
  #ifndef HeadMarkersOnOff
  #define HeadMarkersOnOff 0
  #endif
  // Do you have markers on the Trunk? If not turn on following switch:
  #ifndef TrunkMarkersOnOff
  #define TrunkMarkersOnOff 1
  #endif
  // Do you have three markers on the Foot? If not turn on following switch:
  #ifndef ThreeFootMarkersOnOff
  #define ThreeFootMarkersOnOff 1
  #endif
  // Do you have markers on the Scapula/Clavicle? If not turn on following switch:
  #ifndef SCMarkersOnOff
  #define SCMarkersOnOff 1
  #endif

  #ifndef UseDetailNeckModel
  #define UseDetailNeckModel 0
  #endif

};
