Main.ModelSetup.SubjectSpecificData =
{

  Main.HumanModel.Anthropometrics =
  {
     BodyMass = 66.7;
     BodyHeight = 1.68;

     // These antrhopometric data will be used as initial guess for
     // the optimization alogorithm the optimization algoritm will
     // allow changes to the segment lengths
     SegmentDimensions =
     {
       PelvisWidth = DesignVar(0.16); ///< Distance between hip joints
       HeadHeight = DesignVar(0.14); ///< Height in neutral position from  C1HatNode to top of head
       TrunkHeight = DesignVar(0.594);

       Right =
       {
          UpperArmLength = DesignVar(0.286);
          LowerArmLength = DesignVar(0.235);
          HandLength = DesignVar(0.182);
          HandBreadth = DesignVar(0.085);

          ThighLength = DesignVar(0.41);
          ShankLength = DesignVar(0.40);
          FootLength = DesignVar(0.258);

       };

       Left =
       {
          UpperArmLength = DesignVar(0.286);
          LowerArmLength = DesignVar(0.235);
          HandLength = DesignVar(0.182);
          HandBreadth = DesignVar(0.085);

          ThighLength = DesignVar(0.41);
          ShankLength = DesignVar(0.40);
          FootLength = DesignVar(0.258);
       };
     };
   }; //Main.HumanModel.Anthropometrics

};

#define DEF_CUSTOM_SCALING_LEVEL_RIGHT_THIGH "RBF"
#define DEF_CUSTOM_SCALING_LEVEL_LEFT_THIGH "RBF"
#define DEF_CUSTOM_SCALING_LEVEL_RIGHT_SHANK "STL"
#define DEF_CUSTOM_SCALING_LEVEL_LEFT_SHANK "STL"
#define DEF_CUSTOM_SCALING_LEVEL_RIGHT_PATELLA "STL"
#define DEF_CUSTOM_SCALING_LEVEL_LEFT_PATELLA "STL"

#define DEF_CUSTOM_SCALING_PATELLA_TENDON_LENGTH 0.060

#define DEF_MUS_STRENGTH_SCALE_KNEE_FLEXION_RIGHT 0.50
#define DEF_MUS_STRENGTH_SCALE_KNEE_EXTENSION_RIGHT 0.50

#define DEF_MUS_STRENGTH_SCALE_KNEE_FLEXION_LEFT 1.0
#define DEF_MUS_STRENGTH_SCALE_KNEE_EXTENSION_LEFT 1.0

#define DEF_MUS_STRENGTH_SCALE_GASTROCNEMIUS_RIGHT 0.35
#define DEF_MUS_STRENGTH_SCALE_GASTROCNEMIUS_LEFT 0.35
