AnyFolder JointAngleOutputs =
{
  AnyOutputFile OutputFile1 =
  {
    FileName = Main.TrialSpecificData.StrTrialFolderPath+OutputFileNamePrefix+Main.ModelSetup.C3DFileData.NameOfFile+"-euler-trunk.txt";
    SepSign = " ";

    AnyVector PelvisPosX = ..BodyModel.Interface.Trunk.PelvisPosX.Pos;
    AnyVector PelvisPosY = ..BodyModel.Interface.Trunk.PelvisPosY.Pos;
    AnyVector PelvisPosZ = ..BodyModel.Interface.Trunk.PelvisPosZ.Pos;
    AnyVector PelvisRotX = ..BodyModel.Interface.Trunk.PelvisRotX.Pos;
    AnyVector PelvisRotY = ..BodyModel.Interface.Trunk.PelvisRotY.Pos;
    AnyVector PelvisRotZ = ..BodyModel.Interface.Trunk.PelvisRotZ.Pos;
    AnyVector PelvisThoraxExtension = ..BodyModel.Interface.Trunk.PelvisThoraxExtension.Pos;
    AnyVector PelvisThoraxLateralBending = ..BodyModel.Interface.Trunk.PelvisThoraxLateralBending.Pos;
    AnyVector PelvisThoraxRotation = ..BodyModel.Interface.Trunk.PelvisThoraxRotation.Pos;
    AnyVector NeckLateralBending = ..BodyModel.Interface.Trunk.SkullThoraxLateralBending.Pos;
    AnyVector NeckRotation = ..BodyModel.Interface.Trunk.SkullThoraxRotation.Pos;
    AnyVector NeckExtension = ..BodyModel.Interface.Trunk.SkullThoraxFlexion.Pos;
  };

  #if BM_LEG_LEFT & (BM_LEG_MODEL == _LEG_MODEL_TLEM_ | BM_LEG_MODEL == _LEG_MODEL_TLEM2_)
  AnyOutputFile OutputFile2 =
  {
    FileName = Main.TrialSpecificData.StrTrialFolderPath+OutputFileNamePrefix+Main.ModelSetup.C3DFileData.NameOfFile+"-euler-leftlegtd.txt";
    SepSign = " ";

    AnyVector HipFlexion = ..BodyModel.Interface.Left.HipFlexion.Pos;
    AnyVector HipAbduction = ..BodyModel.Interface.Left.HipAbduction.Pos;
    AnyVector HipExternalRotation = ..BodyModel.Interface.Left.HipExternalRotation.Pos;
    AnyVector KneeFlexion = ..BodyModel.Interface.Left.KneeFlexion.Pos;
    AnyVector AnklePlantarFlexion = ..BodyModel.Interface.Left.AnklePlantarFlexion.Pos;
    AnyVector SubTalarEversion = ..BodyModel.Interface.Left.SubTalarEversion.Pos;
  };
  #endif

  #if BM_LEG_RIGHT & (BM_LEG_MODEL == _LEG_MODEL_TLEM_ | BM_LEG_MODEL == _LEG_MODEL_TLEM2_)
  AnyOutputFile OutputFile3 =
  {
    FileName = Main.TrialSpecificData.StrTrialFolderPath+OutputFileNamePrefix+Main.ModelSetup.C3DFileData.NameOfFile+"-euler-rightlegtd.txt";
    SepSign = " ";

    AnyVector HipFlexion = ..BodyModel.Interface.Right.HipFlexion.Pos;
    AnyVector HipAbduction = ..BodyModel.Interface.Right.HipAbduction.Pos;
    AnyVector HipExternalRotation = ..BodyModel.Interface.Right.HipExternalRotation.Pos;
    AnyVector KneeFlexion = ..BodyModel.Interface.Right.KneeFlexion.Pos;
    AnyVector AnklePlantarFlexion = ..BodyModel.Interface.Right.AnklePlantarFlexion.Pos;
    AnyVector SubTalarEversion = ..BodyModel.Interface.Right.SubTalarEversion.Pos;
  };

  AnyOutputFile OutputFileRightFoot =
  {
    FileName = Main.TrialSpecificData.StrTrialFolderPath+OutputFileNamePrefix+Main.ModelSetup.C3DFileData.NameOfFile+"-euler-rightfoot.txt";
    SepSign = " ";

    AnyVector FootPosX = ..BodyModel.Interface.Right.GlobalFootPosX.Pos;
    AnyVector FootPosY = ..BodyModel.Interface.Right.GlobalFootPosY.Pos;
    AnyVector FootPosZ = ..BodyModel.Interface.Right.GlobalFootPosZ.Pos;
    AnyVector FootRotX = ..BodyModel.Interface.Right.GlobalFootRotX.Pos;
    AnyVector FootRotY = ..BodyModel.Interface.Right.GlobalFootRotY.Pos;
    AnyVector FootRotZ = ..BodyModel.Interface.Right.GlobalFootRotZ.Pos;

    AnyVector FootGlobalToeLateralContactNodePosX = ..BodyModel.Interface.Right.GlobalToeLateralContactNodePosX.Pos;
    AnyVector FootGlobalToeLateralContactNodePosY = ..BodyModel.Interface.Right.GlobalToeLateralContactNodePosY.Pos;
    AnyVector FootGlobalToeLateralContactNodePosZ = ..BodyModel.Interface.Right.GlobalToeLateralContactNodePosZ.Pos;

    AnyVector FootGlobalToeMedialContactNodePosX = ..BodyModel.Interface.Right.GlobalToeMedialContactNodePosX.Pos;
    AnyVector FootGlobalToeMedialContactNodePosY = ..BodyModel.Interface.Right.GlobalToeMedialContactNodePosY.Pos;
    AnyVector FootGlobalToeMedialContactNodePosZ = ..BodyModel.Interface.Right.GlobalToeMedialContactNodePosZ.Pos;
  };
  #endif

  #if BM_LEG_LEFT & (BM_LEG_MODEL == _LEG_MODEL_Leg_)
  AnyOutputFile OutputFile4 =
  {
    FileName = Main.TrialSpecificData.StrTrialFolderPath+OutputFileNamePrefix+Main.ModelSetup.C3DFileData.NameOfFile+"-euler-leftleg.txt";
    SepSign = " ";

    AnyVector HipFlexion = ..BodyModel.Interface.Left.HipFlexion.Pos;
    AnyVector HipAbduction = ..BodyModel.Interface.Left.HipAbduction.Pos;
    AnyVector HipExternalRotation = ..BodyModel.Interface.Left.HipExternalRotation.Pos;
    AnyVector KneeFlexion = ..BodyModel.Interface.Left.KneeFlexion.Pos;
    AnyVector AnklePlantarFlexion = ..BodyModel.Interface.Left.AnklePlantarFlexion.Pos;
    AnyVector AnkleEversion = ..BodyModel.Interface.Left.AnkleEversion.Pos;
  };
  #endif

  #if BM_LEG_RIGHT & (BM_LEG_MODEL == _LEG_MODEL_Leg_)
  AnyOutputFile OutputFile5 =
  {
    FileName = Main.TrialSpecificData.StrTrialFolderPath+OutputFileNamePrefix+Main.ModelSetup.C3DFileData.NameOfFile+"-euler-rightleg.txt";
    SepSign = " ";

    AnyVector HipFlexion = ..BodyModel.Interface.Right.HipFlexion.Pos;
    AnyVector HipAbduction = ..BodyModel.Interface.Right.HipAbduction.Pos;
    AnyVector HipExternalRotation = ..BodyModel.Interface.Right.HipExternalRotation.Pos;
    AnyVector KneeFlexion = ..BodyModel.Interface.Right.KneeFlexion.Pos;
    AnyVector AnklePlantarFlexion = ..BodyModel.Interface.Right.AnklePlantarFlexion.Pos;
    AnyVector AnkleEversion = ..BodyModel.Interface.Right.AnkleEversion.Pos;
  };
  #endif

  #if BM_ARM_LEFT == ON
  AnyOutputFile OutputFile6 =
  {
    FileName = Main.TrialSpecificData.StrTrialFolderPath+OutputFileNamePrefix+Main.ModelSetup.C3DFileData.NameOfFile+"-euler-leftarm.txt";
    SepSign = " ";

    AnyVector SternoClavicularProtraction=..BodyModel.Interface.Left.SternoClavicularProtraction.Pos;
    AnyVector SternoClavicularElevation=..BodyModel.Interface.Left.SternoClavicularElevation.Pos;
    AnyVector SternoClavicularAxialRotation=..BodyModel.Interface.Left.SternoClavicularAxialRotation.Pos;

    AnyVector GlenohumeralFlexion = ..BodyModel.Interface.Left.GlenohumeralFlexion.Pos;
    AnyVector GlenohumeralExternalRotation = ..BodyModel.Interface.Left.GlenohumeralExternalRotation.Pos;
    AnyVector GlenohumeralAbduction = ..BodyModel.Interface.Left.GlenohumeralAbduction.Pos;
    AnyVector ElbowFlexion = ..BodyModel.Interface.Left.ElbowFlexion.Pos;
    AnyVector ElbowPronation = ..BodyModel.Interface.Left.ElbowPronation.Pos;
    AnyVector WristFlexion = ..BodyModel.Interface.Left.WristFlexion.Pos;
    AnyVector WristAbduction = ..BodyModel.Interface.Left.WristAbduction.Pos;
  };
  #endif


  #if BM_ARM_RIGHT == ON
  AnyOutputFile OutputFile7 =
  {
    FileName = Main.TrialSpecificData.StrTrialFolderPath+OutputFileNamePrefix+Main.ModelSetup.C3DFileData.NameOfFile+"-euler-rightarm.txt";
    SepSign = " ";

    AnyVector SternoClavicularProtraction=..BodyModel.Interface.Right.SternoClavicularProtraction.Pos;
    AnyVector SternoClavicularElevation=..BodyModel.Interface.Right.SternoClavicularElevation.Pos;
    AnyVector SternoClavicularAxialRotation=..BodyModel.Interface.Right.SternoClavicularAxialRotation.Pos;

    AnyVector GlenohumeralFlexion = ..BodyModel.Interface.Right.GlenohumeralFlexion.Pos;
    AnyVector GlenohumeralExternalRotation = ..BodyModel.Interface.Right.GlenohumeralExternalRotation.Pos;
    AnyVector GlenohumeralAbduction = ..BodyModel.Interface.Right.GlenohumeralAbduction.Pos;
    AnyVector ElbowFlexion = ..BodyModel.Interface.Right.ElbowFlexion.Pos;
    AnyVector ElbowPronation = ..BodyModel.Interface.Right.ElbowPronation.Pos;
    AnyVector WristFlexion = ..BodyModel.Interface.Right.WristFlexion.Pos;
    AnyVector WristAbduction = ..BodyModel.Interface.Right.WristAbduction.Pos;
  };
  #endif
}; //JointAngleOutputs
